# OpenSim document version 40000
ExternalLoads levelground_ccw_fast_01_01:
  datafile: levelground_ccw_fast_01_01_grf.mot
  ExternalForce [values shared by the 6 below unless stated]: applied_to_body=talus_r force_expressed_in_body=ground
      point_expressed_in_body=ground
  ExternalForce ForcePlate1: force_identifier=ground_force_1_v point_identifier=ground_force_1_p
      torque_identifier=ground_force_1_m
  ExternalForce ForcePlate2: force_identifier=ground_force_2_v point_identifier=ground_force_2_p
      torque_identifier=ground_force_2_m
  ExternalForce ForcePlate3: force_identifier=ground_force_3_v point_identifier=ground_force_3_p
      torque_identifier=ground_force_3_m
  ExternalForce ForcePlate4: force_identifier=ground_force_4_v point_identifier=ground_force_4_p
      torque_identifier=ground_force_4_m
  ExternalForce ForcePlate5: force_identifier=ground_force_5_v point_identifier=ground_force_5_p
      torque_identifier=ground_force_5_m
  ExternalForce ForcePlate6: force_identifier=ground_force_6_v point_identifier=ground_force_6_p
      torque_identifier=ground_force_6_m
