# OpenSim document version 40000
InverseKinematicsTool levelground_ccw_fast_01_01:
  model_file: ../Models/optimized_scale_and_markers.osim
  marker_file: ../MarkerData/levelground_ccw_fast_01_01.trc
  output_motion_file: levelground_ccw_fast_01_01_ik_by_opensim.mot
  accuracy: 1e-5
  report_errors: true
  IKTaskSet IK_tasks:
    IKMarkerTask L_ASIS: weight=1 apply=true
    IKMarkerTask L_Ankle_Lat: weight=1 apply=true
    IKMarkerTask L_Heel: weight=1 apply=true
    IKMarkerTask L_Knee_Lat: weight=1 apply=true
    IKMarkerTask L_PSIS: weight=1 apply=true
    IKMarkerTask L_Shank_Front: weight=1 apply=true
    IKMarkerTask L_Shank_Rear: weight=1 apply=true
    IKMarkerTask L_Shank_Upper: weight=1 apply=true
    IKMarkerTask L_Thigh_Front: weight=1 apply=true
    IKMarkerTask L_Thigh_Rear: weight=1 apply=true
    IKMarkerTask L_Thigh_Upper: weight=1 apply=true
    IKMarkerTask L_Toe_Lat: weight=1 apply=true
    IKMarkerTask L_Toe_Med: weight=1 apply=true
    IKMarkerTask L_Toe_Tip: weight=1 apply=true
    IKMarkerTask R_ASIS: weight=1 apply=true
    IKMarkerTask R_Ankle_Lat: weight=1 apply=true
    IKMarkerTask R_Heel: weight=1 apply=true
    IKMarkerTask R_Knee_Lat: weight=1 apply=true
    IKMarkerTask R_PSIS: weight=1 apply=true
    IKMarkerTask R_Shank_Front: weight=1 apply=true
    IKMarkerTask R_Shank_Rear: weight=1 apply=true
    IKMarkerTask R_Shank_Upper: weight=1 apply=true
    IKMarkerTask R_Thigh_Front: weight=1 apply=true
    IKMarkerTask R_Thigh_Rear: weight=1 apply=true
    IKMarkerTask R_Thigh_Upper: weight=1 apply=true
    IKMarkerTask R_Toe_Lat: weight=1 apply=true
    IKMarkerTask R_Toe_Med: weight=1 apply=true
    IKMarkerTask R_Toe_Tip: weight=1 apply=true
