# OpenSim document version 40000
ExternalLoads JA1Gait35:
  datafile: JA1Gait35_grf.mot
  ExternalForce [values shared by the 8 below unless stated]: force_expressed_in_body=ground
      point_expressed_in_body=ground
  ExternalForce ForcePlate1: applied_to_body=calcn_r force_identifier=ground_force_1_v
      point_identifier=ground_force_1_p torque_identifier=ground_force_1_m
  ExternalForce ForcePlate2: applied_to_body=talus_r force_identifier=ground_force_2_v
      point_identifier=ground_force_2_p torque_identifier=ground_force_2_m
  ExternalForce ForcePlate3: applied_to_body=calcn_l force_identifier=ground_force_3_v
      point_identifier=ground_force_3_p torque_identifier=ground_force_3_m
  ExternalForce ForcePlate4: applied_to_body=calcn_l force_identifier=ground_force_4_v
      point_identifier=ground_force_4_p torque_identifier=ground_force_4_m
  ExternalForce ForcePlate5: applied_to_body=calcn_r force_identifier=ground_force_5_v
      point_identifier=ground_force_5_p torque_identifier=ground_force_5_m
  ExternalForce ForcePlate6: applied_to_body=calcn_r force_identifier=ground_force_6_v
      point_identifier=ground_force_6_p torque_identifier=ground_force_6_m
  ExternalForce ForcePlate7: applied_to_body=talus_r force_identifier=ground_force_7_v
      point_identifier=ground_force_7_p torque_identifier=ground_force_7_m
  ExternalForce ForcePlate8: applied_to_body=calcn_l force_identifier=ground_force_8_v
      point_identifier=ground_force_8_p torque_identifier=ground_force_8_m
