# OpenSim document version 40000
InverseKinematicsTool JA1Gait35:
  model_file: Models/optimized_scale_and_markers.osim
  marker_file: ../MarkerData/JA1Gait35.trc
  output_motion_file: JA1Gait35_ik_by_opensim.mot
  accuracy: 1e-5
  report_errors: true
  IKTaskSet IK_tasks:
    IKMarkerTask BLFE: weight=1 apply=true
    IKMarkerTask BLHU: weight=1 apply=true
    IKMarkerTask BLTI: weight=1 apply=true
    IKMarkerTask BRFE: weight=1 apply=true
    IKMarkerTask BRHU: weight=1 apply=true
    IKMarkerTask BRTI: weight=1 apply=true
    IKMarkerTask C7: weight=1 apply=true
    IKMarkerTask CHIN: weight=1 apply=true
    IKMarkerTask CLAV: weight=1 apply=true
    IKMarkerTask FBBT: weight=1 apply=true
    IKMarkerTask FLFB: weight=1 apply=true
    IKMarkerTask FLFE: weight=1 apply=true
    IKMarkerTask FLHU: weight=1 apply=true
    IKMarkerTask FLTI: weight=1 apply=true
    IKMarkerTask FRBT: weight=1 apply=true
    IKMarkerTask FRFB: weight=1 apply=true
    IKMarkerTask FRFE: weight=1 apply=true
    IKMarkerTask FRHU: weight=1 apply=true
    IKMarkerTask FRTI: weight=1 apply=true
    IKMarkerTask LAKI: weight=1 apply=true
    IKMarkerTask LANK: weight=1 apply=true
    IKMarkerTask LARM: weight=1 apply=true
    IKMarkerTask LASI: weight=1 apply=true
    IKMarkerTask LBHD: weight=1 apply=true
    IKMarkerTask LBWT: weight=1 apply=true
    IKMarkerTask LELB: weight=1 apply=true
    IKMarkerTask LFHD: weight=1 apply=true
    IKMarkerTask LFIN: weight=1 apply=true
    IKMarkerTask LFOREARM: weight=1 apply=true
    IKMarkerTask LFRM: weight=1 apply=true
    IKMarkerTask LFWT: weight=1 apply=true
    IKMarkerTask LHEE: weight=1 apply=true
    IKMarkerTask LHEEL: weight=1 apply=true
    IKMarkerTask LHPI: weight=1 apply=true
    IKMarkerTask LHTH: weight=1 apply=true
    IKMarkerTask LKNE: weight=1 apply=true
    IKMarkerTask LKNI: weight=1 apply=true
    IKMarkerTask LLEPI: weight=1 apply=true
    IKMarkerTask LLMAL: weight=1 apply=true
    IKMarkerTask LMEPI: weight=1 apply=true
    IKMarkerTask LMFL: weight=1 apply=true
    IKMarkerTask LMFS: weight=1 apply=true
    IKMarkerTask LMMAL: weight=1 apply=true
    IKMarkerTask LMT5: weight=1 apply=true
    IKMarkerTask LP1MT: weight=1 apply=true
    IKMarkerTask LP5MT: weight=1 apply=true
    IKMarkerTask LSH: weight=1 apply=true
    IKMarkerTask LSHN: weight=1 apply=true
    IKMarkerTask LSHO: weight=1 apply=true
    IKMarkerTask LTHAD: weight=1 apply=true
    IKMarkerTask LTHAP: weight=1 apply=true
    IKMarkerTask LTHI: weight=1 apply=true
    IKMarkerTask LTHLD: weight=1 apply=true
    IKMarkerTask LTHLP: weight=1 apply=true
    IKMarkerTask LTIAD: weight=1 apply=true
    IKMarkerTask LTIAP: weight=1 apply=true
    IKMarkerTask LTILAT: weight=1 apply=true
    IKMarkerTask LTOE: weight=1 apply=true
    IKMarkerTask LUPA: weight=1 apply=true
    IKMarkerTask LWR: weight=1 apply=true
    IKMarkerTask LWRA: weight=1 apply=true
    IKMarkerTask LWRB: weight=1 apply=true
    IKMarkerTask MAN: weight=1 apply=true
    IKMarkerTask NOSE: weight=1 apply=true
    IKMarkerTask RAKI: weight=1 apply=true
    IKMarkerTask RANK: weight=1 apply=true
    IKMarkerTask RARM: weight=1 apply=true
    IKMarkerTask RASI: weight=1 apply=true
    IKMarkerTask RBAC: weight=1 apply=true
    IKMarkerTask RBHD: weight=1 apply=true
    IKMarkerTask RBWT: weight=1 apply=true
    IKMarkerTask RELB: weight=1 apply=true
    IKMarkerTask RFHD: weight=1 apply=true
    IKMarkerTask RFIN: weight=1 apply=true
    IKMarkerTask RFOREARM: weight=1 apply=true
    IKMarkerTask RFRM: weight=1 apply=true
    IKMarkerTask RFWT: weight=1 apply=true
    IKMarkerTask RHEE: weight=1 apply=true
    IKMarkerTask RHEEL: weight=1 apply=true
    IKMarkerTask RHPI: weight=1 apply=true
    IKMarkerTask RHTH: weight=1 apply=true
    IKMarkerTask RKNE: weight=1 apply=true
    IKMarkerTask RKNI: weight=1 apply=true
    IKMarkerTask RLEPI: weight=1 apply=true
    IKMarkerTask RLMAL: weight=1 apply=true
    IKMarkerTask RMEPI: weight=1 apply=true
    IKMarkerTask RMFL: weight=1 apply=true
    IKMarkerTask RMFS: weight=1 apply=true
    IKMarkerTask RMMAL: weight=1 apply=true
    IKMarkerTask RMT5: weight=1 apply=true
    IKMarkerTask RP1MT: weight=1 apply=true
    IKMarkerTask RP5MT: weight=1 apply=true
    IKMarkerTask RSH: weight=1 apply=true
    IKMarkerTask RSHN: weight=1 apply=true
    IKMarkerTask RSHO: weight=1 apply=true
    IKMarkerTask RTHAD: weight=1 apply=true
    IKMarkerTask RTHAP: weight=1 apply=true
    IKMarkerTask RTHI: weight=1 apply=true
    IKMarkerTask RTHLD: weight=1 apply=true
    IKMarkerTask RTHLP: weight=1 apply=true
    IKMarkerTask RTIAD: weight=1 apply=true
    IKMarkerTask RTIAP: weight=1 apply=true
    IKMarkerTask RTILAT: weight=1 apply=true
    IKMarkerTask RTOE: weight=1 apply=true
    IKMarkerTask RUPA: weight=1 apply=true
    IKMarkerTask RWR: weight=1 apply=true
    IKMarkerTask RWRA: weight=1 apply=true
    IKMarkerTask RWRB: weight=1 apply=true
    IKMarkerTask SACR: weight=1 apply=true
    IKMarkerTask STRN: weight=1 apply=true
    IKMarkerTask T10: weight=1 apply=true
    IKMarkerTask T7: weight=1 apply=true
    IKMarkerTask T8: weight=1 apply=true
    IKMarkerTask THD: weight=1 apply=true
