# OpenSim document version 40000
Model optimized_scale_and_markers:
  gravity: 0 -9.80665 0
  length_units: meters
  force_units: N
  credits:
    1. Rajagopal, A, Dembia, C.L., DeMers, M.S., Delp, D.D., Hicks, J.L., and Delp, S.L. 2. Ajay Seth, Meilin Dong, Ricardo Matias, Scott Delp. Parameters from van der Helm and Klein-Breteler
  publications:
    1. Rajagopal, Apoorva, et al. "Full-Body Musculoskeletal Model for Muscle-Driven Simulation of Human Gait." IEEE Transactions on Biomedical Engineering 63.10 (2016): 2068-2079. (2016) 2. Seth, et al. "Muscle Contributions to Upper-Extremity Movement and Work From a Musculoskeletal Model of the Human Shoulder". Frontiers in Neurorobotics (2019). Parameters from van der Helm 1994, Klein-Breteler et al. 1996.
  defaults:
    CoordinateActuator default: optimal_force=300
    Millard2012EquilibriumMuscle default: min_control=0.01 optimal_force=1 max_isometric_force=546
        optimal_fiber_length=0.0535 tendon_slack_length=0.078 pennation_angle_at_optimal=0 [radians]
        max_contraction_velocity=10
  Ground
  BodySet:
    Body pelvis: mass=8.074173 [kg] mass_center=(-0.06699104 0 0) inertia=(0.07005462 0.07005462 0.03713132 0 0 0)
        meshes=(r_pelvis.vtp l_pelvis.vtp sacrum.vtp)
      WrapCylinder Gmax1_at_pelvis_r: xyz_body_rotation=(-0.6 0.45 0) translation=(-0.07296054 -0.0977319 0.06151485)
          quadrant=-x radius=0.03904078 length=0.1487538
      WrapCylinder Gmax2_at_pelvis_r: xyz_body_rotation=(-0.75 0.39 0) translation=(-0.07580316 -0.08193684 0.06857393)
          quadrant=all radius=0.03904425 length=0.09914022
      WrapCylinder Gmax3_at_pelvis_r: xyz_body_rotation=(-0.1 0 0) translation=(-0.07864578 -0.0868728 0.06857393)
          quadrant=all radius=0.03869889 length=0.1008231
      WrapCylinder Gmax1_at_pelvis_l: xyz_body_rotation=(0.6 -0.45 0) translation=(-0.07296054 -0.0977319 -0.06151485)
          quadrant=-x radius=0.03904078 length=0.1487538
      WrapCylinder Gmax2_at_pelvis_l: xyz_body_rotation=(0.75 -0.39 0)
          translation=(-0.07580316 -0.08193684 -0.06857393) quadrant=all radius=0.03904425 length=0.09914022
      WrapCylinder Gmax3_at_pelvis_l: xyz_body_rotation=(0.1 0 0) translation=(-0.07864578 -0.0868728 -0.06857393)
          quadrant=all radius=0.03869889 length=0.1008231
      WrapCylinder PS_at_brim_r: xyz_body_rotation=(-0.25 -0.27 0.1) translation=(-0.07011792 -0.05923145 0.06615367)
          quadrant=-y radius=0.0485103 length=0.1003028
      WrapCylinder PS_at_brim_l: xyz_body_rotation=(0.25 0.27 0.1) translation=(-0.07011792 -0.05923145 -0.06615367)
          quadrant=-y radius=0.0485103 length=0.1003028
      WrapCylinder IL_at_brim_r: xyz_body_rotation=(-0.32 -0.24 0.9) translation=(-0.0672753 -0.06416741 0.07623807)
          quadrant=-y radius=0.05327069 length=0.1003126
      WrapCylinder IL_at_brim_l: xyz_body_rotation=(0.32 0.24 0.9) translation=(-0.0672753 -0.06416741 -0.07623807)
          quadrant=-y radius=0.05327069 length=0.1003126
    Body femur_r: mass=8.879519 mass_center=(0 -0.1847694 0) inertia=(0.151458 0.04049426 0.151458 0 0 0)
        meshes=r_femur.vtp
      WrapCylinder Gastroc_at_condyles_r: translation=(0.00557155 -0.4456203 0) quadrant=all radius=0.02751486
          length=0.1084524
      WrapCylinder KnExt_at_fem_r: xyz_body_rotation=(-0.0623366 0.0507601 0)
          translation=(0.003998456 -0.4377208 0.002267859) quadrant=all radius=0.0275138 length=0.1084611
      WrapCylinder AB_at_femshaft_r: xyz_body_rotation=(1.66157 0.186644 0)
          translation=(0.01631729 -0.1223771 0.02533991) quadrant=all radius=0.01813284 length=0.07614713
      WrapCylinder AL_at_femshaft_r: xyz_body_rotation=(1.77711 0.136489 0)
          translation=(0.03424575 -0.252057 0.01639117) quadrant=all radius=0.02209422 length=0.1087296
      WrapCylinder AMprox_at_femshaft_r: xyz_body_rotation=(1.61126 0.18656 0)
          translation=(0.005775457 -0.07922781 0.02755017) quadrant=all radius=0.0231879 length=0.07614811
      WrapCylinder AMmid_at_femshaft_r: xyz_body_rotation=(1.61139 0.13656 0)
          translation=(0.02564306 -0.1746734 0.02232406) quadrant=all radius=0.02352219 length=0.1304868
      WrapCylinder AMdist_at_femshaft_r: xyz_body_rotation=(1.71188 0.186636 0)
          translation=(0.03521944 -0.2833884 0.01015613) quadrant=all radius=0.02395761 length=0.217558
      WrapCylinder AMisch_at_condyles_r: xyz_body_rotation=(1.71115 -0.463363 0)
          translation=(-0.02524035 -0.4095696 -0.00342099) quadrant=all radius=0.04386891 length=0.2621705
      WrapCylinder PECT_at_femshaft_r: xyz_body_rotation=(1.81295 0.276344 0)
          translation=(0.006781389 -0.0918444 0.03301346) quadrant=all radius=0.01647706 length=0.05444098
    Body tibia_r: mass=3.166639 mass_center=(0 -0.2080148 0) inertia=(0.05303124 0.004594521 0.05303124 0 0 0)
        meshes=(r_tibia.vtp r_fibula.vtp)
      WrapCylinder GasLat_at_shank_r: xyz_body_rotation=(2.96723 -0.279725 -1.47812)
          translation=(-0.007653897 -0.08244827 -0.003365238) quadrant=-y radius=0.05898697 length=0.1023624
      WrapCylinder GasMed_at_shank_r: xyz_body_rotation=(2.96723 0.0279725 -1.47812)
          translation=(-0.007653897 -0.08244827 -0.003365238) quadrant=-y radius=0.05900908 length=0.1022746
      WrapCylinder GR_at_condyles_r: xyz_body_rotation=(0 -0.4 0) translation=(-0.003102931 -0.02228332 0) quadrant=all
          radius=0.03863312 length=0.1021987
      WrapCylinder SM_at_condyles_r: xyz_body_rotation=(0 -0.1 0) translation=(-0.00103431 -0.02228332 0) quadrant=all
          radius=0.03781065 length=0.1019915
      WrapCylinder ST_at_condyles_r: xyz_body_rotation=(0 -0.2 0) translation=(-0.002068621 -0.0228404 0) quadrant=all
          radius=0.045643 length=0.1020347
      WrapCylinder BF_at_gastroc_r: translation=(-0.05999 -0.06684995 0) quadrant=y radius=0.03222714 length=0.1529654
    Body patella_r: mass=0.06265015 mass_center=(0.0018 0.0264 0) inertia=(2.085916e-6 9.528346e-6 9.528346e-6 0 0 0)
        meshes=r_patella.vtp
    Body talus_r: mass=0.05003872 mass_center=(0 0 0) inertia=(0.0004129205 0.0003806162 0.0003806162 0 0 0)
        meshes=r_talus.vtp
    Body calcn_r: mass=1.274227 mass_center=(0.1438113 0.03042191 0)
        inertia=(0.001391854 0.007442338 0.007442338 0 0 0) meshes=r_foot.vtp
    Body toes_r: mass=0.1637998 mass_center=(0.03505305 0.006116283 -0.01763162)
        inertia=(7.76686e-5 0.0001552592 0.0001552592 0 0 0) meshes=r_bofoot.vtp
    Body femur_l: mass=8.879519 mass_center=(0 -0.1847694 0) inertia=(0.151458 0.04049426 0.151458 0 0 0)
        meshes=l_femur.vtp
      WrapCylinder Gastroc_at_condyles_l: translation=(0.00557155 -0.4456203 0) quadrant=all radius=0.02751486
          length=0.1084524
      WrapCylinder KnExt_at_fem_l: xyz_body_rotation=(0.0623366 -0.0507601 0)
          translation=(0.003998456 -0.4377208 -0.002267859) quadrant=all radius=0.0275138 length=0.1084611
      WrapCylinder AB_at_femshaft_l: xyz_body_rotation=(-1.66157 -0.186644 0)
          translation=(0.01631729 -0.1223771 -0.02533991) quadrant=all radius=0.01813284 length=0.07614713
      WrapCylinder AL_at_femshaft_l: xyz_body_rotation=(-1.77711 -0.136489 0)
          translation=(0.03424575 -0.252057 -0.01639117) quadrant=all radius=0.02209422 length=0.1087296
      WrapCylinder AMprox_at_femshaft_l: xyz_body_rotation=(-1.61126 -0.18656 0)
          translation=(0.005775457 -0.07922781 -0.02755017) quadrant=all radius=0.0231879 length=0.07614811
      WrapCylinder AMmid_at_femshaft_l: xyz_body_rotation=(-1.61139 -0.13656 0)
          translation=(0.02564306 -0.1746734 -0.02232406) quadrant=all radius=0.02352219 length=0.1304868
      WrapCylinder AMdist_at_femshaft_l: xyz_body_rotation=(-1.71188 -0.186636 0)
          translation=(0.03521944 -0.2833884 -0.01015613) quadrant=all radius=0.02395761 length=0.217558
      WrapCylinder AMisch_at_condyles_l: xyz_body_rotation=(-1.71115 0.463363 0)
          translation=(-0.02524035 -0.4095696 0.00342099) quadrant=all radius=0.04386891 length=0.2621705
      WrapCylinder PECT_at_femshaft_l: xyz_body_rotation=(-1.81295 -0.276344 0)
          translation=(0.006781389 -0.0918444 -0.03301346) quadrant=all radius=0.01647706 length=0.05444098
    Body tibia_l: mass=3.166639 mass_center=(0 -0.2080148 0) inertia=(0.05303124 0.004594521 0.05303124 0 0 0)
        meshes=(l_tibia.vtp l_fibula.vtp)
      WrapCylinder GasLat_at_shank_l: xyz_body_rotation=(-2.96723 0.279725 -1.47812)
          translation=(-0.007653897 -0.08244827 0.003365238) quadrant=-y radius=0.05898697 length=0.1023624
      WrapCylinder GasMed_at_shank_l: xyz_body_rotation=(-2.96723 -0.0279725 -1.47812)
          translation=(-0.007653897 -0.08244827 0.003365238) quadrant=-y radius=0.05900908 length=0.1022746
      WrapCylinder GR_at_condyles_l: xyz_body_rotation=(0 0.4 0) translation=(-0.003102931 -0.02228332 0) quadrant=all
          radius=0.03863312 length=0.1021987
      WrapCylinder SM_at_condyles_l: xyz_body_rotation=(0 0.1 0) translation=(-0.00103431 -0.02228332 0) quadrant=all
          radius=0.03781065 length=0.1019915
      WrapCylinder ST_at_condyles_l: xyz_body_rotation=(0 0.2 0) translation=(-0.002068621 -0.0228404 0) quadrant=all
          radius=0.045643 length=0.1020347
      WrapCylinder BF_at_gastroc_l: translation=(-0.05999 -0.06684995 0) quadrant=all radius=0.03222714
          length=0.1529654
    Body patella_l: mass=0.06265015 mass_center=(0.0018 0.0264 0) inertia=(2.085916e-6 9.528346e-6 9.528346e-6 0 0 0)
        meshes=l_patella.vtp
    Body talus_l: mass=0.05003872 mass_center=(0 0 0) inertia=(0.0004129205 0.0003806162 0.0003806162 0 0 0)
        meshes=l_talus.vtp
    Body calcn_l: mass=1.274227 mass_center=(0.1438113 0.03042191 0)
        inertia=(0.001391854 0.007442338 0.007442338 0 0 0) meshes=l_foot.vtp
    Body toes_l: mass=0.1637998 mass_center=(0.03505305 0.006116283 0.01763162)
        inertia=(7.76686e-5 0.0001552592 0.0001552592 0 0 0) meshes=l_bofoot.vtp
    Body head: mass=4.907982 mass_center=(0 0.1352322 0) inertia=(0.02643772 0.02457633 0.02643772 0 0 0)
      PhysicalOffsetFrame thorax_offset: socket_parent=.. translation=(0.02589775 -0.5908897 0) [meters]
          meshes=(hat_skull.vtp hat_jaw.vtp)
    Body lumbar_body: mass=3.512304 mass_center=(0 0 0) inertia=(0.6862738 0.6868974 0.6868974 0 0 0)
      PhysicalOffsetFrame thorax_offset: socket_parent=.. translation=(0 0 0)
    Body thorax: mass=17.94653 mass_center=(0 0 0) inertia=(1.006443 1.046865 1.046865 0 0 0)
      PhysicalOffsetFrame thorax_offset: socket_parent=.. translation=(0.05503854 -0.009043239 0) meshes=thorax.vtp
    Body scapula_r: mass=0.268633 mass_center=(-0.04448064 -0.03774943 -0.03675326)
        inertia=(0.0004460442 0.0003000555 0.0004460442 0 0 0) meshes=scapula.vtp
      PhysicalOffsetFrame cp_in_scapula_r: socket_parent=.. translation=(-0.01103685 0.0001185349 -0.01280469)
      WrapCylinder Subscapuralis_r: xyz_body_rotation=(1 -1 1) translation=(-0.02041527 -0.04202546 -0.02386892)
          quadrant=-y radius=0.01172256 length=0.0751147
      WrapCylinder Tmajscapula_r: xyz_body_rotation=(-1.4854 -0.3354 -0.8754)
          translation=(-0.07262972 -0.114445 -0.04210687) quadrant=-y radius=0.00640918 length=0.05284478
      WrapEllipsoid deltsca_r: xyz_body_rotation=(1.4823 0.1606 -0.4472)
          translation=(-0.02789694 -0.03599298 -0.03723223) quadrant=all dimensions=(0.03315734 0.07630695 0.03215001)
      WrapCylinder Infra_r: xyz_body_rotation=(1.87 -0.543 -2.355) translation=(-0.04727029 -0.04946343 -0.03836693)
          quadrant=-y radius=0.01724927 length=0.1011033
      WrapCylinder TRIlongglen_r: xyz_body_rotation=(1.375319 -0.2946116 2.435956)
          translation=(-0.02919844 -0.03329753 -0.01109796) quadrant=x radius=0.002533022 length=0.03151247
    Body scapula_l: mass=0.268633 mass_center=(-0.04448064 -0.03774943 0.03675326)
        inertia=(0.0004460442 0.0003000555 0.0004460442 0 0 0) meshes=scapula_l.vtp
      PhysicalOffsetFrame cp_in_scapula_l: socket_parent=.. translation=(-0.01103685 0.0001185349 0.01280469)
      WrapCylinder Subscapuralis_l: xyz_body_rotation=(-1 1 1) translation=(-0.02041527 -0.04202546 0.02386892)
          quadrant=-y radius=0.01172256 length=0.0751147
      WrapCylinder Tmajscapula_l: xyz_body_rotation=(1.4854 0.3354 -0.8754)
          translation=(-0.07262972 -0.114445 0.04210687) quadrant=-y radius=0.00640918 length=0.05284478
      WrapEllipsoid deltsca_l: xyz_body_rotation=(-1.4823 -0.1606 -0.4472)
          translation=(-0.02789694 -0.03599298 0.03723223) quadrant=all dimensions=(0.03315734 0.07630695 0.03215001)
      WrapCylinder Infra_l: xyz_body_rotation=(-1.87 0.543 -2.355) translation=(-0.04727029 -0.04946343 0.03836693)
          quadrant=-y radius=0.01724927 length=0.1011033
      WrapCylinder TRIlongglen_l: xyz_body_rotation=(-1.375319 0.2946116 2.435956)
          translation=(-0.02919844 -0.03329753 0.01109796) quadrant=x radius=0.002533022 length=0.03151247
    Body humerus_r: mass=1.761135 mass_center=(0.01822566 -0.1338213 -0.01704713)
        inertia=(0.0103604 0.003034637 0.0103604 -0.0002952255 -0.0002765789 0.0001383729) meshes=humerus.vtp
      WrapSphere hhead_r: translation=(-0.003229354 0.004680417 -0.002674067) quadrant=all radius=0.02700514
      WrapSphere hheadsupraTminor_r: translation=(-0.0008073386 0.004584895 0.003075179) quadrant=all radius=0.025831
      WrapEllipsoid hheadInfra_r: xyz_body_rotation=(0.1419 0.13474 0.28117)
          translation=(0.0001009167 0.0009551868 -0.006417766) quadrant=all dimensions=(0.03005332 0.02273249 0.04006)
      WrapEllipsoid TRIlonghh_r: xyz_body_rotation=(3.001617 -0.853466 2.574186)
          translation=(-0.007871548 -0.003916244 -0.001871859) quadrant=z dimensions=(0.04110208 0.01995899 0.02318183)
      WrapCylinder TRI_r: xyz_body_rotation=(-0.1401499 -0.00628319 0.1549852)
          translation=(0.002825684 -0.2788175 -0.0159108) quadrant=all radius=0.01578657 length=0.05322511
      WrapEllipsoid BIClong_r: xyz_body_rotation=(-2.00434 -1.00164 0.975465)
          translation=(0.00333027 0.004775908 0.0004011125) quadrant=-y dimensions=(0.03270797 0.01974127 0.02032231)
      WrapEllipsoid Elbow_Biceps_Brachioradialis_r: xyz_body_rotation=(-0.1286308 0.1375319 0.03071779)
          translation=(0.001917428 -0.2760475 -0.01871859) quadrant=x dimensions=(0.01524885 0.01443385 0.1326307)
      WrapEllipsoid anconeus_r: xyz_body_rotation=(0.00750492 -0.1966986 1.049292)
          translation=(0.01352292 -0.2732774 -0.001069633) quadrant=-x dimensions=(0.01946414 0.02013055 0.02651982)
      WrapEllipsoid Elbow_pronatorteres_extensorcarpiradialislongus_r: xyz_body_rotation=(-0.1610939 -0.1108284 0.6145304)
          translation=(0.003027518 -0.2743281 -0.009225588) quadrant=x dimensions=(0.01784013 0.02475051 0.0463803)
    Body humerus_l: mass=1.761135 mass_center=(0.01822566 -0.1338213 0.01704713)
        inertia=(0.0103604 0.003034637 0.0103604 -0.0002952255 -0.0002765789 0.0001383729) meshes=humerus_l.vtp
      WrapSphere hhead_l: translation=(-0.003229354 0.004680417 0.002674067) quadrant=all radius=0.02700514
      WrapSphere hheadsupraTminor_l: translation=(-0.0008073386 0.004584895 -0.003075179) quadrant=all radius=0.025831
      WrapEllipsoid hheadInfra_l: xyz_body_rotation=(-0.1419 -0.13474 0.28117)
          translation=(0.0001009167 0.0009551868 0.006417766) quadrant=all dimensions=(0.03005332 0.02273249 0.04006)
      WrapEllipsoid TRIlonghh_l: xyz_body_rotation=(-3.001617 -2.288127 -2.574186)
          translation=(-0.007871548 -0.003916244 0.001871859) quadrant=z dimensions=(0.04110208 0.01995899 0.02318183)
      WrapCylinder TRI_l: xyz_body_rotation=(0.1401499 0.00628319 0.1549852)
          translation=(0.002825684 -0.2788175 0.0159108) quadrant=all radius=0.01578657 length=0.05322511
      WrapEllipsoid BIClong_l: xyz_body_rotation=(2.00434 1.00164 0.975465)
          translation=(0.00333027 0.004775908 -0.0004011125) quadrant=-y dimensions=(0.03270797 0.01974127 0.02032231)
      WrapEllipsoid Elbow_Biceps_Brachioradialis_l: xyz_body_rotation=(0.1286308 -0.1375319 0.03071779)
          translation=(0.001917428 -0.2760475 0.01871859) quadrant=x dimensions=(0.01524885 0.01443385 0.1326307)
      WrapEllipsoid anconeus_l: xyz_body_rotation=(-0.00750492 0.1966986 1.049292)
          translation=(0.01352292 -0.2732774 0.001069633) quadrant=-x dimensions=(0.01946414 0.02013055 0.02651982)
      WrapEllipsoid Elbow_pronatorteres_extensorcarpiradialislongus_l: xyz_body_rotation=(0.1610939 0.1108284 0.6145304)
          translation=(0.003027518 -0.2743281 0.009225588) quadrant=x dimensions=(0.01784013 0.02475051 0.0463803)
    Body ulna_r: mass=0.6573258 mass_center=(0.008766935 -0.09826774 0.02426786)
        inertia=(0.00332593 0.0006180231 0.00332593 0.0001741244 -4.081739e-5 0.0006644971) meshes=ulna.vtp
      WrapCylinder pronatorquadratus2_r: xyz_body_rotation=(1.391376 0.06894051 1.522451)
          translation=(-0.00108256 -0.2142534 0.04276099) quadrant=all radius=0.006659324 length=0.01022825
    Body ulna_l: mass=0.6573258 mass_center=(0.008766935 -0.09826774 -0.02426786)
        inertia=(0.00332593 0.0006180231 0.00332593 0.0001741244 -4.081739e-5 0.0006644971) meshes=ulna_l.vtp
      WrapCylinder pronatorquadratus2_l: xyz_body_rotation=(-1.391376 -0.06894051 1.522451)
          translation=(-0.00108256 -0.2142534 -0.04276099) quadrant=all radius=0.006659324 length=0.01022825
    Body radius_r: mass=0.1389227 mass_center=(0.03033876 -0.1859457 0.01558578)
        inertia=(0.0002594728 0.0002594728 2.212133e-5 1.656077e-5 -2.272695e-6 3.905442e-5) meshes=radius.vtp
      WrapCylinder supinator_r: xyz_body_rotation=(1.447751 0.3040364 -2.441017)
          translation=(0.004059602 -0.0447556 0.005894622) quadrant=-x radius=0.007660195 length=0.04053903
      WrapCylinder pronatorquadratus1_r: xyz_body_rotation=(-1.607623 -0.0127409 -2.690251)
          translation=(0.02534996 -0.2033973 0.02877375) quadrant=all radius=0.009514009 length=0.01024103
      WrapTorus extensorcarpiulnaris_r: xyz_body_rotation=(-0.9866346 -0.1488766 0.222704)
          translation=(-0.01470478 -0.2475384 0.03486819) quadrant=all inner_radius=0.005736501
          outer_radius=0.008604752
    Body radius_l: mass=0.1389227 mass_center=(0.03033876 -0.1859457 -0.01558578)
        inertia=(0.0002594728 0.0002594728 2.212133e-5 1.656077e-5 -2.272695e-6 3.905442e-5) meshes=radius_l.vtp
      WrapCylinder supinator_l: xyz_body_rotation=(-1.447751 -0.3040364 -2.441017)
          translation=(0.004059602 -0.0447556 -0.005894622) quadrant=-x radius=0.007660195 length=0.04053903
      WrapCylinder pronatorquadratus1_l: xyz_body_rotation=(1.607623 0.0127409 -2.690251)
          translation=(0.02534996 -0.2033973 -0.02877375) quadrant=all radius=0.009514009 length=0.01024103
      WrapTorus extensorcarpiulnaris_l: xyz_body_rotation=(0.9866346 0.1488766 0.222704)
          translation=(-0.01470478 -0.2475384 -0.03486819) quadrant=all inner_radius=0.005736501
          outer_radius=0.008604752
    Body hand_r: mass=0.3566164 mass_center=(0.0006106777 -0.09211055 -0.03714956)
        inertia=(0.0004494284 0.0001339771 0.0004494284 0 0 0)
        meshes=(pisiform.vtp scaphoid.vtp triquetrum.vtp hamate.vtp capitate.vtp trapezoid.vtp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)
      WrapTorus extensorcarpiradialislongus_r: xyz_body_rotation=(1.53833 0.234398 0.731118)
          translation=(0.02259507 -0.0199488 0.02117016) quadrant=all inner_radius=0.008142369 outer_radius=0.01628474
      WrapTorus extensorcarpiradialisbrevis_r: xyz_body_rotation=(1.31266 -0.11781 -0.116239)
          translation=(0.01282423 -0.01007618 0.01893101) quadrant=all inner_radius=0.008142369 outer_radius=0.01017796
      WrapTorus flexorcarpiradialis_r: xyz_body_rotation=(-1.55596 -0.15324 -0.100007)
          translation=(0.003256948 -0.004580083 -0.01933813) quadrant=all inner_radius=0.001017796
          outer_radius=0.00254449
      WrapTorus flexorcarpiulnaris_r: xyz_body_rotation=(-1.57376 -0.0797616 0.39235)
          translation=(-0.01251889 -0.01770965 -0.01740431) quadrant=all inner_radius=0.006921014
          outer_radius=0.008142369
      WrapEllipsoid palmarislongus_r: xyz_body_rotation=(-0.03159046 0.0996583 0.06335545)
          translation=(0.005801438 -0.01832033 -0.004172964) quadrant=-z dimensions=(0.0254449 0.01424915 0.01221355)
    Body hand_l: mass=0.3566164 mass_center=(0.0006106777 -0.09211055 0.03714956)
        inertia=(0.0004494284 0.0001339771 0.0004494284 0 0 0)
        meshes=(pisiform_l.vtp scaphoid_l.vtp triquetrum_l.vtp hamate_l.vtp capitate_l.vtp trapezoid_l.vtp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)
      WrapTorus extensorcarpiradialislongus_l: xyz_body_rotation=(-1.53833 -0.234398 0.731118)
          translation=(0.02259507 -0.0199488 -0.02117016) quadrant=all inner_radius=0.008142369 outer_radius=0.01628474
      WrapTorus extensorcarpiradialisbrevis_l: xyz_body_rotation=(-1.31266 0.11781 -0.116239)
          translation=(0.01282423 -0.01007618 -0.01893101) quadrant=all inner_radius=0.008142369
          outer_radius=0.01017796
      WrapTorus flexorcarpiradialis_l: xyz_body_rotation=(1.55596 0.15324 -0.100007)
          translation=(0.003256948 -0.004580083 0.01933813) quadrant=all inner_radius=0.001017796
          outer_radius=0.00254449
      WrapTorus flexorcarpiulnaris_l: xyz_body_rotation=(1.57376 0.0797616 0.39235)
          translation=(-0.01251889 -0.01770965 0.01740431) quadrant=all inner_radius=0.006921014
          outer_radius=0.008142369
      WrapEllipsoid palmarislongus_l: xyz_body_rotation=(0.03159046 -0.0996583 0.06335545)
          translation=(0.005801438 -0.01832033 0.004172964) quadrant=-z dimensions=(0.0254449 0.01424915 0.01221355)
  JointSet:
    CustomJoint ground_pelvis: socket_parent_frame=ground_offset socket_child_frame=pelvis_offset
      Coordinate pelvis_tilt: default_value=0 range=(-3.141593 3.141593) clamped=true
      Coordinate pelvis_list: default_value=0 range=(-3.141593 3.141593) clamped=true
      Coordinate pelvis_rotation: default_value=0 range=(-3.141593 3.141593) clamped=true
      Coordinate pelvis_tx: default_value=0 range=(-500 500) clamped=true
      Coordinate pelvis_ty: default_value=0.94 range=(-5 20) clamped=true
      Coordinate pelvis_tz: default_value=0 range=(-500 500) clamped=true
      PhysicalOffsetFrame ground_offset: socket_parent=/ground translation=(0 0 0)
      PhysicalOffsetFrame pelvis_offset: socket_parent=/bodyset/pelvis translation=(0 0 0)
      SpatialTransform:
        TransformAxis rotation1: coordinates=pelvis_tilt axis=(0 0 1) LinearFunction(coefficients=1 0)
        TransformAxis rotation2: coordinates=pelvis_list axis=(1 0 0) LinearFunction(coefficients=1 0)
        TransformAxis rotation3: coordinates=pelvis_rotation axis=(0 1 0) LinearFunction(coefficients=1 0)
        TransformAxis translation1: coordinates=pelvis_tx axis=(1 0 0) LinearFunction(coefficients=1 0)
        TransformAxis translation2: coordinates=pelvis_ty axis=(0 1 0) LinearFunction(coefficients=1 0)
        TransformAxis translation3: coordinates=pelvis_tz axis=(0 0 1) LinearFunction(coefficients=1 0)
    CustomJoint hip_r: socket_parent_frame=pelvis_offset socket_child_frame=femur_r_offset
      Coordinate hip_flexion_r: default_value=0 range=(-0.5235988 2.094395) clamped=true
      Coordinate hip_adduction_r: default_value=0 range=(-0.8726646 0.5235988) clamped=true
      Coordinate hip_rotation_r: default_value=0 range=(-0.6981317 0.6981317) clamped=true
      PhysicalOffsetFrame pelvis_offset: socket_parent=/bodyset/pelvis translation=(-0.05332373 -0.07748461 0.07791208)
      PhysicalOffsetFrame femur_r_offset: socket_parent=/bodyset/femur_r translation=(0 0 0)
      SpatialTransform: axes_held_at_zero=(translation1 translation2 translation3)
        TransformAxis rotation1: coordinates=hip_flexion_r axis=(0 0 1) LinearFunction(coefficients=1 0)
        TransformAxis rotation2: coordinates=hip_adduction_r axis=(1 0 0) LinearFunction(coefficients=1 0)
        TransformAxis rotation3: coordinates=hip_rotation_r axis=(0 1 0) LinearFunction(coefficients=1 0)
    CustomJoint walker_knee_r: socket_parent_frame=femur_r_offset socket_child_frame=tibia_r_offset
      Coordinate knee_angle_r: default_value=0 range=(0 2.9) clamped=true
      PhysicalOffsetFrame femur_r_offset: socket_parent=/bodyset/femur_r
          translation=(-0.009014767 -0.443403 -0.002982441) orientation=(-1.64157 1.44618 1.5708) [radians]
      PhysicalOffsetFrame tibia_r_offset: socket_parent=/bodyset/tibia_r
          translation=(-0.008367095 -0.003938353 -0.001514092) orientation=(-1.64157 1.44618 1.5708)
      SpatialTransform: axes_held_at_zero=translation3
        TransformAxis rotation1: coordinates=knee_angle_r axis=(1 0 0) LinearFunction(coefficients=1 0)
        TransformAxis rotation2: coordinates=knee_angle_r axis=(0 0 1)
          SimmSpline: x=(0 0.174533 0.349066 0.523599 0.698132 0.872665 1.0472 1.22173 1.39626 1.5708 1.74533 1.91986 2.0944)
              y=(0 0.0126809 0.0226969 0.0296054 0.0332049 0.0335354 0.0308779 0.0257548 0.0189295 0.011407 0.00443314 -0.00050475 -0.0016782)
        TransformAxis rotation3: coordinates=knee_angle_r axis=(0 1 0)
          SimmSpline: x=(0 0.174533 0.349066 0.523599 0.698132 0.872665 1.0472 1.22173 1.39626 1.5708 1.74533 1.91986 2.0944)
              y=(0 0.059461 0.109399 0.150618 0.18392 0.210107 0.229983 0.24435 0.254012 0.25977 0.262428 0.262788 0.261654)
        TransformAxis translation1: coordinates=knee_angle_r axis=(0 1 0)
          MultiplierFunction: scale=1.086879
            SimmSpline: x=(0 0.174533 0.349066 0.523599 0.698132 0.872665 1.0472 1.22173 1.39626 1.5708 1.74533 1.91986 2.0944)
                y=(0 0.000479 0.000835 0.001086 0.001251 0.001346 0.001391 0.001403 0.0014 0.0014 0.001421 0.001481 0.001599)
        TransformAxis translation2: coordinates=knee_angle_r axis=(0 0 1)
          MultiplierFunction: scale=1.084524
            SimmSpline: x=(0 0.174533 0.349066 0.523599 0.698132 0.872665 1.0472 1.22173 1.39626 1.5708 1.74533 1.91986 2.0944)
                y=(0 0.000988 0.001899 0.002734 0.003492 0.004173 0.004777 0.005305 0.005756 0.00613 0.006427 0.006648 0.006792)
    CustomJoint patellofemoral_r: socket_parent_frame=femur_r_offset socket_child_frame=patella_r_offset
      Coordinate knee_angle_r_beta: default_value=0 range=(-99999.9 99999.9) clamped=false
      PhysicalOffsetFrame femur_r_offset: socket_parent=/bodyset/femur_r
          translation=(-0.009014767 -0.443403 -0.002982441)
      PhysicalOffsetFrame patella_r_offset: socket_parent=/bodyset/patella_r translation=(0 0 0)
      SpatialTransform: axes_held_at_zero=(rotation2 rotation3)
        TransformAxis rotation1: coordinates=knee_angle_r_beta axis=(0 0 1)
          SimmSpline: x=(0 0.174533 0.349066 0.523599 0.698132 0.872665 1.0472 1.22173 1.39626 1.5708 1.74533 1.91986 2.0944)
              y=(0.00113686 -0.00629212 -0.105582 -0.253683 -0.414245 -0.579047 -0.747244 -0.91799 -1.09044 -1.26379 -1.43763 -1.61186 -1.78634)
        TransformAxis translation1: coordinates=knee_angle_r_beta axis=(1 0 0)
          MultiplierFunction: scale=1.11431
            SimmSpline: x=(0 0.174533 0.349066 0.523599 0.698132 0.872665 1.0472 1.22173 1.39626 1.5708 1.74533 1.91986 2.0944)
                y=(0.0524 0.0488 0.0437 0.0371 0.0296 0.0216 0.0136 0.0057 -0.0019 -0.0088 -0.0148 -0.0196 -0.0227)
        TransformAxis translation2: coordinates=knee_angle_r_beta axis=(0 1 0)
          MultiplierFunction: scale=1.086879
            SimmSpline: x=(0 0.174533 0.349066 0.523599 0.698132 0.872665 1.0472 1.22173 1.39626 1.5708 1.74533 1.91986 2.0944)
                y=(-0.0108 -0.019 -0.0263 -0.0322 -0.0367 -0.0395 -0.0408 -0.0404 -0.0384 -0.0349 -0.0301 -0.0245 -0.0187)
        TransformAxis translation3: axis=(0 0 1) MultiplierFunction(scale=1.084524, Constant(value=0.00275))
    PinJoint ankle_r: socket_parent_frame=tibia_r_offset socket_child_frame=talus_r_offset
      Coordinate ankle_angle_r: default_value=0 range=(-0.6981317 0.5235988) clamped=true
      PhysicalOffsetFrame tibia_r_offset: socket_parent=/bodyset/tibia_r translation=(-0.0103431 -0.4456663 0)
          orientation=(0.175895 -0.105208 0.0186622)
      PhysicalOffsetFrame talus_r_offset: socket_parent=/bodyset/talus_r translation=(0 0 0)
          orientation=(0.175895 -0.105208 0.0186622)
    PinJoint subtalar_r: socket_parent_frame=talus_r_offset socket_child_frame=calcn_r_offset
      Coordinate subtalar_angle_r: default_value=0 range=(-0.3490659 0.3490659) clamped=true
      PhysicalOffsetFrame talus_r_offset: socket_parent=/bodyset/talus_r
          translation=(-0.04068963 -0.03867328 0.007089351) orientation=(-1.76819 0.906223 1.8196)
      PhysicalOffsetFrame calcn_r_offset: socket_parent=/bodyset/calcn_r translation=(0 0 0)
          orientation=(-1.76819 0.906223 1.8196)
    PinJoint mtp_r: socket_parent_frame=calcn_r_offset socket_child_frame=toes_r_offset
      Coordinate mtp_angle_r: default_value=0 range=(-0.5235988 0.5235988) clamped=true
      PhysicalOffsetFrame calcn_r_offset: socket_parent=/bodyset/calcn_r
          translation=(0.2571346 -0.002028127 0.001038694) orientation=(-3.14159 0.619901 0)
      PhysicalOffsetFrame toes_r_offset: socket_parent=/bodyset/toes_r translation=(0 0 0)
          orientation=(-3.14159 0.619901 0)
    CustomJoint hip_l: socket_parent_frame=pelvis_offset socket_child_frame=femur_l_offset
      Coordinate hip_flexion_l: default_value=0 range=(-0.5235988 2.094395) clamped=true
      Coordinate hip_adduction_l: default_value=0 range=(-0.8726646 0.5235988) clamped=true
      Coordinate hip_rotation_l: default_value=0 range=(-0.6981317 0.6981317) clamped=true
      PhysicalOffsetFrame pelvis_offset: socket_parent=/bodyset/pelvis
          translation=(-0.05332373 -0.07748461 -0.07791208)
      PhysicalOffsetFrame femur_l_offset: socket_parent=/bodyset/femur_l translation=(0 0 0)
      SpatialTransform: axes_held_at_zero=(translation1 translation2 translation3)
        TransformAxis rotation1: coordinates=hip_flexion_l axis=(0 0 1) LinearFunction(coefficients=1 0)
        TransformAxis rotation2: coordinates=hip_adduction_l axis=(1 0 0) LinearFunction(coefficients=-1 0)
        TransformAxis rotation3: coordinates=hip_rotation_l axis=(0 1 0) LinearFunction(coefficients=-1 0)
    CustomJoint walker_knee_l: socket_parent_frame=femur_l_offset socket_child_frame=tibia_l_offset
      Coordinate knee_angle_l: default_value=0 range=(0 2.9) clamped=true
      PhysicalOffsetFrame femur_l_offset: socket_parent=/bodyset/femur_l
          translation=(-0.009014767 -0.443403 0.002982441) orientation=(1.64157 -1.44618 1.5708)
      PhysicalOffsetFrame tibia_l_offset: socket_parent=/bodyset/tibia_l
          translation=(-0.008367095 -0.003938353 0.001514092) orientation=(1.64157 -1.44618 1.5708)
      SpatialTransform: axes_held_at_zero=translation3
        TransformAxis rotation1: coordinates=knee_angle_l axis=(-1 0 0) LinearFunction(coefficients=1 0)
        TransformAxis rotation2: coordinates=knee_angle_l axis=(0 0 1)
          SimmSpline: x=(0 0.174533 0.349066 0.523599 0.698132 0.872665 1.0472 1.22173 1.39626 1.5708 1.74533 1.91986 2.0944)
              y=(0 0.0126809 0.0226969 0.0296054 0.0332049 0.0335354 0.0308779 0.0257548 0.0189295 0.011407 0.00443314 -0.00050475 -0.0016782)
        TransformAxis rotation3: coordinates=knee_angle_l axis=(0 1 0)
          SimmSpline: x=(0 0.174533 0.349066 0.523599 0.698132 0.872665 1.0472 1.22173 1.39626 1.5708 1.74533 1.91986 2.0944)
              y=(0 -0.059461 -0.109399 -0.150618 -0.18392 -0.210107 -0.229983 -0.24435 -0.254012 -0.25977 -0.262428 -0.262788 -0.261654)
        TransformAxis translation1: coordinates=knee_angle_l axis=(0 1 0)
          MultiplierFunction: scale=1.086879
            SimmSpline: x=(0 0.174533 0.349066 0.523599 0.698132 0.872665 1.0472 1.22173 1.39626 1.5708 1.74533 1.91986 2.0944)
                y=(0 0.000479 0.000835 0.001086 0.001251 0.001346 0.001391 0.001403 0.0014 0.0014 0.001421 0.001481 0.001599)
        TransformAxis translation2: coordinates=knee_angle_l axis=(0 0 1)
          MultiplierFunction: scale=1.084524
            SimmSpline: x=(0 0.174533 0.349066 0.523599 0.698132 0.872665 1.0472 1.22173 1.39626 1.5708 1.74533 1.91986 2.0944)
                y=(0 -0.000988 -0.001899 -0.002734 -0.003492 -0.004173 -0.004777 -0.005305 -0.005756 -0.00613 -0.006427 -0.006648 -0.006792)
    CustomJoint patellofemoral_l: socket_parent_frame=femur_l_offset socket_child_frame=patella_l_offset
      Coordinate knee_angle_l_beta: default_value=0 range=(-99999.9 99999.9) clamped=false
      PhysicalOffsetFrame femur_l_offset: socket_parent=/bodyset/femur_l
          translation=(-0.009014767 -0.443403 0.002982441)
      PhysicalOffsetFrame patella_l_offset: socket_parent=/bodyset/patella_l translation=(0 0 0)
      SpatialTransform: axes_held_at_zero=(rotation2 rotation3)
        TransformAxis rotation1: coordinates=knee_angle_l_beta axis=(0 0 1)
          SimmSpline: x=(0 0.174533 0.349066 0.523599 0.698132 0.872665 1.0472 1.22173 1.39626 1.5708 1.74533 1.91986 2.0944)
              y=(0.00113686 -0.00629212 -0.105582 -0.253683 -0.414245 -0.579047 -0.747244 -0.91799 -1.09044 -1.26379 -1.43763 -1.61186 -1.78634)
        TransformAxis translation1: coordinates=knee_angle_l_beta axis=(1 0 0)
          MultiplierFunction: scale=1.11431
            SimmSpline: x=(0 0.174533 0.349066 0.523599 0.698132 0.872665 1.0472 1.22173 1.39626 1.5708 1.74533 1.91986 2.0944)
                y=(0.0524 0.0488 0.0437 0.0371 0.0296 0.0216 0.0136 0.0057 -0.0019 -0.0088 -0.0148 -0.0196 -0.0227)
        TransformAxis translation2: coordinates=knee_angle_l_beta axis=(0 1 0)
          MultiplierFunction: scale=1.086879
            SimmSpline: x=(0 0.174533 0.349066 0.523599 0.698132 0.872665 1.0472 1.22173 1.39626 1.5708 1.74533 1.91986 2.0944)
                y=(-0.0108 -0.019 -0.0263 -0.0322 -0.0367 -0.0395 -0.0408 -0.0404 -0.0384 -0.0349 -0.0301 -0.0245 -0.0187)
        TransformAxis translation3: axis=(0 0 1) MultiplierFunction(scale=1.084524, Constant(value=-0.00275))
    PinJoint ankle_l: socket_parent_frame=tibia_l_offset socket_child_frame=talus_l_offset
      Coordinate ankle_angle_l: default_value=0 range=(-0.6981317 0.5235988) clamped=true
      PhysicalOffsetFrame tibia_l_offset: socket_parent=/bodyset/tibia_l translation=(-0.0103431 -0.4456663 0)
          orientation=(-0.175895 0.105208 0.0186622)
      PhysicalOffsetFrame talus_l_offset: socket_parent=/bodyset/talus_l translation=(0 0 0)
          orientation=(-0.175895 0.105208 0.0186622)
    PinJoint subtalar_l: socket_parent_frame=talus_l_offset socket_child_frame=calcn_l_offset
      Coordinate subtalar_angle_l: default_value=0 range=(-0.3490659 0.3490659) clamped=true
      PhysicalOffsetFrame talus_l_offset: socket_parent=/bodyset/talus_l
          translation=(-0.04068963 -0.03867328 -0.007089351) orientation=(1.76819 -0.906223 1.8196)
      PhysicalOffsetFrame calcn_l_offset: socket_parent=/bodyset/calcn_l translation=(0 0 0)
          orientation=(1.76819 -0.906223 1.8196)
    PinJoint mtp_l: socket_parent_frame=calcn_l_offset socket_child_frame=toes_l_offset
      Coordinate mtp_angle_l: default_value=0 range=(-0.5235988 0.5235988) clamped=true
      PhysicalOffsetFrame calcn_l_offset: socket_parent=/bodyset/calcn_l
          translation=(0.2571346 -0.002028127 -0.001038694) orientation=(-3.14159 -0.619901 0)
      PhysicalOffsetFrame toes_l_offset: socket_parent=/bodyset/toes_l translation=(0 0 0)
          orientation=(-3.14159 -0.619901 0)
    ConstantCurvatureJoint lumbar: socket_parent_frame=pelvis_offset socket_child_frame=lumbar_offset
        neutral_angle_x_z_y=(0 0.7 0) length=0.09871909
      Coordinate lumbar_bending: default_value=0 range=(-1.13 1.13) clamped=true
      Coordinate lumbar_extension: default_value=0 range=(-1.13 0.524) clamped=true
      Coordinate lumbar_twist: default_value=0 range=(-0.26 0.26) clamped=true
      PhysicalOffsetFrame pelvis_offset: socket_parent=/bodyset/pelvis translation=(-0.09541722 0.06071224 0)
          orientation=(0 0 -0.3)
      PhysicalOffsetFrame lumbar_offset: socket_parent=/bodyset/lumbar_body translation=(0 0 0)
    ConstantCurvatureJoint thoracic_spine: socket_parent_frame=thoracic_lumbar_offset
        socket_child_frame=thoracic_thorax_offset neutral_angle_x_z_y=(0 -0.6 0) length=0.2992955
      Coordinate thorax_bending: default_value=0 range=(-0.52 0.52) clamped=true
      Coordinate thorax_extension: default_value=0 range=(-0.45 0.36) clamped=true
      Coordinate thorax_twist: default_value=0 range=(-0.82 0.82) clamped=true
      PhysicalOffsetFrame thoracic_lumbar_offset: socket_parent=/bodyset/lumbar_body translation=(0 0 0)
      PhysicalOffsetFrame thoracic_thorax_offset: socket_parent=/bodyset/thorax translation=(0 0 0)
          orientation=(0 0 -0.3)
    ConstantCurvatureJoint neck: socket_parent_frame=torso_offset socket_child_frame=neck_offset
        neutral_angle_x_z_y=(0 0.2 0) length=0.09043239
      Coordinate head_bending: default_value=0 range=(-1.01 1.01) clamped=true
      Coordinate head_extension: default_value=0 range=(-1.09 1.09) clamped=true
      Coordinate head_twist: default_value=0 range=(-1.44 1.44) clamped=true
      PhysicalOffsetFrame torso_offset: socket_parent=/bodyset/thorax translation=(0 0 0) orientation=(0 0 -0.3)
      PhysicalOffsetFrame neck_offset: socket_parent=/bodyset/head translation=(0 0 0)
    EllipsoidJoint scapulothoracic_r: socket_parent_frame=thorax_r_offset socket_child_frame=scapula_r_offset
        radii_x_y_z=(0.09136122 0.1808567 0.1029433)
      Coordinate scapula_abduction_r: default_value=-1.311561 range=(-1.5 -0.9) clamped=true
      Coordinate scapula_elevation_r: default_value=-0.05049787 range=(-0.2 0.1) clamped=true
      Coordinate scapula_upward_rot_r: default_value=0.2082049 range=(-0.3 1) clamped=true
      PhysicalOffsetFrame thorax_r_offset: socket_parent=/bodyset/thorax
          translation=(0.03302312 -0.02712972 0.08717277)
      PhysicalOffsetFrame scapula_r_offset: socket_parent=/bodyset/scapula_r
          translation=(-0.04865292 -0.04207083 -0.04706564) orientation=(-0.5181 -1.1416 -0.2854)
    EllipsoidJoint scapulothoracic_l: socket_parent_frame=thorax_l_offset socket_child_frame=scapula_l_offset
        radii_x_y_z=(-0.09136122 -0.1808567 -0.1029433)
      Coordinate scapula_abduction_l: default_value=-1.311561 range=(-1.5 -0.9) clamped=true
      Coordinate scapula_elevation_l: default_value=-0.05049787 range=(-0.2 0.1) clamped=true
      Coordinate scapula_upward_rot_l: default_value=0.2082049 range=(-0.3 1) clamped=true
      PhysicalOffsetFrame thorax_l_offset: socket_parent=/bodyset/thorax
          translation=(0.03302312 -0.02712972 -0.08717277) orientation=(0 0 3.141593)
      PhysicalOffsetFrame scapula_l_offset: socket_parent=/bodyset/scapula_l
          translation=(-0.04865292 -0.04207083 0.04706564) orientation=(0.5181 1.1416 2.856193)
    CustomJoint GlenoHumeral_r: socket_parent_frame=scapula_r_offset socket_child_frame=humerus_r_offset
      Coordinate shoulder_r_x: default_value=2.844205e-11 default_speed_value=1 range=(-1.5 3.141593) clamped=true
      Coordinate shoulder_r_y: default_value=0 range=(-0.78 2.53) clamped=false
      Coordinate shoulder_r_z: default_value=0 default_speed_value=1 range=(-1.570795 1.570795) clamped=true
      PhysicalOffsetFrame scapula_r_offset: socket_parent=/bodyset/scapula_r
          translation=(-0.007767229 -0.03663952 0.007564119)
      PhysicalOffsetFrame humerus_r_offset: socket_parent=/bodyset/humerus_r translation=(0 0 0)
      SpatialTransform: axes_held_at_zero=(translation1 translation2 translation3)
        TransformAxis rotation1: coordinates=shoulder_r_x axis=(1 0 0) LinearFunction(coefficients=1 0)
        TransformAxis rotation2: coordinates=shoulder_r_y axis=(0 1 0) LinearFunction(coefficients=1 0)
        TransformAxis rotation3: coordinates=shoulder_r_z axis=(0 0 1) LinearFunction(coefficients=1 0)
    CustomJoint GlenoHumeral_l: socket_parent_frame=scapula_l_offset socket_child_frame=humerus_l_offset
      Coordinate shoulder_l_x: default_value=2.844205e-11 default_speed_value=1 range=(-1.5 3.141593) clamped=true
      Coordinate shoulder_l_y: default_value=0 range=(-0.78 2.53) clamped=false
      Coordinate shoulder_l_z: default_value=0 default_speed_value=1 range=(-1.570795 1.570795) clamped=true
      PhysicalOffsetFrame scapula_l_offset: socket_parent=/bodyset/scapula_l
          translation=(-0.007767229 -0.03663952 -0.007564119)
      PhysicalOffsetFrame humerus_l_offset: socket_parent=/bodyset/humerus_l translation=(0 0 0)
      SpatialTransform: axes_held_at_zero=(translation1 translation2 translation3)
        TransformAxis rotation1: coordinates=shoulder_l_x axis=(1 0 0) LinearFunction(coefficients=1 0)
        TransformAxis rotation2: coordinates=shoulder_l_y axis=(0 1 0) LinearFunction(coefficients=1 0)
        TransformAxis rotation3: coordinates=shoulder_l_z axis=(0 0 1) LinearFunction(coefficients=1 0)
    CustomJoint elbow_r: socket_parent_frame=humerus_r_offset socket_child_frame=ulna_r_offset
      Coordinate elbow_flexion_r: default_value=5.193488e-24 range=(0 2.268928) clamped=false
      PhysicalOffsetFrame humerus_r_offset: socket_parent=/bodyset/humerus_r
          translation=(0.006155959 -0.2773858 -0.01644546)
      PhysicalOffsetFrame ulna_r_offset: socket_parent=/bodyset/ulna_r translation=(0 0 0)
      SpatialTransform: axes_held_at_zero=(rotation1 rotation2 translation1 translation2 translation3)
        TransformAxis rotation3: coordinates=elbow_flexion_r axis=(0.04940001 0.03660001 0.9981083)
            LinearFunction(coefficients=1 0)
    CustomJoint elbow_l: socket_parent_frame=humerus_l_offset socket_child_frame=ulna_l_offset
      Coordinate elbow_flexion_l: default_value=5.193488e-24 range=(0 2.268928) clamped=false
      PhysicalOffsetFrame humerus_l_offset: socket_parent=/bodyset/humerus_l
          translation=(0.006155959 -0.2773858 0.01644546)
      PhysicalOffsetFrame ulna_l_offset: socket_parent=/bodyset/ulna_l translation=(0 0 0)
      SpatialTransform: axes_held_at_zero=(rotation1 rotation2 translation1 translation2 translation3)
        TransformAxis rotation3: coordinates=elbow_flexion_l axis=(-0.04940001 -0.03660001 0.9981083)
            LinearFunction(coefficients=1 0)
    CustomJoint radioulnar_r: socket_parent_frame=ulna_r_offset socket_child_frame=radius_r_offset
      Coordinate pro_sup_r: default_value=0.598997 range=(-1.570796 1.570796) clamped=false
      PhysicalOffsetFrame ulna_r_offset: socket_parent=/bodyset/ulna_r
          translation=(0.0003608535 -0.01178086 0.01998077)
      PhysicalOffsetFrame radius_r_offset: socket_parent=/bodyset/radius_r translation=(0 0 0)
      SpatialTransform: axes_held_at_zero=(rotation1 rotation3 translation1 translation2 translation3)
        TransformAxis rotation2: coordinates=pro_sup_r axis=(-0.01716099 0.9926656 -0.119668)
            LinearFunction(coefficients=1 0)
    CustomJoint radioulnar_l: socket_parent_frame=ulna_l_offset socket_child_frame=radius_l_offset
      Coordinate pro_sup_l: default_value=0.598997 range=(-1.570796 1.570796) clamped=false
      PhysicalOffsetFrame ulna_l_offset: socket_parent=/bodyset/ulna_l
          translation=(0.0003608535 -0.01178086 -0.01998077)
      PhysicalOffsetFrame radius_l_offset: socket_parent=/bodyset/radius_l translation=(0 0 0)
      SpatialTransform: axes_held_at_zero=(rotation1 rotation3 translation1 translation2 translation3)
        TransformAxis rotation2: coordinates=pro_sup_l axis=(0.01716099 -0.9926656 -0.119668)
            LinearFunction(coefficients=1 0)
    CustomJoint wrist_r: socket_parent_frame=radius_r_offset socket_child_frame=hand_r_offset
      Coordinate wrist_flexion_r: default_value=0 range=(-1.22173 1.22173) clamped=false
      Coordinate wrist_deviation_r: default_value=0 range=(-0.436332 0.610865) clamped=false
      PhysicalOffsetFrame radius_r_offset: socket_parent=/bodyset/radius_r
          translation=(0.01623841 -0.2478457 0.02497721)
      PhysicalOffsetFrame hand_r_offset: socket_parent=/bodyset/hand_r translation=(0 0 0)
      SpatialTransform: axes_held_at_zero=(rotation2 translation1 translation2 translation3)
        TransformAxis rotation1: coordinates=wrist_flexion_r axis=(1 0 0) LinearFunction(coefficients=1 0)
        TransformAxis rotation3: coordinates=wrist_deviation_r axis=(0 0 -1) LinearFunction(coefficients=1 0)
    CustomJoint wrist_l: socket_parent_frame=radius_l_offset socket_child_frame=hand_l_offset
      Coordinate wrist_flexion_l: default_value=0 range=(-1.22173 1.22173) clamped=false
      Coordinate wrist_deviation_l: default_value=0 range=(-0.436332 0.610865) clamped=false
      PhysicalOffsetFrame radius_l_offset: socket_parent=/bodyset/radius_l
          translation=(0.01623841 -0.2478457 -0.02497721)
      PhysicalOffsetFrame hand_l_offset: socket_parent=/bodyset/hand_l translation=(0 0 0)
      SpatialTransform: axes_held_at_zero=(rotation2 translation1 translation2 translation3)
        TransformAxis rotation1: coordinates=wrist_flexion_l axis=(-1 0 0) LinearFunction(coefficients=1 0)
        TransformAxis rotation3: coordinates=wrist_deviation_l axis=(0 0 -1) LinearFunction(coefficients=1 0)
  ConstraintSet:
    CoordinateCouplerConstraint patellofemoral_knee_angle_r_con: independent_coordinate_names=knee_angle_r
        dependent_coordinate_name=knee_angle_r_beta scale_factor=1
        coupled_coordinates_function=LinearFunction(coefficients=1 0)
    CoordinateCouplerConstraint patellofemoral_knee_angle_l_con: independent_coordinate_names=knee_angle_l
        dependent_coordinate_name=knee_angle_l_beta scale_factor=1
        coupled_coordinates_function=LinearFunction(coefficients=1 0)
  ForceSet:
    Millard2012EquilibriumMuscle [values shared by the 80 below unless stated]: fiber_damping=0.01
        default_activation=0.01 minimum_activation=0.01
      ActiveForceLengthCurve: min_norm_active_fiber_length=0.25 transition_norm_fiber_length=0.77
          max_norm_active_fiber_length=1.9 shallow_ascending_slope=0.75 minimum_value=0
      ForceVelocityCurve: concentric_slope_at_vmax=0 concentric_slope_near_vmax=0.25 isometric_slope=5
          eccentric_slope_at_vmax=0 eccentric_slope_near_vmax=0.15 max_eccentric_velocity_force_multiplier=1.4
      FiberForceLengthCurve: strain_at_zero_force=0 strain_at_one_norm_force=0.7
      TendonForceLengthCurve
    Millard2012EquilibriumMuscle addbrev_r: max_isometric_force=625.8197 optimal_fiber_length=0.1096228
        tendon_slack_length=0.03769313 pennation_angle_at_optimal=0.1147809 ignore_tendon_compliance=true
      PathPoint P1: pelvis (-0.018098 -0.09279594 0.01552998)
      PathPoint P2: femur_r (-0.00222862 -0.1282517 0.02700465)
      PathWrap: wrap_object=AB_at_femshaft_r method=hybrid
    Millard2012EquilibriumMuscle addlong_r: max_isometric_force=916.8 optimal_fiber_length=0.1169131
        tendon_slack_length=0.1424129 pennation_angle_at_optimal=0.1377704
      PathPoint P1: pelvis (-0.007182349 -0.08776127 0.01903935)
      PathPoint P2: femur_r (0.01254713 -0.2601662 0.01716802)
      PathWrap: wrap_object=AL_at_femshaft_r method=hybrid
    Millard2012EquilibriumMuscle addmagDist_r: max_isometric_force=597.2951 optimal_fiber_length=0.1955444
        tendon_slack_length=0.09642668 pennation_angle_at_optimal=0.194705 ignore_tendon_compliance=true
      PathPoint P1: pelvis (-0.07015582 -0.1260347 0.04015608)
      PathPoint P2: femur_r (0.01253599 -0.2853057 0.02093132)
      PathWrap: wrap_object=AMdist_at_femshaft_r method=hybrid
    Millard2012EquilibriumMuscle addmagIsch_r: max_isometric_force=597.2951 optimal_fiber_length=0.1719128
        tendon_slack_length=0.2381058 pennation_angle_at_optimal=0.1680443
      PathPoint P1: pelvis (-0.08491849 -0.1280979 0.04206204)
      PathPoint P2: femur_r (0.005359831 -0.4216763 -0.03549647)
      PathWrap: wrap_object=AMisch_at_condyles_r method=hybrid
    Millard2012EquilibriumMuscle addmagMid_r: max_isometric_force=597.2951 optimal_fiber_length=0.1510557
        tendon_slack_length=0.05115019 pennation_angle_at_optimal=0.2073076 ignore_tendon_compliance=true
      PathPoint P1: pelvis (-0.04989743 -0.1192033 0.02878088)
      PathPoint P2: femur_r (0.00269663 -0.1765091 0.03168979)
      PathWrap: wrap_object=AMmid_at_femshaft_r method=hybrid
    Millard2012EquilibriumMuscle addmagProx_r: max_isometric_force=597.2951 optimal_fiber_length=0.1110807
        tendon_slack_length=0.04241695 pennation_angle_at_optimal=0.3114833 ignore_tendon_compliance=true
      PathPoint P1: pelvis (-0.02935477 -0.1061724 0.01376521)
      PathPoint P2: femur_r (-0.01701551 -0.08571126 0.03472646)
      PathWrap: wrap_object=AMprox_at_femshaft_r method=hybrid
    Millard2012EquilibriumMuscle bflh_r: max_isometric_force=1313.184 optimal_fiber_length=0.1071167
        tendon_slack_length=0.3569387 pennation_angle_at_optimal=0.1759182
      PathPoint P1: pelvis (-0.09854411 -0.1175744 0.05909459)
      PathPoint P2: tibia_r (-0.03485626 -0.0389958 0.02580016)
      PathPoint P3: tibia_r (-0.02968471 -0.05069454 0.030899)
    Millard2012EquilibriumMuscle bfsh_r: max_isometric_force=557.1148 optimal_fiber_length=0.1202828
        tendon_slack_length=0.1153943 pennation_angle_at_optimal=0.2642232 ignore_tendon_compliance=true
      PathPoint P1: femur_r (0.00557155 -0.2294401 0.02537786)
      PathPoint P2: tibia_r (-0.03113274 -0.04668355 0.03242866)
      PathWrap: wrap_object=BF_at_gastroc_r method=hybrid
    Millard2012EquilibriumMuscle edl_r: max_isometric_force=603.4982 optimal_fiber_length=0.08550345
        tendon_slack_length=0.4551242 pennation_angle_at_optimal=0.2182582
      PathPoint P1: tibia_r (-0.01654897 -0.128909 0.02090527)
      PathPoint P2: tibia_r (0.01696269 -0.4189263 0.01142141)
      PathPoint P3: calcn_r (0.1321626 0.03650629 0.0007694027)
      PathPoint P4: calcn_r (0.2323991 0.005577349 0.01250279)
      PathPoint P5: toes_r (0.0003039282 0.004791088 0.01541507)
      PathPoint P6: toes_r (0.04488006 -0.0004077522 0.02518803)
    Millard2012EquilibriumMuscle ehl_r: max_isometric_force=285.8675 optimal_fiber_length=0.09252136
        tendon_slack_length=0.4042185 pennation_angle_at_optimal=0.1972681
      PathPoint P1: tibia_r (-0.01448035 -0.1726957 0.01927363)
      PathPoint P2: tibia_r (0.007343604 -0.3241108 0.01672421)
      PathPoint P3: tibia_r (0.02068621 -0.4114614 -0.002855353)
      PathPoint P4: calcn_r (0.139497 0.03944707 -0.020293)
      PathPoint P5: calcn_r (0.185948 0.03133456 -0.02471706)
      PathPoint P6: calcn_r (0.2493688 0.01409548 -0.02692909)
      PathPoint P7: toes_r (0.0301902 0.00417946 -0.02468427)
      PathPoint P8: toes_r (0.05703719 0.003465893 -0.01873989)
    Millard2012EquilibriumMuscle fdl_r: max_isometric_force=423.177 optimal_fiber_length=0.05354403
        tendon_slack_length=0.4547315 pennation_angle_at_optimal=0.2248391
      PathPoint P1: tibia_r (-0.002378914 -0.2041152 -0.001835584)
      PathPoint P2: tibia_r (-0.01820386 -0.4061134 -0.01264514)
      PathPoint P3: calcn_r (0.06270173 0.031943 -0.02692909)
      PathPoint P4: calcn_r (0.1018184 0.01784752 -0.02529411)
      PathPoint P5: calcn_r (0.2384392 -0.008213914 0.01115634)
      PathPoint P6: toes_r (-0.001924879 -0.007951167 0.01481056)
      PathPoint P7: toes_r (0.02887318 -0.007237601 0.0216617)
      PathPoint P8: toes_r (0.04467745 -0.006116283 0.02438201)
    Millard2012EquilibriumMuscle fhl_r: max_isometric_force=907.8393 optimal_fiber_length=0.06388519
        tendon_slack_length=0.4295457 pennation_angle_at_optimal=0.2580255
      PathPoint P1: tibia_r (-0.03206362 -0.2409941 0.02039538)
      PathPoint P2: tibia_r (-0.02503031 -0.4090103 -0.007750245)
      PathPoint P3: calcn_r (0.05378543 0.02798815 -0.02317826)
      PathPoint P4: calcn_r (0.1492761 0.006895632 -0.02462089)
      PathPoint P5: calcn_r (0.2482183 -0.005374537 -0.02587116)
      PathPoint P6: toes_r (0.01570296 -0.006524035 -0.02669931)
      PathPoint P7: toes_r (0.05693588 -0.01039768 -0.01823613)
    Millard2012EquilibriumMuscle gaslat_r: max_isometric_force=1575.059 optimal_fiber_length=0.06462354
        tendon_slack_length=0.4133161 pennation_angle_at_optimal=0.2102268
      PathPoint P1: femur_r (-0.00334293 -0.4145355 0.03004132)
      PathPoint P2: calcn_r (0.006327698 0.03143597 -0.005097293)
      PathWrap shank: wrap_object=GasLat_at_shank_r method=hybrid
      PathWrap condyles: wrap_object=Gastroc_at_condyles_r method=hybrid
    Millard2012EquilibriumMuscle gasmed_r: max_isometric_force=3115.515 optimal_fiber_length=0.05608225
        tendon_slack_length=0.4384492 pennation_angle_at_optimal=0.1656816
      PathPoint P1: femur_r (0.008914479 -0.4117097 -0.0225581)
      PathPoint P2: calcn_r (0.006327698 0.03143597 -0.005097293)
      PathWrap shank: wrap_object=GasMed_at_shank_r method=hybrid
      PathWrap condyles: wrap_object=Gastroc_at_condyles_r method=hybrid
    Millard2012EquilibriumMuscle glmax1_r: max_isometric_force=983.7836 optimal_fiber_length=0.1496077
        tendon_slack_length=0.0497073 pennation_angle_at_optimal=0.3540118 ignore_tendon_compliance=true
      PathPoint P1: pelvis (-0.1166421 0.03405809 0.05677518)
      PathPoint P2: pelvis (-0.1191057 -0.02389002 0.07855748)
      PathPoint P3: femur_r (-0.04947536 -0.03543225 0.03275263)
      PathPoint P4: femur_r (-0.03086639 -0.06151734 0.05097263)
      PathWrap: wrap_object=Gmax1_at_pelvis_r method=hybrid
    Millard2012EquilibriumMuscle glmax2_r: max_isometric_force=1406.046 optimal_fiber_length=0.1616106
        tendon_slack_length=0.06988078 pennation_angle_at_optimal=0.3673821 ignore_tendon_compliance=true
      PathPoint P1: pelvis (-0.1247909 0.008588561 0.04658993)
      PathPoint P2: pelvis (-0.1273493 -0.06011993 0.08198618)
      PathPoint P3: femur_r (-0.05014395 -0.06347372 0.02733001)
      PathPoint P4: femur_r (-0.01738323 -0.1104269 0.04544156)
      PathWrap: wrap_object=Gmax2_at_pelvis_r method=hybrid
    Millard2012EquilibriumMuscle glmax3_r: max_isometric_force=947.7541 optimal_fiber_length=0.1739941
        tendon_slack_length=0.07263639 pennation_angle_at_optimal=0.3824161 ignore_tendon_compliance=true
      PathPoint P1: pelvis (-0.1231801 -0.05182752 0.009075961)
      PathPoint P2: pelvis (-0.1206218 -0.1246822 0.04386714)
      PathPoint P3: femur_r (-0.03131211 -0.1222739 0.01019453)
      PathPoint P4: femur_r (-0.00668586 -0.1542281 0.04457394)
      PathWrap: wrap_object=Gmax3_at_pelvis_r method=hybrid
    Millard2012EquilibriumMuscle glmed1_r: max_isometric_force=1093.467 optimal_fiber_length=0.07353704
        tendon_slack_length=0.05622746 pennation_angle_at_optimal=0.3165559 ignore_tendon_compliance=true
      PathPoint P1: pelvis (-0.04216551 0.02418618 0.1181892)
      PathPoint P2: femur_r (-0.02429196 -0.01271648 0.06019109)
    Millard2012EquilibriumMuscle glmed2_r: max_isometric_force=765.0917 optimal_fiber_length=0.07377864
        tendon_slack_length=0.06594477 pennation_angle_at_optimal=0.3165559 ignore_tendon_compliance=true
      PathPoint P1: pelvis (-0.08054086 0.03119523 0.06806971)
      PathPoint P2: femur_r (-0.0287492 -0.006303897 0.05715442)
    Millard2012EquilibriumMuscle glmed3_r: max_isometric_force=871.1993 optimal_fiber_length=0.07393334
        tendon_slack_length=0.04581116 pennation_angle_at_optimal=0.3165559 ignore_tendon_compliance=true
      PathPoint P1: pelvis (-0.1091565 -0.007206493 0.05304395)
      PathPoint P2: femur_r (-0.03443218 -0.00510833 0.05617835)
    Millard2012EquilibriumMuscle glmin1_r: max_isometric_force=374.0459 optimal_fiber_length=0.06955542
        tendon_slack_length=0.01650691 pennation_angle_at_optimal=0.1745329 ignore_tendon_compliance=true
      PathPoint P1: pelvis (-0.04396583 -0.01470914 0.1050795)
      PathPoint P2: femur_r (-0.008023032 -0.01130354 0.06073335)
    Millard2012EquilibriumMuscle glmin2_r: max_isometric_force=394.8197 optimal_fiber_length=0.05750731
        tendon_slack_length=0.02680154 pennation_angle_at_optimal=0 ignore_tendon_compliance=true
      PathPoint P1: pelvis (-0.05836843 -0.01401811 0.09791953)
      PathPoint P2: femur_r (-0.01069738 -0.01130354 0.06073335)
    Millard2012EquilibriumMuscle glmin3_r: max_isometric_force=446.7738 optimal_fiber_length=0.0390704
        tendon_slack_length=0.0523055 pennation_angle_at_optimal=0.01745329
      PathPoint P1: pelvis (-0.07476086 -0.01530146 0.08047352)
      PathPoint P2: femur_r (-0.01504318 -0.009021093 0.05964883)
    Millard2012EquilibriumMuscle grac_r: max_isometric_force=281.3115 optimal_fiber_length=0.25064
        tendon_slack_length=0.1892605 pennation_angle_at_optimal=0.1720016 ignore_tendon_compliance=true
      PathPoint P1: pelvis (-0.04487547 -0.1276635 0.02476729)
      PathPoint P2: tibia_r (-0.019052 -0.05297858 -0.03019536)
      PathPoint P3: tibia_r (0.001841072 -0.07756822 -0.01604097)
      PathWrap: wrap_object=GR_at_condyles_r method=hybrid
    Millard2012EquilibriumMuscle iliacus_r: max_isometric_force=1021.141 optimal_fiber_length=0.1078167
        tendon_slack_length=0.09721777 pennation_angle_at_optimal=0.279914 ignore_tendon_compliance=true
      PathPoint P1: pelvis (-0.05732614 0.0305042 0.0850115)
      PathPoint P2: pelvis (-0.01279178 -0.05498653 0.07623807)
      PathPoint P3: femur_r (-0.002562913 -0.06140865 0.01507489)
      PathPoint P4: femur_r (-0.01359458 -0.06923417 0.02125667)
      PathWrap: wrap_object=IL_at_brim_r method=hybrid range=(2 3)
    Millard2012EquilibriumMuscle perbrev_r: max_isometric_force=521.2016 optimal_fiber_length=0.05684354
        tendon_slack_length=0.1847134 pennation_angle_at_optimal=0.2052361
      PathPoint P1: tibia_r (-0.02513374 -0.2821068 0.0255962)
      PathPoint P2: tibia_r (-0.03506312 -0.4337447 0.02539225)
      PathPoint P3: tibia_r (-0.02947785 -0.446112 0.02600411)
      PathPoint P4: calcn_r (0.06773513 0.02737971 0.02240885)
      PathPoint P5: calcn_r (0.09736026 0.02220799 0.03298814)
    Millard2012EquilibriumMuscle perlong_r: max_isometric_force=1115.371 optimal_fiber_length=0.06099558
        tendon_slack_length=0.3988976 pennation_angle_at_optimal=0.2479525
      PathPoint P1: tibia_r (-0.02068621 -0.152975 0.02875749)
      PathPoint P2: tibia_r (-0.03278764 -0.4345247 0.02416853)
      PathPoint P3: tibia_r (-0.02813324 -0.4472261 0.02447446)
      PathPoint P4: calcn_r (0.06298935 0.02332346 0.02125475)
      PathPoint P5: calcn_r (0.0979355 0.01074907 0.02731379)
      PathPoint P6: calcn_r (0.1225272 0.006997038 0.01134869)
      PathPoint P7: calcn_r (0.173005 0.00861954 -0.01769626)
    Millard2012EquilibriumMuscle piri_r: max_isometric_force=1029.787 optimal_fiber_length=0.02626962
        tendon_slack_length=0.1160978 pennation_angle_at_optimal=0.1745329
      PathPoint P1: pelvis (-0.09646899 -0.006446356 0.01362403)
      PathPoint P2: pelvis (-0.09666798 -0.03026727 0.06143417)
      PathPoint P3: femur_r (-0.01649179 -0.003912763 0.0473937)
    Millard2012EquilibriumMuscle psoas_r: max_isometric_force=1426.79 optimal_fiber_length=0.1180152
        tendon_slack_length=0.1004928 pennation_angle_at_optimal=0.2155251 ignore_tendon_compliance=true
      PathPoint P1: pelvis (-0.05742089 0.06120584 0.03932916)
      PathPoint P2: pelvis (-0.01942456 -0.06456228 0.06615367)
      PathPoint P3: femur_r (-0.01470889 -0.05075724 0.004988811)
      PathPoint P4: femur_r (-0.02618628 -0.05695245 0.009543812)
      PathWrap: wrap_object=PS_at_brim_r method=hybrid range=(2 3)
    Millard2012EquilibriumMuscle recfem_r: max_isometric_force=2191.741 optimal_fiber_length=0.08231029
        tendon_slack_length=0.486372 pennation_angle_at_optimal=0.2170149
      PathPoint P1: pelvis (-0.02274095 -0.03830301 0.09408746)
      PathPoint P2: patella_r (0.01 0.049 0.0007)
      PathPoint P3: patella_r (0.0121 0.0437 -0.001)
      PathPoint P4: patella_r (0.005 0.00247 3e-5)
      PathPoint P5: tibia_r (0.03371852 -0.07032614 -0.0004792914)
      PathWrap: wrap_object=KnExt_at_fem_r method=hybrid
    Millard2012EquilibriumMuscle sart_r: max_isometric_force=249.4131 optimal_fiber_length=0.4327158
        tendon_slack_length=0.1331431 pennation_angle_at_optimal=0.02613542 ignore_tendon_compliance=true
      PathPoint P1: pelvis (-0.01847702 -0.01540018 0.1064913)
      PathPoint P2: femur_r (-0.00334293 -0.3877983 -0.04565847)
      PathPoint P3: tibia_r (-0.02596119 -0.04467805 -0.03722157)
      PathPoint P4: tibia_r (-0.01644554 -0.06673853 -0.0269219)
      PathPoint P5: tibia_r (0.01406662 -0.09024743 -0.002651399)
    Millard2012EquilibriumMuscle semimem_r: max_isometric_force=2200.987 optimal_fiber_length=0.07581055
        tendon_slack_length=0.381894 pennation_angle_at_optimal=0.2545615
      PathPoint P1: pelvis (-0.09352215 -0.1125398 0.06191822)
      PathPoint P2: tibia_r (-0.029995 -0.04646071 -0.01998747)
      PathWrap: wrap_object=SM_at_condyles_r method=hybrid
    Millard2012EquilibriumMuscle semiten_r: max_isometric_force=591.2951 optimal_fiber_length=0.2120182
        tendon_slack_length=0.2715579 pennation_angle_at_optimal=0.241295
      PathPoint P1: pelvis (-0.0983546 -0.123695 0.05193467)
      PathPoint P2: tibia_r (-0.03227048 -0.05659962 -0.02335271)
      PathPoint P3: tibia_r (0.00196519 -0.08612501 -0.0119313)
      PathWrap: wrap_object=ST_at_condyles_r method=hybrid
    Millard2012EquilibriumMuscle soleus_r: max_isometric_force=6194.843 optimal_fiber_length=0.04809279
        tendon_slack_length=0.3024991 pennation_angle_at_optimal=0.3814289
      PathPoint P1: tibia_r (-0.007860759 -0.1020576 0.009993737)
      PathPoint P2: calcn_r (0.006327698 0.03143597 -0.005097293)
    Millard2012EquilibriumMuscle tfl_r: max_isometric_force=411.2066 optimal_fiber_length=0.1017878
        tendon_slack_length=0.4816141 pennation_angle_at_optimal=0.05235988
      PathPoint P1: pelvis (-0.02946848 0.02112588 0.1251474)
      PathPoint P2: femur_r (0.03276071 -0.1081444 0.06474609)
      PathPoint P3: femur_r (0.01192312 -0.4401859 0.03513858)
      PathPoint P4: tibia_r (0.01117055 -0.0456808 0.03528401)
    Millard2012EquilibriumMuscle tibant_r: max_isometric_force=1227.452 optimal_fiber_length=0.08352277
        tendon_slack_length=0.2940552 pennation_angle_at_optimal=0.1951828
      PathPoint P1: tibia_r (0.01592838 -0.1461785 0.01652026)
      PathPoint P2: tibia_r (0.02596119 -0.21236 0.01305304)
      PathPoint P3: tibia_r (0.02409943 -0.4076733 -0.01346095)
      PathPoint P4: calcn_r (0.167684 0.01805033 -0.02933348)
    Millard2012EquilibriumMuscle tibpost_r: max_isometric_force=1730.154 optimal_fiber_length=0.04353091
        tendon_slack_length=0.323349 pennation_angle_at_optimal=0.2264891
      PathPoint P1: tibia_r (-0.004240673 -0.1452872 0.01050362)
      PathPoint P2: tibia_r (-0.01696269 -0.4072276 -0.01784596)
      PathPoint P3: calcn_r (0.05996932 0.03386972 -0.02750615)
      PathPoint P4: calcn_r (0.1110223 0.01612361 -0.02702527)
    Millard2012EquilibriumMuscle vasint_r: max_isometric_force=1697.361 optimal_fiber_length=0.108805
        tendon_slack_length=0.2215663 pennation_angle_at_optimal=0.06309973
      PathPoint P1: femur_r (0.03231499 -0.2091155 0.03362025)
      PathPoint P2: femur_r (0.03732938 -0.2265055 0.03090894)
      PathPoint P3: patella_r (0.0058 0.048 -0.0006)
      PathPoint P4: patella_r (0.005 0.00247 -0.00039)
      PathPoint P5: tibia_r (0.03368749 -0.07041528 0.0004385007)
      PathWrap: wrap_object=KnExt_at_fem_r method=hybrid
    Millard2012EquilibriumMuscle vaslat_r: max_isometric_force=5148.767 optimal_fiber_length=0.1089236
        tendon_slack_length=0.2417373 pennation_angle_at_optimal=0.2528673
      PathPoint P1: femur_r (0.005348688 -0.2015073 0.03784989)
      PathPoint P2: femur_r (0.02997494 -0.2816103 0.04435704)
      PathPoint P3: patella_r (0.0103 0.0423 0.0141)
      PathPoint P4: patella_r (0.005 0.00247 0.00733)
      PathPoint P5: tibia_r (0.03365646 -0.07061583 0.00521102)
      PathWrap: wrap_object=KnExt_at_fem_r method=hybrid
    Millard2012EquilibriumMuscle vasmed_r: max_isometric_force=2747.823 optimal_fiber_length=0.1060347
        tendon_slack_length=0.2189752 pennation_angle_at_optimal=0.4222225
      PathPoint P1: femur_r (0.01560034 -0.2281358 0.02038905)
      PathPoint P2: femur_r (0.03966943 -0.3009567 0.0009760717)
      PathPoint P3: patella_r (0.0063 0.0445 -0.017)
      PathPoint P4: patella_r (0.005 0.00247 -0.0085)
      PathPoint P5: tibia_r (0.0329945 -0.07082752 -0.006914034)
      PathWrap: wrap_object=KnExt_at_fem_r method=hybrid
    Millard2012EquilibriumMuscle addbrev_l: max_isometric_force=625.8197 optimal_fiber_length=0.1096228
        tendon_slack_length=0.03769313 pennation_angle_at_optimal=0.1147809 ignore_tendon_compliance=true
      PathPoint P1: pelvis (-0.018098 -0.09279594 -0.01552998)
      PathPoint P2: femur_l (-0.00222862 -0.1282517 -0.02700465)
      PathWrap: wrap_object=AB_at_femshaft_l method=hybrid
    Millard2012EquilibriumMuscle addlong_l: max_isometric_force=916.8 optimal_fiber_length=0.1169131
        tendon_slack_length=0.1424129 pennation_angle_at_optimal=0.1377704
      PathPoint P1: pelvis (-0.007182349 -0.08776127 -0.01903935)
      PathPoint P2: femur_l (0.01254713 -0.2601662 -0.01716802)
      PathWrap: wrap_object=AL_at_femshaft_l method=hybrid
    Millard2012EquilibriumMuscle addmagDist_l: max_isometric_force=597.2951 optimal_fiber_length=0.1955444
        tendon_slack_length=0.09642668 pennation_angle_at_optimal=0.194705 ignore_tendon_compliance=true
      PathPoint P1: pelvis (-0.07015582 -0.1260347 -0.04015608)
      PathPoint P2: femur_l (0.01253599 -0.2853057 -0.02093132)
      PathWrap: wrap_object=AMdist_at_femshaft_l method=hybrid
    Millard2012EquilibriumMuscle addmagIsch_l: max_isometric_force=597.2951 optimal_fiber_length=0.1719128
        tendon_slack_length=0.2381058 pennation_angle_at_optimal=0.1680443
      PathPoint P1: pelvis (-0.08491849 -0.1280979 -0.04206204)
      PathPoint P2: femur_l (0.005359831 -0.4216763 0.03549647)
      PathWrap: wrap_object=AMisch_at_condyles_l method=hybrid
    Millard2012EquilibriumMuscle addmagMid_l: max_isometric_force=597.2951 optimal_fiber_length=0.1510557
        tendon_slack_length=0.05115019 pennation_angle_at_optimal=0.2073076 ignore_tendon_compliance=true
      PathPoint P1: pelvis (-0.04989743 -0.1192033 -0.02878088)
      PathPoint P2: femur_l (0.00269663 -0.1765091 -0.03168979)
      PathWrap: wrap_object=AMmid_at_femshaft_l method=hybrid
    Millard2012EquilibriumMuscle addmagProx_l: max_isometric_force=597.2951 optimal_fiber_length=0.1110807
        tendon_slack_length=0.04241695 pennation_angle_at_optimal=0.3114833 ignore_tendon_compliance=true
      PathPoint P1: pelvis (-0.02935477 -0.1061724 -0.01376521)
      PathPoint P2: femur_l (-0.01701551 -0.08571126 -0.03472646)
      PathWrap: wrap_object=AMprox_at_femshaft_l method=hybrid
    Millard2012EquilibriumMuscle bflh_l: max_isometric_force=1313.184 optimal_fiber_length=0.1071167
        tendon_slack_length=0.3569387 pennation_angle_at_optimal=0.1759182
      PathPoint P1: pelvis (-0.09854411 -0.1175744 -0.05909459)
      PathPoint P2: tibia_l (-0.03485626 -0.0389958 -0.02580016)
      PathPoint P3: tibia_l (-0.02968471 -0.05069454 -0.030899)
    Millard2012EquilibriumMuscle bfsh_l: max_isometric_force=557.1148 optimal_fiber_length=0.1202828
        tendon_slack_length=0.1153943 pennation_angle_at_optimal=0.2642232 ignore_tendon_compliance=true
      PathPoint P1: femur_l (0.00557155 -0.2294401 -0.02537786)
      PathPoint P2: tibia_l (-0.03113274 -0.04668355 -0.03242866)
      PathWrap: wrap_object=BF_at_gastroc_l method=hybrid
    Millard2012EquilibriumMuscle edl_l: max_isometric_force=603.4982 optimal_fiber_length=0.08550345
        tendon_slack_length=0.4551242 pennation_angle_at_optimal=0.2182582
      PathPoint P1: tibia_l (-0.01654897 -0.128909 -0.02090527)
      PathPoint P2: tibia_l (0.01696269 -0.4189263 -0.01142141)
      PathPoint P3: calcn_l (0.1321626 0.03650629 -0.0007694027)
      PathPoint P4: calcn_l (0.2323991 0.005577349 -0.01250279)
      PathPoint P5: toes_l (0.0003039282 0.004791088 -0.01541507)
      PathPoint P6: toes_l (0.04488006 -0.0004077522 -0.02518803)
    Millard2012EquilibriumMuscle ehl_l: max_isometric_force=285.8675 optimal_fiber_length=0.09252136
        tendon_slack_length=0.4042185 pennation_angle_at_optimal=0.1972681
      PathPoint P1: tibia_l (-0.01448035 -0.1726957 -0.01927363)
      PathPoint P2: tibia_l (0.007343604 -0.3241108 -0.01672421)
      PathPoint P3: tibia_l (0.02068621 -0.4114614 0.002855353)
      PathPoint P4: calcn_l (0.139497 0.03944707 0.020293)
      PathPoint P5: calcn_l (0.185948 0.03133456 0.02471706)
      PathPoint P6: calcn_l (0.2493688 0.01409548 0.02692909)
      PathPoint P7: toes_l (0.0301902 0.00417946 0.02468427)
      PathPoint P8: toes_l (0.05703719 0.003465893 0.01873989)
    Millard2012EquilibriumMuscle fdl_l: max_isometric_force=423.177 optimal_fiber_length=0.05354403
        tendon_slack_length=0.4547315 pennation_angle_at_optimal=0.2248391
      PathPoint P1: tibia_l (-0.002378914 -0.2041152 0.001835584)
      PathPoint P2: tibia_l (-0.01820386 -0.4061134 0.01264514)
      PathPoint P3: calcn_l (0.06270173 0.031943 0.02692909)
      PathPoint P4: calcn_l (0.1018184 0.01784752 0.02529411)
      PathPoint P5: calcn_l (0.2384392 -0.008213914 -0.01115634)
      PathPoint P6: toes_l (-0.001924879 -0.007951167 -0.01481056)
      PathPoint P7: toes_l (0.02887318 -0.007237601 -0.0216617)
      PathPoint P8: toes_l (0.04467745 -0.006116283 -0.02438201)
    Millard2012EquilibriumMuscle fhl_l: max_isometric_force=907.8393 optimal_fiber_length=0.06388519
        tendon_slack_length=0.4295457 pennation_angle_at_optimal=0.2580255
      PathPoint P1: tibia_l (-0.03206362 -0.2409941 -0.02039538)
      PathPoint P2: tibia_l (-0.02503031 -0.4090103 0.007750245)
      PathPoint P3: calcn_l (0.05378543 0.02798815 0.02317826)
      PathPoint P4: calcn_l (0.1492761 0.006895632 0.02462089)
      PathPoint P5: calcn_l (0.2482183 -0.005374537 0.02587116)
      PathPoint P6: toes_l (0.01570296 -0.006524035 0.02669931)
      PathPoint P7: toes_l (0.05693588 -0.01039768 0.01823613)
    Millard2012EquilibriumMuscle gaslat_l: max_isometric_force=1575.059 optimal_fiber_length=0.06462354
        tendon_slack_length=0.4133161 pennation_angle_at_optimal=0.2102268
      PathPoint P1: femur_l (-0.00334293 -0.4145355 -0.03004132)
      PathPoint P2: calcn_l (0.006327698 0.03143597 0.005097293)
      PathWrap shank: wrap_object=GasLat_at_shank_l method=hybrid
      PathWrap condyles: wrap_object=Gastroc_at_condyles_l method=hybrid
    Millard2012EquilibriumMuscle gasmed_l: max_isometric_force=3115.515 optimal_fiber_length=0.05608225
        tendon_slack_length=0.4384492 pennation_angle_at_optimal=0.1656816
      PathPoint P1: femur_l (0.008914479 -0.4117097 0.0225581)
      PathPoint P2: calcn_l (0.006327698 0.03143597 0.005097293)
      PathWrap shank: wrap_object=GasMed_at_shank_l method=hybrid
      PathWrap condyles: wrap_object=Gastroc_at_condyles_l method=hybrid
    Millard2012EquilibriumMuscle glmax1_l: max_isometric_force=983.7836 optimal_fiber_length=0.1496077
        tendon_slack_length=0.0497073 pennation_angle_at_optimal=0.3540118 ignore_tendon_compliance=true
      PathPoint P1: pelvis (-0.1166421 0.03405809 -0.05677518)
      PathPoint P2: pelvis (-0.1191057 -0.02389002 -0.07855748)
      PathPoint P3: femur_l (-0.04947536 -0.03543225 -0.03275263)
      PathPoint P4: femur_l (-0.03086639 -0.06151734 -0.05097263)
      PathWrap: wrap_object=Gmax1_at_pelvis_l method=hybrid
    Millard2012EquilibriumMuscle glmax2_l: max_isometric_force=1406.046 optimal_fiber_length=0.1616106
        tendon_slack_length=0.06988078 pennation_angle_at_optimal=0.3673821 ignore_tendon_compliance=true
      PathPoint P1: pelvis (-0.1247909 0.008588561 -0.04658993)
      PathPoint P2: pelvis (-0.1273493 -0.06011993 -0.08198618)
      PathPoint P3: femur_l (-0.05014395 -0.06347372 -0.02733001)
      PathPoint P4: femur_l (-0.01738323 -0.1104269 -0.04544156)
      PathWrap: wrap_object=Gmax2_at_pelvis_l method=hybrid
    Millard2012EquilibriumMuscle glmax3_l: max_isometric_force=947.7541 optimal_fiber_length=0.1739941
        tendon_slack_length=0.07263639 pennation_angle_at_optimal=0.3824161 ignore_tendon_compliance=true
      PathPoint P1: pelvis (-0.1231801 -0.05182752 -0.009075961)
      PathPoint P2: pelvis (-0.1206218 -0.1246822 -0.04386714)
      PathPoint P3: femur_l (-0.03131211 -0.1222739 -0.01019453)
      PathPoint P4: femur_l (-0.00668586 -0.1542281 -0.04457394)
      PathWrap: wrap_object=Gmax3_at_pelvis_l method=hybrid
    Millard2012EquilibriumMuscle glmed1_l: max_isometric_force=1093.467 optimal_fiber_length=0.07353704
        tendon_slack_length=0.05622746 pennation_angle_at_optimal=0.3165559 ignore_tendon_compliance=true
      PathPoint P1: pelvis (-0.04216551 0.02418618 -0.1181892)
      PathPoint P2: femur_l (-0.02429196 -0.01271648 -0.06019109)
    Millard2012EquilibriumMuscle glmed2_l: max_isometric_force=765.0917 optimal_fiber_length=0.07377864
        tendon_slack_length=0.06594477 pennation_angle_at_optimal=0.3165559 ignore_tendon_compliance=true
      PathPoint P1: pelvis (-0.08054086 0.03119523 -0.06806971)
      PathPoint P2: femur_l (-0.0287492 -0.006303897 -0.05715442)
    Millard2012EquilibriumMuscle glmed3_l: max_isometric_force=871.1993 optimal_fiber_length=0.07393334
        tendon_slack_length=0.04581116 pennation_angle_at_optimal=0.3165559 ignore_tendon_compliance=true
      PathPoint P1: pelvis (-0.1091565 -0.007206493 -0.05304395)
      PathPoint P2: femur_l (-0.03443218 -0.00510833 -0.05617835)
    Millard2012EquilibriumMuscle glmin1_l: max_isometric_force=374.0459 optimal_fiber_length=0.06955542
        tendon_slack_length=0.01650691 pennation_angle_at_optimal=0.1745329 ignore_tendon_compliance=true
      PathPoint P1: pelvis (-0.04396583 -0.01470914 -0.1050795)
      PathPoint P2: femur_l (-0.008023032 -0.01130354 -0.06073335)
    Millard2012EquilibriumMuscle glmin2_l: max_isometric_force=394.8197 optimal_fiber_length=0.05750731
        tendon_slack_length=0.02680154 pennation_angle_at_optimal=0 ignore_tendon_compliance=true
      PathPoint P1: pelvis (-0.05836843 -0.01401811 -0.09791953)
      PathPoint P2: femur_l (-0.01069738 -0.01130354 -0.06073335)
    Millard2012EquilibriumMuscle glmin3_l: max_isometric_force=446.7738 optimal_fiber_length=0.0390704
        tendon_slack_length=0.0523055 pennation_angle_at_optimal=0.01745329
      PathPoint P1: pelvis (-0.07476086 -0.01530146 -0.08047352)
      PathPoint P2: femur_l (-0.01504318 -0.009021093 -0.05964883)
    Millard2012EquilibriumMuscle grac_l: max_isometric_force=281.3115 optimal_fiber_length=0.25064
        tendon_slack_length=0.1892605 pennation_angle_at_optimal=0.1720016 ignore_tendon_compliance=true
      PathPoint P1: pelvis (-0.04487547 -0.1276635 -0.02476729)
      PathPoint P2: tibia_l (-0.019052 -0.05297858 0.03019536)
      PathPoint P3: tibia_l (0.001841072 -0.07756822 0.01604097)
      PathWrap: wrap_object=GR_at_condyles_l method=hybrid
    Millard2012EquilibriumMuscle iliacus_l: max_isometric_force=1021.141 optimal_fiber_length=0.1078167
        tendon_slack_length=0.09721777 pennation_angle_at_optimal=0.279914 ignore_tendon_compliance=true
      PathPoint P1: pelvis (-0.05732614 0.0305042 -0.0850115)
      PathPoint P2: pelvis (-0.01279178 -0.05498653 -0.07623807)
      PathPoint P3: femur_l (-0.002562913 -0.06140865 -0.01507489)
      PathPoint P4: femur_l (-0.01359458 -0.06923417 -0.02125667)
      PathWrap: wrap_object=IL_at_brim_l method=hybrid range=(2 3)
    Millard2012EquilibriumMuscle perbrev_l: max_isometric_force=521.2016 optimal_fiber_length=0.05684354
        tendon_slack_length=0.1847134 pennation_angle_at_optimal=0.2052361
      PathPoint P1: tibia_l (-0.02513374 -0.2821068 -0.0255962)
      PathPoint P2: tibia_l (-0.03506312 -0.4337447 -0.02539225)
      PathPoint P3: tibia_l (-0.02947785 -0.446112 -0.02600411)
      PathPoint P4: calcn_l (0.06773513 0.02737971 -0.02240885)
      PathPoint P5: calcn_l (0.09736026 0.02220799 -0.03298814)
    Millard2012EquilibriumMuscle perlong_l: max_isometric_force=1115.371 optimal_fiber_length=0.06099558
        tendon_slack_length=0.3988976 pennation_angle_at_optimal=0.2479525
      PathPoint P1: tibia_l (-0.02068621 -0.152975 -0.02875749)
      PathPoint P2: tibia_l (-0.03278764 -0.4345247 -0.02416853)
      PathPoint P3: tibia_l (-0.02813324 -0.4472261 -0.02447446)
      PathPoint P4: calcn_l (0.06298935 0.02332346 -0.02125475)
      PathPoint P5: calcn_l (0.0979355 0.01074907 -0.02731379)
      PathPoint P6: calcn_l (0.1225272 0.006997038 -0.01134869)
      PathPoint P7: calcn_l (0.173005 0.00861954 0.01769626)
    Millard2012EquilibriumMuscle piri_l: max_isometric_force=1029.787 optimal_fiber_length=0.02626962
        tendon_slack_length=0.1160978 pennation_angle_at_optimal=0.1745329
      PathPoint P1: pelvis (-0.09646899 -0.006446356 -0.01362403)
      PathPoint P2: pelvis (-0.09666798 -0.03026727 -0.06143417)
      PathPoint P3: femur_l (-0.01649179 -0.003912763 -0.0473937)
    Millard2012EquilibriumMuscle psoas_l: max_isometric_force=1426.79 optimal_fiber_length=0.1180152
        tendon_slack_length=0.1004928 pennation_angle_at_optimal=0.2155251 ignore_tendon_compliance=true
      PathPoint P1: pelvis (-0.05742089 0.06120584 -0.03932916)
      PathPoint P2: pelvis (-0.01942456 -0.06456228 -0.06615367)
      PathPoint P3: femur_l (-0.01470889 -0.05075724 -0.004988811)
      PathPoint P4: femur_l (-0.02618628 -0.05695245 -0.009543812)
      PathWrap: wrap_object=PS_at_brim_l method=hybrid range=(2 3)
    Millard2012EquilibriumMuscle recfem_l: max_isometric_force=2191.741 optimal_fiber_length=0.08231029
        tendon_slack_length=0.486372 pennation_angle_at_optimal=0.2170149
      PathPoint P1: pelvis (-0.02274095 -0.03830301 -0.09408746)
      PathPoint P2: patella_l (0.01 0.049 -0.0007)
      PathPoint P3: patella_l (0.0121 0.0437 0.001)
      PathPoint P4: patella_l (0.005 0.00247 -3e-5)
      PathPoint P5: tibia_l (0.03371852 -0.07032614 0.0004792914)
      PathWrap: wrap_object=KnExt_at_fem_l method=hybrid
    Millard2012EquilibriumMuscle sart_l: max_isometric_force=249.4131 optimal_fiber_length=0.4327158
        tendon_slack_length=0.1331431 pennation_angle_at_optimal=0.02613542 ignore_tendon_compliance=true
      PathPoint P1: pelvis (-0.01847702 -0.01540018 -0.1064913)
      PathPoint P2: femur_l (-0.00334293 -0.3877983 0.04565847)
      PathPoint P3: tibia_l (-0.02596119 -0.04467805 0.03722157)
      PathPoint P4: tibia_l (-0.01644554 -0.06673853 0.0269219)
      PathPoint P5: tibia_l (0.01406662 -0.09024743 0.002651399)
    Millard2012EquilibriumMuscle semimem_l: max_isometric_force=2200.987 optimal_fiber_length=0.07581055
        tendon_slack_length=0.381894 pennation_angle_at_optimal=0.2545615
      PathPoint P1: pelvis (-0.09352215 -0.1125398 -0.06191822)
      PathPoint P2: tibia_l (-0.029995 -0.04646071 0.01998747)
      PathWrap: wrap_object=SM_at_condyles_l method=hybrid
    Millard2012EquilibriumMuscle semiten_l: max_isometric_force=591.2951 optimal_fiber_length=0.2120182
        tendon_slack_length=0.2715579 pennation_angle_at_optimal=0.241295
      PathPoint P1: pelvis (-0.0983546 -0.123695 -0.05193467)
      PathPoint P2: tibia_l (-0.03227048 -0.05659962 0.02335271)
      PathPoint P3: tibia_l (0.00196519 -0.08612501 0.0119313)
      PathWrap: wrap_object=ST_at_condyles_l method=hybrid
    Millard2012EquilibriumMuscle soleus_l: max_isometric_force=6194.843 optimal_fiber_length=0.04809279
        tendon_slack_length=0.3024991 pennation_angle_at_optimal=0.3814289
      PathPoint P1: tibia_l (-0.007860759 -0.1020576 -0.009993737)
      PathPoint P2: calcn_l (0.006327698 0.03143597 0.005097293)
    Millard2012EquilibriumMuscle tfl_l: max_isometric_force=411.2066 optimal_fiber_length=0.1017878
        tendon_slack_length=0.4816141 pennation_angle_at_optimal=0.05235988
      PathPoint P1: pelvis (-0.02946848 0.02112588 -0.1251474)
      PathPoint P2: femur_l (0.03276071 -0.1081444 -0.06474609)
      PathPoint P3: femur_l (0.01192312 -0.4401859 -0.03513858)
      PathPoint P4: tibia_l (0.01117055 -0.0456808 -0.03528401)
    Millard2012EquilibriumMuscle tibant_l: max_isometric_force=1227.452 optimal_fiber_length=0.08352277
        tendon_slack_length=0.2940552 pennation_angle_at_optimal=0.1951828
      PathPoint P1: tibia_l (0.01592838 -0.1461785 -0.01652026)
      PathPoint P2: tibia_l (0.02596119 -0.21236 -0.01305304)
      PathPoint P3: tibia_l (0.02409943 -0.4076733 0.01346095)
      PathPoint P4: calcn_l (0.167684 0.01805033 0.02933348)
    Millard2012EquilibriumMuscle tibpost_l: max_isometric_force=1730.154 optimal_fiber_length=0.04353091
        tendon_slack_length=0.323349 pennation_angle_at_optimal=0.2264891
      PathPoint P1: tibia_l (-0.004240673 -0.1452872 -0.01050362)
      PathPoint P2: tibia_l (-0.01696269 -0.4072276 0.01784596)
      PathPoint P3: calcn_l (0.05996932 0.03386972 0.02750615)
      PathPoint P4: calcn_l (0.1110223 0.01612361 0.02702527)
    Millard2012EquilibriumMuscle vasint_l: max_isometric_force=1697.361 optimal_fiber_length=0.108805
        tendon_slack_length=0.2215663 pennation_angle_at_optimal=0.06309973
      PathPoint P1: femur_l (0.03231499 -0.2091155 -0.03362025)
      PathPoint P2: femur_l (0.03732938 -0.2265055 -0.03090894)
      PathPoint P3: patella_l (0.0058 0.048 0.0006)
      PathPoint P4: patella_l (0.005 0.00247 0.00039)
      PathPoint P5: tibia_l (0.03368749 -0.07041528 -0.0004385007)
      PathWrap: wrap_object=KnExt_at_fem_l method=hybrid
    Millard2012EquilibriumMuscle vaslat_l: max_isometric_force=5148.767 optimal_fiber_length=0.1089236
        tendon_slack_length=0.2417373 pennation_angle_at_optimal=0.2528673
      PathPoint P1: femur_l (0.005348688 -0.2015073 -0.03784989)
      PathPoint P2: femur_l (0.02997494 -0.2816103 -0.04435704)
      PathPoint P3: patella_l (0.0103 0.0423 -0.0141)
      PathPoint P4: patella_l (0.005 0.00247 -0.00733)
      PathPoint P5: tibia_l (0.03365646 -0.07061583 -0.00521102)
      PathWrap: wrap_object=KnExt_at_fem_l method=hybrid
    Millard2012EquilibriumMuscle vasmed_l: max_isometric_force=2747.823 optimal_fiber_length=0.1060347
        tendon_slack_length=0.2189752 pennation_angle_at_optimal=0.4222225
      PathPoint P1: femur_l (0.01560034 -0.2281358 -0.02038905)
      PathPoint P2: femur_l (0.03966943 -0.3009567 -0.0009760717)
      PathPoint P3: patella_l (0.0063 0.0445 0.017)
      PathPoint P4: patella_l (0.005 0.00247 0.0085)
      PathPoint P5: tibia_l (0.0329945 -0.07082752 0.006914034)
      PathWrap: wrap_object=KnExt_at_fem_l method=hybrid
    CoordinateActuator lumbar_ext: coordinate=lumbar_extension optimal_force=10
    CoordinateActuator lumbar_bend: coordinate=lumbar_bending optimal_force=10
    CoordinateActuator lumbar_twist: coordinate=lumbar_twist optimal_force=10
    CoordinateActuator thorax_ext: coordinate=thorax_extension optimal_force=10
    CoordinateActuator thorax_bend: coordinate=thorax_bending optimal_force=10
    CoordinateActuator thorax_twist: coordinate=thorax_twist optimal_force=10
    CoordinateActuator head_ext: coordinate=head_extension optimal_force=10
    CoordinateActuator head_twist: coordinate=head_twist optimal_force=10
    CoordinateActuator head_bending: coordinate=head_bending optimal_force=10
    CoordinateActuator scapula_abduction_r: coordinate=scapula_abduction_r optimal_force=10
    CoordinateActuator scapula_elevation_r: coordinate=scapula_elevation_r optimal_force=10
    CoordinateActuator scapula_upward_rot_r: coordinate=scapula_upward_rot_r optimal_force=10
    CoordinateActuator scapula_abduction_l: coordinate=scapula_abduction_l optimal_force=10
    CoordinateActuator scapula_elevation_l: coordinate=scapula_elevation_l optimal_force=10
    CoordinateActuator scapula_upward_rot_l: coordinate=scapula_upward_rot_l optimal_force=10
    ObjectGroup right_leg: members=(addbrev_r addlong_r addmagDist_r addmagIsch_r addmagMid_r addmagProx_r bflh_r bfsh_r edl_r ehl_r fdl_r fhl_r gaslat_r gasmed_r glmax1_r glmax2_r glmax3_r glmed1_r glmed2_r glmed3_r glmin1_r glmin2_r glmin3_r grac_r iliacus_r perbrev_r perlong_r piri_r psoas_r recfem_r sart_r semimem_r semiten_r soleus_r tfl_r tibant_r tibpost_r vasint_r vaslat_r vasmed_r)
    ObjectGroup left_leg: members=(addbrev_l addlong_l addmagDist_l addmagIsch_l addmagMid_l addmagProx_l bflh_l bfsh_l edl_l ehl_l fdl_l fhl_l gaslat_l gasmed_l glmax1_l glmax2_l glmax3_l glmed1_l glmed2_l glmed3_l glmin1_l glmin2_l glmin3_l grac_l iliacus_l perbrev_l perlong_l piri_l psoas_l recfem_l sart_l semimem_l semiten_l soleus_l tfl_l tibant_l tibpost_l vasint_l vaslat_l vasmed_l)
    ObjectGroup hip_add_r: members=(addbrev_r addlong_r addmagDist_r addmagIsch_r addmagMid_r addmagProx_r bflh_r grac_r semimem_r semiten_r)
    ObjectGroup hip_abd_r: members=(glmax1_r glmed1_r glmed2_r glmed3_r glmin1_r glmin2_r glmin3_r piri_r sart_r tfl_r)
    ObjectGroup hip_flex_r: members=(addbrev_r addlong_r glmin1_r grac_r iliacus_r psoas_r recfem_r sart_r tfl_r)
    ObjectGroup hip_ext_r: members=(addlong_r addmagDist_r addmagIsch_r addmagMid_r addmagProx_r bflh_r glmax1_r glmax2_r glmax3_r glmed1_r glmed2_r glmed3_r glmin3_r semimem_r semiten_r)
    ObjectGroup hip_inrot_r: members=(glmed1_r glmed2_r glmed3_r glmin1_r iliacus_r psoas_r tfl_r)
    ObjectGroup hip_exrot_r: members=(glmin3_r piri_r)
    ObjectGroup knee_flex_r: members=(bflh_r bfsh_r gaslat_r gasmed_r grac_r sart_r semimem_r semiten_r)
    ObjectGroup knee_ext_r: members=(recfem_r vasint_r vaslat_r vasmed_r)
    ObjectGroup ankle_df_r: members=(edl_r ehl_r tibant_r)
    ObjectGroup ankle_pf_r: members=(fdl_r fhl_r gaslat_r gasmed_r perbrev_r perlong_r soleus_r tibpost_r)
    ObjectGroup everter_r: members=(edl_r perbrev_r perlong_r)
    ObjectGroup inverter_r: members=(ehl_r fdl_r fhl_r tibant_r tibpost_r)
    ObjectGroup hip_add_l: members=(addbrev_l addlong_l addmagDist_l addmagIsch_l addmagMid_l addmagProx_l bflh_l grac_l semimem_l semiten_l)
    ObjectGroup hip_abd_l: members=(glmax1_l glmed1_l glmed2_l glmed3_l glmin1_l glmin2_l glmin3_l piri_l sart_l tfl_l)
    ObjectGroup hip_flex_l: members=(addbrev_l addlong_l glmin1_l grac_l iliacus_l psoas_l recfem_l sart_l tfl_l)
    ObjectGroup hip_ext_l: members=(addlong_l addmagDist_l addmagIsch_l addmagMid_l addmagProx_l bflh_l glmax1_l glmax2_l glmax3_l glmed1_l glmed2_l glmed3_l glmin3_l semimem_l semiten_l)
    ObjectGroup hip_exrot_l: members=(glmin3_l piri_l)
    ObjectGroup hip_inrot_l: members=(glmed1_l glmed2_l glmed3_l glmin1_l iliacus_l psoas_l tfl_l)
    ObjectGroup knee_flex_l: members=(bflh_l bfsh_l gaslat_l gasmed_l grac_l sart_l semimem_l semiten_l)
    ObjectGroup knee_ext_l: members=(recfem_l vasint_l vaslat_l vasmed_l)
    ObjectGroup ankle_df_l: members=(edl_l ehl_l tibant_l)
    ObjectGroup ankle_pf_l: members=(fdl_l fhl_l gaslat_l gasmed_l perbrev_l perlong_l soleus_l tibpost_l)
    ObjectGroup everter_l: members=(edl_l perbrev_l perlong_l)
    ObjectGroup inverter_l: members=(ehl_l fdl_l fhl_l tibant_l tibpost_l)
  MarkerSet:
    Marker C7: thorax (-0.0748288 0.05049506 -0.008735363) fixed=true
    Marker CLAV: thorax (0.07419415 0 0.001598702) fixed=true
    Marker LANK: calcn_l (0.07733347 0.03853282 -0.03895296) fixed=true
    Marker LBHD: head (-0.08497051 0.0401805 -0.04825681) fixed=true
    Marker LFHD: head (0.0795527 0.07799744 -0.05766126) fixed=true
    Marker LBWT: pelvis (-0.146814 0.05024053 -0.03413861) fixed=true
    Marker LELB: ulna_l (0.006327343 -0.3046764 -0.05420735) fixed=true
    Marker LFIN: hand_l (0.004616752 -0.11216 -0.0318619) fixed=true
    Marker LFRM: radius_l (0.001063468 -0.05814875 -0.02845683) fixed=true
    Marker LFWT: pelvis (0.007352276 0.01510208 -0.1206653) fixed=true
    Marker LHEE: calcn_l (-0.01851578 0.0130705 0.01174391) fixed=true
    Marker LKNE: femur_l (-0.007013971 -0.4428279 -0.04949794)
    Marker LMT5: toes_l (-0.004193196 0.01116593 -0.02398807) fixed=true
    Marker LSHN: tibia_l (-0.04689046 -0.118994 -0.0525283) fixed=true
    Marker LSHO: scapula_l (0 0.0107759 0) fixed=true
    Marker LTHI: femur_l (-0.04867752 -0.175494 -0.09777636) fixed=true
    Marker LTOE: toes_l (0.01135798 0.001619077 0.01462084) fixed=true
    Marker LUPA: humerus_l (-0.002523941 -0.1711322 -0.04568672)
    Marker LWRA: radius_l (0.04871972 -0.2266991 -0.03029806)
    Marker LWRB: ulna_l (-0.01401327 -0.2455988 -0.05552071) fixed=true
    Marker RANK: calcn_r (0.07486161 0.04171092 0.04122862) fixed=true
    Marker RBAC: scapula_r (-0.08946598 0 -0.06726036) fixed=true
    Marker RBHD: head (-0.08394625 0.04254406 0.04977296) fixed=true
    Marker RBWT: pelvis (-0.1469127 0.05373024 0.03818055) fixed=true
    Marker RELB: ulna_r (-0.0007607707 -0.3071945 0.04644284) fixed=true
    Marker RFHD: head (0.07920567 0.0744521 0.06115165) fixed=true
    Marker RFIN: hand_r (0.004616752 -0.11216 0.0318619) fixed=true
    Marker RFRM: radius_r (-0.02723632 -0.1267382 0.02774169) fixed=true
    Marker RFWT: pelvis (0.006287313 0.01844469 0.1168308) fixed=true
    Marker RHEE: calcn_r (-0.02371678 0.009789098 -0.01096852) fixed=true
    Marker RKNE: femur_r (-0.0006759168 -0.4361658 0.05291078)
    Marker RMT5: toes_r (0.00334606 0.01916684 0.02196086) fixed=true
    Marker RSHN: tibia_r (-0.02036867 -0.1962703 0.05142083) fixed=true
    Marker RSHO: scapula_r (0 0.0107759 0) fixed=true
    Marker RTHI: femur_r (-0.03992238 -0.2620541 0.07682552) fixed=true
    Marker RTOE: toes_r (0.009088079 0.002711606 -0.01942649) fixed=true
    Marker RUPA: humerus_r (-0.02673501 -0.07269027 0.05166196)
    Marker RWRA: radius_r (0.04871972 -0.2266991 0.03029806) fixed=true
    Marker RWRB: ulna_r (-0.01401327 -0.2455988 0.05552071) fixed=true
    Marker STRN: thorax (0.1402404 -0.1446918 0.001598702) fixed=true
    Marker T8: thorax (-0.09600703 -0.1358267 0) fixed=true
    Marker T10: thorax (-0.09160394 -0.1916895 0) fixed=true
    Marker THD: head (0.008924364 0.1890847 0.01028621) fixed=true
    Marker RHPI: hand_r (-0.02924969 -0.07819555 0.011336) fixed=true
    Marker RHTH: hand_r (0.04830842 -0.05344801 0.03332247) fixed=true
    Marker NOSE: head (0.1131786 0.07090676 6.074445e-5) fixed=true
    Marker LHPI: hand_l (-0.02924969 -0.07819555 -0.011336) fixed=true
    Marker LHTH: hand_l (0.04830842 -0.05344801 -0.03332247) fixed=true
    Marker FBBT: tibia_l (0.01865689 -0.3282232 -0.02436228)
    Marker FLFB: femur_l (0.08247008 -0.3267701 -0.01169659)
    Marker FLFE: femur_l (0.01375504 -0.2391296 0.06267899)
    Marker FLHU: humerus_l (0.05502616 -0.1181588 -0.002505616)
    Marker FLTI: tibia_l (0.01308196 -0.203216 0.01388314)
    Marker FRBT: tibia_r (0.01870861 -0.3347868 0.02273881)
    Marker FRFB: femur_r (0.0853216 -0.3248268 -0.006499553)
    Marker FRFE: femur_r (0.008194635 -0.2439054 -0.06723182)
    Marker FRHU: humerus_r (0.05111561 -0.1218325 -0.003143385)
    Marker FRTI: tibia_r (0.009634601 -0.2039703 -0.01027213)
    Marker CHIN: head (0.1068389 -0.04136228 -0.0002588533) fixed=true
    Marker BLFE: femur_l (0.06578814 -0.004377854 -0.0902602)
    Marker BLHU: humerus_l (-0.01022191 -0.1980645 0.05915875)
    Marker BLTI: tibia_l (-0.07410834 -0.2860576 -0.006589748)
    Marker BRFE: femur_r (-0.07668792 -0.2923139 0.02024156)
    Marker BRHU: humerus_r (-0.01660796 -0.2015175 -0.0495628)
    Marker BRTI: tibia_r (-0.07278959 -0.2735132 0.009210554)
    Marker LKNI: femur_l (-0.001302864 -0.4435106 0.05048966) fixed=true
    Marker RKNI: femur_r (-0.004601997 -0.4373444 -0.04911246) fixed=true
    Marker LAKI: tibia_l (0.00468386 -0.4229685 0.02962735)
    Marker RAKI: tibia_r (-0.0006702331 -0.4243991 -0.02459887)
    Marker LSH: scapula_l (0.0121676 0.02851577 -0.01516601) fixed=true
    Marker RSH: scapula_r (0.02249506 0.02042438 0.01428395) fixed=true
    Marker T7: thorax (-0.0986714 -0.1516353 -0.0006807567) fixed=true
    Marker MAN: thorax (0.0858238 -0.007803189 -0.001297838) fixed=true
    Marker RASI: pelvis (0.02438213 0.02929617 0.1007802) fixed=true
    Marker LASI: pelvis (0.02290784 0.02457964 -0.1115488) fixed=true
    Marker SACR: pelvis (-0.1637866 0.04279134 0.003919365) fixed=true
    Marker RTHAP: femur_r (0.115076 -0.2132737 -0.02835686)
    Marker RTHAD: femur_r (0.1080469 -0.3077238 -0.04981305)
    Marker RTHLD: femur_r (0.02649372 -0.3080529 0.04686993)
    Marker RTHLP: femur_r (0.01943271 -0.1996881 0.07836665)
    Marker RLEPI: femur_r (0.006059315 -0.439369 -0.006704401)
    Marker RMEPI: femur_r (0 -0.439099 -0.05422621)
    Marker RTIAP: tibia_r (0.04149521 -0.2095839 -0.0640375)
    Marker RTIAD: tibia_r (0.04100036 -0.337681 -0.05844885)
    Marker RTILAT: tibia_r (0.01212608 -0.2160119 0.01964097)
    Marker RLMAL: tibia_r (0.03185826 -0.4539405 0.01519451)
    Marker RMMAL: tibia_r (0.006205862 -0.4331877 -0.03875122)
    Marker RHEEL: calcn_r (0.01839913 -0.01029804 -0.02498222)
    Marker RMFS: calcn_r (0.1872417 0.02643166 -0.02806362) fixed=true
    Marker RMFL: calcn_r (0.1482914 0.001685885 0.03186381) fixed=true
    Marker RP1MT: calcn_r (0.2504654 -0.02971181 -0.05430544)
    Marker RP5MT: calcn_r (0.221809 -0.02851512 0.06518177)
    Marker RTOE_0: toes_r (0.009088079 0.002711606 -0.01942649)
    Marker LTHAP: femur_l (0.1203476 -0.220701 -0.005471116)
    Marker LTHAD: femur_l (0.1107841 -0.3323207 0.009882372)
    Marker LTHLD: femur_l (0.00701411 -0.3342857 -0.06697904)
    Marker LTHLP: femur_l (-0.001656677 -0.223419 -0.09212208)
    Marker LLEPI: femur_l (0.002180621 -0.4406639 -0.03214535)
    Marker LMEPI: femur_l (0 -0.439099 0.05422621)
    Marker LTIAP: tibia_l (0.04809743 -0.1621123 0.03603938)
    Marker LTIAD: tibia_l (0.04846182 -0.3013235 0.03354048)
    Marker LTILAT: tibia_l (0.01049626 -0.2312449 -0.03825153)
    Marker LLMAL: tibia_l (0.02532584 -0.4489447 -0.02097895)
    Marker LMMAL: tibia_l (0.006205862 -0.4331877 0.03875122)
    Marker LHEEL: calcn_l (0.01970972 -0.002656275 0.02933632)
    Marker LMFS: calcn_l (0.1843225 0.0290728 0.02594878) fixed=true
    Marker LMFL: calcn_l (0.1515227 0.006278774 -0.03622069) fixed=true
    Marker LP1MT: calcn_l (0.249699 -0.02734547 0.04918785)
    Marker LP5MT: calcn_l (0.2158294 -0.02933601 -0.06969372)
    Marker LTOE_0: toes_l (0.01135798 0.001619077 0.01462084)
    Marker RARM: humerus_r (0.005752648 -0.1425992 0.05241285)
    Marker RELB_0: humerus_r (-0.0008510369 -0.2865057 0.06215267) fixed=true
    Marker RFOREARM: radius_r (-0.01734964 -0.1267235 0.03448419)
    Marker RWR: radius_r (-0.03735439 -0.2531005 0.01741401) fixed=true
    Marker LARM: humerus_l (0.008254529 -0.1435606 -0.06522782)
    Marker LELB_0: humerus_l (0.007078088 -0.2841573 -0.07254361) fixed=true
    Marker LFOREARM: radius_l (-0.009447839 -0.1291586 -0.03159779)
    Marker LWR: radius_l (-0.0387066 -0.2522787 -0.01320693) fixed=true
