# OpenSim document version 40000
ScaleTool optimized_scale_and_markers:
  mass: 68
  height: 1.7
  age: -1
  GenericModelMaker:
    model_file: Models/unscaled_but_with_optimized_markers.osim
  ModelScaler:
    apply: true
    scaling_order: manualScale
    time_range: -1 1
    preserve_mass_distribution: false
    output_model_file: Models/optimized_scale_and_markers.osim
    ScaleSet:
      Scale: scales=(0.9475395 0.9871909 1.00844) segment=pelvis apply=true
      Scale: scales=(1.11431 1.086879 1.084524) segment=femur_r apply=true
      Scale: scales=(1.03431 1.114166 1.019769) segment=tibia_r apply=true
      Scale: scales=(0.8343168 0.9218898 0.8951201) segment=talus_r apply=true
      Scale: scales=(1.438113 1.014064 0.9617533) segment=calcn_r apply=true
      Scale: scales=(1.013094 1.01938 1.007521) segment=toes_r apply=true
      Scale: scales=(1.11431 1.086879 1.084524) segment=femur_l apply=true
      Scale: scales=(1.03431 1.114166 1.019769) segment=tibia_l apply=true
      Scale: scales=(0.8343168 0.9218898 0.8951201) segment=talus_l apply=true
      Scale: scales=(1.438113 1.014064 0.9617533) segment=calcn_l apply=true
      Scale: scales=(1.013094 1.01938 1.007521) segment=toes_l apply=true
      Scale: scales=(0.989309 0.9976518 0.9792562) segment=lumbar_body apply=true
      Scale: scales=(1.100771 0.9043239 1.240266) segment=thorax apply=true
      Scale: scales=(1.294887 1.181779 1.082963) segment=head apply=true
      Scale: scales=(0.8133271 1.07759 0.8407545) segment=scapula_r apply=true
      Scale: scales=(1.009173 0.9551816 1.337042) segment=humerus_r apply=true
      Scale: scales=(0.9021337 1.024156 0.9990885) segment=ulna_r apply=true
      Scale: scales=(0.9021337 1.024156 0.9990885) segment=radius_r apply=true
      Scale: scales=(1.017796 1.017796 1.017796) segment=hand_r apply=true
      Scale: scales=(0.8133271 1.07759 0.8407545) segment=scapula_l apply=true
      Scale: scales=(1.009173 0.9551816 1.337042) segment=humerus_l apply=true
      Scale: scales=(0.9021337 1.024156 0.9990885) segment=ulna_l apply=true
      Scale: scales=(0.9021337 1.024156 0.9990885) segment=radius_l apply=true
      Scale: scales=(1.017796 1.017796 1.017796) segment=hand_l apply=true
