# OpenSim document version 40000
InverseKinematicsTool STSweakLegs1:
  model_file: Models/manually_scaled.osim
  marker_file: ../MarkerData/STSweakLegs1.trc
  output_motion_file: STSweakLegs1_ik_on_manual_scaling_by_opensim.mot
  accuracy: 1e-5
  report_errors: true
  IKTaskSet IK_tasks:
    IKMarkerTask C7: weight=1 apply=true
    IKMarkerTask L.ASIS: weight=1 apply=true
    IKMarkerTask L.PSIS: weight=1 apply=true
    IKMarkerTask L_5meta: weight=1 apply=true
    IKMarkerTask L_HJC: weight=1 apply=true
    IKMarkerTask L_Shoulder: weight=1 apply=true
    IKMarkerTask L_Sternum: weight=1 apply=true
    IKMarkerTask L_ankle: weight=1 apply=true
    IKMarkerTask L_calc: weight=1 apply=true
    IKMarkerTask L_elbow_lat: weight=1 apply=true
    IKMarkerTask L_elbow_med: weight=1 apply=true
    IKMarkerTask L_knee: weight=1 apply=true
    IKMarkerTask L_mankle: weight=1 apply=true
    IKMarkerTask L_mknee: weight=1 apply=true
    IKMarkerTask L_sh2: weight=1 apply=true
    IKMarkerTask L_sh3: weight=1 apply=true
    IKMarkerTask L_shank_antsup: weight=1 apply=true
    IKMarkerTask L_thigh1: weight=1 apply=true
    IKMarkerTask L_thigh2: weight=1 apply=true
    IKMarkerTask L_thigh3: weight=1 apply=true
    IKMarkerTask L_thigh4: weight=1 apply=true
    IKMarkerTask L_toe: weight=1 apply=true
    IKMarkerTask L_wrist_radius: weight=1 apply=true
    IKMarkerTask L_wrist_ulna: weight=1 apply=true
    IKMarkerTask R_HJC: weight=1 apply=true
    IKMarkerTask R_Shoulder: weight=1 apply=true
    IKMarkerTask R_Sternum: weight=1 apply=true
    IKMarkerTask R_elbow_lat: weight=1 apply=true
    IKMarkerTask R_elbow_med: weight=1 apply=true
    IKMarkerTask R_wrist_radius: weight=1 apply=true
    IKMarkerTask R_wrist_ulna: weight=1 apply=true
    IKMarkerTask r.ASIS: weight=1 apply=true
    IKMarkerTask r.PSIS: weight=1 apply=true
    IKMarkerTask r_5meta: weight=1 apply=true
    IKMarkerTask r_ankle: weight=1 apply=true
    IKMarkerTask r_calc: weight=1 apply=true
    IKMarkerTask r_knee: weight=1 apply=true
    IKMarkerTask r_mankle: weight=1 apply=true
    IKMarkerTask r_mknee: weight=1 apply=true
    IKMarkerTask r_sh2: weight=1 apply=true
    IKMarkerTask r_sh3: weight=1 apply=true
    IKMarkerTask r_sh4: weight=1 apply=true
    IKMarkerTask r_shank_antsup: weight=1 apply=true
    IKMarkerTask r_thigh1: weight=1 apply=true
    IKMarkerTask r_thigh2: weight=1 apply=true
    IKMarkerTask r_thigh3: weight=1 apply=true
    IKMarkerTask r_thigh4: weight=1 apply=true
    IKMarkerTask r_thigh5: weight=1 apply=true
    IKMarkerTask r_toe: weight=1 apply=true
