# OpenSim document version 30516
Model subject01:
  gravity: 0 -9.80665 0
  length_units: meters
  force_units: N
  credits:
    Delp S.L., Loan J.P., Hoy M.G., Zajac F.E., Topp E.L., Rosen J.M., Thelen D.G., Anderson F.C., Seth A. Notes: 3D, 23 DOF gait model created by D.G. Thelen, Univ. of Wisconsin-Madison, and Ajay Seth, Frank C. Anderson, and Scott L. Delp, Stanford University. Lower extremity joint defintions based on Delp et al. (1990). Low back joint and anthropometry based on Anderson and Pandy (1999, 2001). Planar knee model of Yamaguchi and Zajac (1989). Seth replaced tibia translation constraints with a CustomJoint for the knee and removed the patella to eliminate all kinematic constraints; insertions of the quadrucepts are handled with moving points in the tibia frame as defined by Delp 1990. Number of muscles was reduced by Anderson to improve simulation speed for demonstrations and is not intended to be used in research. License: Creative Commons (CCBY 3.0). You are free to distribute, remix, tweak, and build upon this work, even commercially, as long as you credit us for the original creation. http://creativecommons.org/licenses/by/3.0/ More Information: http://simtk-confluence.stanford.edu:8080/display/OpenSim/Gait+2392+and+2354+Models
  publications:
    Delp, S.L., Loan, J.P., Hoy, M.G., Zajac, F.E., Topp E.L., Rosen, J.M.: An interactive graphics-based model of the lower extremity to study orthopaedic surgical procedures, IEEE Transactions on Biomedical Engineering, vol. 37, pp. 757-767, 1990. Yamaguchi G.T., Zajac F.E.: A planar model of the knee joint to characterize the knee extensor mechanism." J . Biomech. vol. 22. pp. 1-10. 1989. Anderson F.C., Pandy M.G.: A dynamic optimization solution for vertical jumping in three dimensions. Computer Methods in Biomechanics and Biomedical Engineering 2:201-231, 1999. Anderson F.C., Pandy M.G.: Dynamic optimization of human walking. Journal of Biomechanical Engineering 123:381-390, 2001.
  Ground
  BodySet:
    Body pelvis: mass=11.37517 [kg] mass_center=(-0.0724376 0 0) inertia=(0.1042331 0.08831422 0.05870716 0 0 0)
        meshes=(sacrum.vtp pelvis.vtp l_pelvis.vtp)
    Body femur_r: mass=8.984038 mass_center=(0 -0.1950308 0) inertia=(0.1702207 0.04462096 0.1795009 0 0 0)
        meshes=femur_r.vtp
    Body tibia_r: mass=3.581001 mass_center=(0 -0.1845572 0) inertia=(0.04756937 0.004813567 0.04823005 0 0 0)
        meshes=(tibia_r.vtp fibula.vtp)
    Body talus_r: mass=0.09658802 mass_center=(0 0 0) inertia=(0.001198606 0.001198606 0.001198606 0 0 0)
        meshes=talus.vtp
    Body calcn_r: mass=1.20735 mass_center=(0.1027085 0.03081254 0) inertia=(0.001426474 0.003973749 0.004177531 0 0 0)
        meshes=foot.vtp
    Body toes_r: mass=0.2092097 mass_center=(0.03553713 0.006162509 -0.01797398)
        inertia=(0.000101891 0.000203782 0.000101891 0 0 0) meshes=bofoot.vtp
    Body femur_l: mass=8.984038 mass_center=(0 -0.1950308 0) inertia=(0.1702207 0.04462096 0.1795009 0 0 0)
        meshes=femur_l.vtp
    Body tibia_l: mass=3.581001 mass_center=(0 -0.1845572 0) inertia=(0.04756937 0.004813567 0.04823005 0 0 0)
        meshes=(tibia_l.vtp l_fibula.vtp)
    Body talus_l: mass=0.09658802 mass_center=(0 0 0) inertia=(0.001198606 0.001198606 0.001198606 0 0 0)
        meshes=l_talus.vtp
    Body calcn_l: mass=1.20735 mass_center=(0.1027085 0.03081254 0) inertia=(0.001426474 0.003973749 0.004177531 0 0 0)
        meshes=l_foot.vtp
    Body toes_l: mass=0.2092097 mass_center=(0.03553713 0.006162509 0.01797398)
        inertia=(0.000101891 0.000203782 0.000101891 0 0 0) meshes=l_bofoot.vtp
    Body torso: mass=33.06845 mass_center=(-0.0323916 0.3455104 0) inertia=(1.660314 0.8507069 1.611783 0 0 0)
        meshes=(hat_spine.vtp hat_jaw.vtp hat_skull.vtp hat_ribs.vtp)
  JointSet:
    CustomJoint ground_pelvis: socket_parent_frame_connectee_name=../ground socket_child_frame_connectee_name=../pelvis
      Coordinate pelvis_tilt: default_value=0 range=(-1.570796 1.570796) clamped=false
      Coordinate pelvis_list: default_value=0 range=(-1.570796 1.570796) clamped=false
      Coordinate pelvis_rotation: default_value=0 range=(-1.570796 1.570796) clamped=false
      Coordinate pelvis_tx: default_value=0 range=(-5 5) clamped=false
      Coordinate pelvis_ty: default_value=0.95 range=(-1 2) clamped=false
      Coordinate pelvis_tz: default_value=0 range=(-3 3) clamped=false
      SpatialTransform:
        TransformAxis rotation1: coordinates=pelvis_tilt axis=(0 0 1) LinearFunction(coefficients=1 0)
        TransformAxis rotation2: coordinates=pelvis_list axis=(1 0 0) LinearFunction(coefficients=1 0)
        TransformAxis rotation3: coordinates=pelvis_rotation axis=(0 1 0) LinearFunction(coefficients=1 0)
        TransformAxis translation1: coordinates=pelvis_tx axis=(1 0 0) LinearFunction(coefficients=1 0)
        TransformAxis translation2: coordinates=pelvis_ty axis=(0 1 0) LinearFunction(coefficients=1 0)
        TransformAxis translation3: coordinates=pelvis_tz axis=(0 0 1) LinearFunction(coefficients=1 0)
    CustomJoint hip_r: socket_parent_frame_connectee_name=pelvis_offset socket_child_frame_connectee_name=../femur_r
      Coordinate hip_flexion_r: default_value=0 range=(-2.094395 2.094395) clamped=false
      Coordinate hip_adduction_r: default_value=0 range=(-2.094395 2.094395) clamped=false
      Coordinate hip_rotation_r: default_value=0 range=(-2.094395 2.094395) clamped=false
      PhysicalOffsetFrame pelvis_offset: socket_parent_connectee_name=../../pelvis
          translation=(-0.0724376 -0.06772454 0.08555218) [meters]
      SpatialTransform: axes_held_at_zero=(translation1 translation2 translation3)
        TransformAxis rotation1: coordinates=hip_flexion_r axis=(0 0 1) LinearFunction(coefficients=1 0)
        TransformAxis rotation2: coordinates=hip_adduction_r axis=(1 0 0) LinearFunction(coefficients=1 0)
        TransformAxis rotation3: coordinates=hip_rotation_r axis=(0 1 0) LinearFunction(coefficients=1 0)
    CustomJoint knee_r: socket_parent_frame_connectee_name=../femur_r socket_child_frame_connectee_name=../tibia_r
      Coordinate knee_angle_r: default_value=0 range=(-2.094395 0.1745329) clamped=false
      SpatialTransform: axes_held_at_zero=(rotation2 rotation3 translation3)
        TransformAxis rotation1: coordinates=knee_angle_r axis=(0 0 1) LinearFunction(coefficients=1 0)
        TransformAxis translation1: coordinates=knee_angle_r axis=(1 0 0)
          MultiplierFunction: scale=1.14724
            SimmSpline: x=(-2.0944 -1.74533 -1.39626 -1.0472 -0.698132 -0.349066 -0.174533 0.197344 0.337395 0.490178 1.52146 2.0944)
                y=(-0.0032 0.00179 0.00411 0.0041 0.00212 -0.001 -0.0031 -0.005227 -0.005435 -0.005574 -0.005435 -0.00525)
        TransformAxis translation2: coordinates=knee_angle_r axis=(0 1 0)
          MultiplierFunction: scale=1.14724
            SimmSpline: x=(-2.0944 -1.22173 -0.523599 -0.349066 -0.174533 0.159149 2.0944)
                y=(-0.4226 -0.4082 -0.399 -0.3976 -0.3966 -0.395264 -0.396)
    CustomJoint ankle_r: socket_parent_frame_connectee_name=tibia_r_offset socket_child_frame_connectee_name=../talus_r
      Coordinate ankle_angle_r: default_value=0 range=(-1.570796 1.570796) clamped=false
      PhysicalOffsetFrame tibia_r_offset: socket_parent_connectee_name=../../tibia_r translation=(0 -0.4250649 0)
      SpatialTransform: axes_held_at_zero=(rotation2 rotation3 translation1 translation2 translation3)
        TransformAxis rotation1: coordinates=ankle_angle_r axis=(-0.1050135 -0.1740224 0.9791263)
            LinearFunction(coefficients=1 0)
    CustomJoint subtalar_r: socket_parent_frame_connectee_name=talus_r_offset
        socket_child_frame_connectee_name=../calcn_r
      Coordinate subtalar_angle_r: default_value=0 range=(-1.570796 1.570796) clamped=false
      PhysicalOffsetFrame talus_r_offset: socket_parent_connectee_name=../../talus_r
          translation=(-0.05432871 -0.04673138 0.008822706)
      SpatialTransform: axes_held_at_zero=(rotation2 rotation3 translation1 translation2 translation3)
        TransformAxis rotation1: coordinates=subtalar_angle_r axis=(0.7871796 0.6047475 -0.1209495)
            LinearFunction(coefficients=1 0)
    CustomJoint mtp_r: socket_parent_frame_connectee_name=calcn_r_offset socket_child_frame_connectee_name=../toes_r
      Coordinate mtp_angle_r: default_value=0 range=(-1.570796 1.570796) clamped=false
      PhysicalOffsetFrame calcn_r_offset: socket_parent_connectee_name=../../calcn_r
          translation=(0.1836428 -0.00205417 0.001109252)
      SpatialTransform: axes_held_at_zero=(rotation2 rotation3 translation1 translation2 translation3)
        TransformAxis rotation1: coordinates=mtp_angle_r axis=(-0.5809544 0 0.8139361) LinearFunction(coefficients=1 0)
    CustomJoint hip_l: socket_parent_frame_connectee_name=pelvis_offset socket_child_frame_connectee_name=../femur_l
      Coordinate hip_flexion_l: default_value=0 range=(-2.094395 2.094395) clamped=false
      Coordinate hip_adduction_l: default_value=0 range=(-2.094395 2.094395) clamped=false
      Coordinate hip_rotation_l: default_value=0 range=(-2.094395 2.094395) clamped=false
      PhysicalOffsetFrame pelvis_offset: socket_parent_connectee_name=../../pelvis
          translation=(-0.0724376 -0.06772454 -0.08555218)
      SpatialTransform: axes_held_at_zero=(translation1 translation2 translation3)
        TransformAxis rotation1: coordinates=hip_flexion_l axis=(0 0 1) LinearFunction(coefficients=1 0)
        TransformAxis rotation2: coordinates=hip_adduction_l axis=(-1 0 0) LinearFunction(coefficients=1 0)
        TransformAxis rotation3: coordinates=hip_rotation_l axis=(0 -1 0) LinearFunction(coefficients=1 0)
    CustomJoint knee_l: socket_parent_frame_connectee_name=../femur_l socket_child_frame_connectee_name=../tibia_l
      Coordinate knee_angle_l: default_value=0 range=(-2.094395 0.1745329) clamped=false
      SpatialTransform: axes_held_at_zero=(rotation2 rotation3 translation3)
        TransformAxis rotation1: coordinates=knee_angle_l axis=(0 0 1) LinearFunction(coefficients=1 0)
        TransformAxis translation1: coordinates=knee_angle_l axis=(1 0 0)
          MultiplierFunction: scale=1.14724
            SimmSpline: x=(-2.0944 -1.74533 -1.39626 -1.0472 -0.698132 -0.349066 -0.174533 0.197344 0.337395 0.490178 1.52146 2.0944)
                y=(-0.0032 0.00179 0.00411 0.0041 0.00212 -0.001 -0.0031 -0.005227 -0.005435 -0.005574 -0.005435 -0.00525)
        TransformAxis translation2: coordinates=knee_angle_l axis=(0 1 0)
          MultiplierFunction: scale=1.14724
            SimmSpline: x=(-2.0944 -1.22173 -0.523599 -0.349066 -0.174533 0.159149 2.0944)
                y=(-0.4226 -0.4082 -0.399 -0.3976 -0.3966 -0.395264 -0.396)
    CustomJoint ankle_l: socket_parent_frame_connectee_name=tibia_l_offset socket_child_frame_connectee_name=../talus_l
      Coordinate ankle_angle_l: default_value=0 range=(-1.047198 1.047198) clamped=false
      PhysicalOffsetFrame tibia_l_offset: socket_parent_connectee_name=../../tibia_l translation=(0 -0.4250649 0)
      SpatialTransform: axes_held_at_zero=(rotation2 rotation3 translation1 translation2 translation3)
        TransformAxis rotation1: coordinates=ankle_angle_l axis=(0.1050135 0.1740224 0.9791263)
            LinearFunction(coefficients=1 0)
    CustomJoint subtalar_l: socket_parent_frame_connectee_name=talus_l_offset
        socket_child_frame_connectee_name=../calcn_l
      Coordinate subtalar_angle_l: default_value=0 range=(-1.570796 1.570796) clamped=false
      PhysicalOffsetFrame talus_l_offset: socket_parent_connectee_name=../../talus_l
          translation=(-0.05432871 -0.04673138 -0.008822706)
      SpatialTransform: axes_held_at_zero=(rotation2 rotation3 translation1 translation2 translation3)
        TransformAxis rotation1: coordinates=subtalar_angle_l axis=(-0.7871796 -0.6047475 -0.1209495)
            LinearFunction(coefficients=1 0)
    CustomJoint mtp_l: socket_parent_frame_connectee_name=calcn_l_offset socket_child_frame_connectee_name=../toes_l
      Coordinate mtp_angle_l: default_value=0 range=(-1.047198 1.047198) clamped=false
      PhysicalOffsetFrame calcn_l_offset: socket_parent_connectee_name=../../calcn_l
          translation=(0.1836428 -0.00205417 -0.001109252)
      SpatialTransform: axes_held_at_zero=(rotation2 rotation3 translation1 translation2 translation3)
        TransformAxis rotation1: coordinates=mtp_angle_l axis=(0.5809544 0 0.8139361) LinearFunction(coefficients=1 0)
    CustomJoint back: socket_parent_frame_connectee_name=pelvis_offset socket_child_frame_connectee_name=../torso
      Coordinate lumbar_extension: default_value=0 range=(-1.570796 1.570796) clamped=false
      Coordinate lumbar_bending: default_value=0 range=(-1.570796 1.570796) clamped=false
      Coordinate lumbar_rotation: default_value=0 range=(-1.570796 1.570796) clamped=false
      PhysicalOffsetFrame pelvis_offset: socket_parent_connectee_name=../../pelvis
          translation=(-0.1031749 0.08350303 0)
      SpatialTransform: axes_held_at_zero=(translation1 translation2 translation3)
        TransformAxis rotation1: coordinates=lumbar_extension axis=(0 0 1) LinearFunction(coefficients=1 0)
        TransformAxis rotation2: coordinates=lumbar_bending axis=(1 0 0) LinearFunction(coefficients=1 0)
        TransformAxis rotation3: coordinates=lumbar_rotation axis=(0 1 0) LinearFunction(coefficients=1 0)
  ForceSet:
    Thelen2003Muscle [values shared by the 54 below unless stated]: optimal_force=1 max_contraction_velocity=10
        FmaxTendonStrain=0.033 FmaxMuscleStrain=0.6 KshapeActive=0.5 KshapePassive=4 Af=0.3 Flen=1.8
        activation_time_constant=0.01 [seconds] deactivation_time_constant=0.04 [seconds]
    Thelen2003Muscle glut_med1_r: max_isometric_force=1119 optimal_fiber_length=0.05640635
        tendon_slack_length=0.08223729 pennation_angle_at_optimal=0.1396263 [radians]
      PathPoint P1: socket_parent_frame_connectee_name=../../../pelvis (-0.04180274 0.03114714 0.1238714)
      PathPoint P2: socket_parent_frame_connectee_name=../../../femur_r (-0.02500983 -0.01342271 0.06367182)
    Thelen2003Muscle glut_med2_r: max_isometric_force=873 optimal_fiber_length=0.08913177
        tendon_slack_length=0.05590513 pennation_angle_at_optimal=0
      PathPoint P1: socket_parent_frame_connectee_name=../../../pelvis (-0.08760134 0.04559368 0.0784826)
      PathPoint P2: socket_parent_frame_connectee_name=../../../femur_r (-0.02959879 -0.006653992 0.06045955)
    Thelen2003Muscle glut_med3_r: max_isometric_force=1000 optimal_fiber_length=0.06853064
        tendon_slack_length=0.05622483 pennation_angle_at_optimal=0.3316126
      PathPoint P1: socket_parent_frame_connectee_name=../../../pelvis (-0.1253058 0.01075806 0.06639259)
      PathPoint P2: socket_parent_frame_connectee_name=../../../femur_r (-0.03544972 -0.005392028 0.05942703)
    Thelen2003Muscle bifemlh_r: max_isometric_force=2700 optimal_fiber_length=0.1236311 tendon_slack_length=0.369759
        pennation_angle_at_optimal=0
      PathPoint P1: socket_parent_frame_connectee_name=../../../pelvis (-0.1290557 -0.1050909 0.07114663)
      PathPoint P2: socket_parent_frame_connectee_name=../../../tibia_r (-0.02975454 -0.03558683 0.02909223)
      PathPoint P3: socket_parent_frame_connectee_name=../../../tibia_r (-0.02313144 -0.05565384 0.03390634)
    Thelen2003Muscle bifemsh_r: max_isometric_force=804 optimal_fiber_length=0.1914449 tendon_slack_length=0.09848899
        pennation_angle_at_optimal=0.4014257
      PathPoint P1: socket_parent_frame_connectee_name=../../../femur_r (0.0057362 -0.2421824 0.02684542)
      PathPoint P2: socket_parent_frame_connectee_name=../../../tibia_r (-0.02975454 -0.03558683 0.02909223)
      PathPoint P3: socket_parent_frame_connectee_name=../../../tibia_r (-0.02313144 -0.05565384 0.03390634)
    Thelen2003Muscle sar_r: max_isometric_force=156 optimal_fiber_length=0.5742156 tendon_slack_length=0.1104261
        pennation_angle_at_optimal=0
      PathPoint P1: socket_parent_frame_connectee_name=../../../pelvis (-0.01567603 -0.00133195 0.1272525)
      PathPoint P2: socket_parent_frame_connectee_name=../../../femur_r (-0.00344172 -0.4093352 -0.0482988)
      PathPoint P3: socket_parent_frame_connectee_name=../../../tibia_r (-0.005535729 -0.04141911 -0.03944207)
      PathPoint P4: socket_parent_frame_connectee_name=../../../tibia_r (0.005931138 -0.058224 -0.03786043)
      PathPoint P5: socket_parent_frame_connectee_name=../../../tibia_r (0.02402111 -0.08303593 -0.02491078)
    Thelen2003Muscle add_mag2_r: max_isometric_force=2343 optimal_fiber_length=0.1409897 tendon_slack_length=0.1398245
        pennation_angle_at_optimal=0.05235988
      PathPoint P1: socket_parent_frame_connectee_name=../../../pelvis (-0.08514235 -0.1221296 0.03155697)
      PathPoint P2: socket_parent_frame_connectee_name=../../../femur_r (0.006195096 -0.2621443 0.02604235)
    Thelen2003Muscle tfl_r: max_isometric_force=233 optimal_fiber_length=0.1060379 tendon_slack_length=0.4743801
        pennation_angle_at_optimal=0.05235988
      PathPoint P1: socket_parent_frame_connectee_name=../../../pelvis (-0.03186435 0.02192595 0.12715)
      PathPoint P2: socket_parent_frame_connectee_name=../../../femur_r (0.03372886 -0.1141504 0.06849023)
      PathPoint P3: socket_parent_frame_connectee_name=../../../femur_r (0.006195096 -0.4645175 0.04095647)
      PathPoint P4: socket_parent_frame_connectee_name=../../../tibia_r (0.005931138 -0.04814107 0.02935913)
    Thelen2003Muscle pect_r: max_isometric_force=266 optimal_fiber_length=0.1116559 tendon_slack_length=0.03684646
        pennation_angle_at_optimal=0
      PathPoint P1: socket_parent_frame_connectee_name=../../../pelvis (-0.04415927 -0.07868752 0.04620842)
      PathPoint P2: socket_parent_frame_connectee_name=../../../femur_r (-0.01399633 -0.09430313 0.02902517)
    Thelen2003Muscle grac_r: max_isometric_force=162 optimal_fiber_length=0.3965859 tendon_slack_length=0.1419597
        pennation_angle_at_optimal=0.05235988
      PathPoint P1: socket_parent_frame_connectee_name=../../../pelvis (-0.07582895 -0.1216173 0.02862668)
      ConditionalPathPoint P2: socket_parent_frame_connectee_name=../../../tibia_r
          (-0.02626506 -0.03153388 -0.03730686) socket_coordinate_connectee_name=../../../knee_r/knee_angle_r
          range=(-0.436332 0.174533) [radians]
      PathPoint P3: socket_parent_frame_connectee_name=../../../tibia_r (-0.019207 -0.05093859 -0.03538912)
      PathPoint P4: socket_parent_frame_connectee_name=../../../tibia_r (0.005931138 -0.08264052 -0.02253832)
    Thelen2003Muscle glut_max1_r: max_isometric_force=573 optimal_fiber_length=0.151587 tendon_slack_length=0.1334393
        pennation_angle_at_optimal=0.08726646
      PathPoint P1: socket_parent_frame_connectee_name=../../../pelvis (-0.122437 0.06270411 0.07172039)
      PathPoint P2: socket_parent_frame_connectee_name=../../../pelvis (-0.1322729 0.001229492 0.09077753)
      PathPoint P3: socket_parent_frame_connectee_name=../../../femur_r (-0.05242887 -0.02845155 0.04497181)
      PathPoint P4: socket_parent_frame_connectee_name=../../../femur_r (-0.03177855 -0.06493378 0.05392028)
    Thelen2003Muscle glut_max2_r: max_isometric_force=819 optimal_fiber_length=0.1593947 tendon_slack_length=0.1377084
        pennation_angle_at_optimal=0
      PathPoint P1: socket_parent_frame_connectee_name=../../../pelvis (-0.1382154 0.01803256 0.05768369)
      PathPoint P2: socket_parent_frame_connectee_name=../../../pelvis (-0.1409818 -0.05327801 0.09364634)
      PathPoint P3: socket_parent_frame_connectee_name=../../../femur_r (-0.04887242 -0.06080372 0.03361413)
      PathPoint P4: socket_parent_frame_connectee_name=../../../femur_r (-0.01789694 -0.1165596 0.04806936)
    Thelen2003Muscle glut_max3_r: max_isometric_force=552 optimal_fiber_length=0.1562884 tendon_slack_length=0.1573737
        pennation_angle_at_optimal=0.08726646
      PathPoint P1: socket_parent_frame_connectee_name=../../../pelvis (-0.1594242 -0.03217172 0.005942547)
      PathPoint P2: socket_parent_frame_connectee_name=../../../pelvis (-0.1566578 -0.1077855 0.04129045)
      PathPoint P3: socket_parent_frame_connectee_name=../../../femur_r (-0.03430248 -0.1194277 0.01548774)
      PathPoint P4: socket_parent_frame_connectee_name=../../../femur_r (-0.00688344 -0.1627934 0.04715156)
    Thelen2003Muscle iliacus_r: max_isometric_force=1073 optimal_fiber_length=0.1061641 tendon_slack_length=0.1061641
        pennation_angle_at_optimal=0.1221731
      PathPoint P1: socket_parent_frame_connectee_name=../../../pelvis (-0.06905649 0.03739706 0.08749888)
      PathPoint P2: socket_parent_frame_connectee_name=../../../pelvis (-0.02643409 -0.05635174 0.0830932)
      ConditionalPathPoint P3: socket_parent_frame_connectee_name=../../../pelvis (-0.02950782 -0.08247845 0.08360549)
          socket_coordinate_connectee_name=../../../hip_r/hip_flexion_r range=(-1.5708 0.785398)
      PathPoint P4: socket_parent_frame_connectee_name=../../../femur_r (0.001950308 -0.06229513 0.006539268)
      PathPoint P5: socket_parent_frame_connectee_name=../../../femur_r (-0.02214173 -0.0712436 0.0147994)
    Thelen2003Muscle psoas_r: max_isometric_force=1113 optimal_fiber_length=0.1051723 tendon_slack_length=0.1682757
        pennation_angle_at_optimal=0.1396263
      PathPoint P1: socket_parent_frame_connectee_name=../../../pelvis (-0.06629013 0.09087998 0.02961028)
      PathPoint P2: socket_parent_frame_connectee_name=../../../pelvis (-0.02438493 -0.05840089 0.0777654)
      ConditionalPathPoint P3: socket_parent_frame_connectee_name=../../../pelvis (-0.02950782 -0.08247845 0.08360549)
          socket_coordinate_connectee_name=../../../hip_r/hip_flexion_r range=(-1.5708 0.785398)
      PathPoint P4: socket_parent_frame_connectee_name=../../../femur_r (0.001835584 -0.05816507 0.004359512)
      PathPoint P5: socket_parent_frame_connectee_name=../../../femur_r (-0.02156811 -0.06849023 0.0119313)
    Thelen2003Muscle quad_fem_r: max_isometric_force=381 optimal_fiber_length=0.05807418 tendon_slack_length=0.02581075
        pennation_angle_at_optimal=0
      PathPoint P1: socket_parent_frame_connectee_name=../../../pelvis (-0.1171092 -0.1179288 0.05327801)
      PathPoint P2: socket_parent_frame_connectee_name=../../../femur_r (-0.04370984 -0.04118592 0.04198898)
    Thelen2003Muscle gem_r: max_isometric_force=164 optimal_fiber_length=0.02609439 tendon_slack_length=0.04240338
        pennation_angle_at_optimal=0
      PathPoint P1: socket_parent_frame_connectee_name=../../../pelvis (-0.1160846 -0.08401532 0.0731548)
      PathPoint P2: socket_parent_frame_connectee_name=../../../femur_r (-0.01629081 -0.003785892 0.05082273)
    Thelen2003Muscle peri_r: max_isometric_force=444 optimal_fiber_length=0.02732926 tendon_slack_length=0.1208794
        pennation_angle_at_optimal=0.1745329
      PathPoint P1: socket_parent_frame_connectee_name=../../../pelvis (-0.143031 0.0003073731 0.02407756)
      PathPoint P2: socket_parent_frame_connectee_name=../../../pelvis (-0.122232 -0.02827833 0.06731471)
      PathPoint P3: socket_parent_frame_connectee_name=../../../femur_r (-0.01697915 -0.004130064 0.05013439)
    Thelen2003Muscle rect_fem_r: max_isometric_force=1169 optimal_fiber_length=0.1304623 tendon_slack_length=0.354766
        pennation_angle_at_optimal=0.08726646
      PathPoint P1: socket_parent_frame_connectee_name=../../../pelvis (-0.03022502 -0.03186435 0.09917906)
      ConditionalPathPoint P2: socket_parent_frame_connectee_name=../../../femur_r (0.03831782 -0.4623377 0.002179756)
          socket_coordinate_connectee_name=../../../knee_r/knee_angle_r range=(-2.61799 -1.45997)
      MovingPathPoint P3: socket_parent_frame_connectee_name=../../../tibia_r
          socket_x_coordinate_connectee_name=../../../knee_r/knee_angle_r
          socket_y_coordinate_connectee_name=../../../knee_r/knee_angle_r
          socket_z_coordinate_connectee_name=../../../knee_r/knee_angle_r
        x_location: MultiplierFunction: scale=0.988523
          SimmSpline: x=(-2.0944 -1.99997 -1.5708 -1.45752 -1.39626 -1.0472 -0.698132 -0.526391 -0.349066 -0.174533 0 0.00017453 0.00034907 0.0279253 0.0872665 0.174533 2.0944)
              y=(0.0155805 0.0179938 0.0275081 0.0296564 0.0307615 0.0365695 0.0422074 0.0450902 0.048391 0.0534299 0.0617576 0.0617669 0.0617762 0.0633083 0.066994 0.0733035 0.0573481)
        y_location: MultiplierFunction: scale=0.988523
          SimmSpline: x=(-2.0944 -1.99997 -1.5708 -1.45752 -1.39626 -1.0472 -0.698132 -0.526391 -0.349066 -0.174533 0 0.00017453 0.00034907 0.0279253 0.0872665 0.174533 2.0944)
              y=(0.0234116 0.0237613 0.0251141 0.0252795 0.0253146 0.0249184 0.0242373 0.0238447 0.0234197 0.0227644 0.020984 0.0209814 0.0209788 0.0205225 0.0191754 0.0159554 -0.0673774)
        z_location: MultiplierFunction: scale=0.988523
          SimmSpline: x=(-2.0944 0.1745) y=(0.0014 0.0014)
    Thelen2003Muscle vas_int_r: max_isometric_force=5000 optimal_fiber_length=0.1246787 tendon_slack_length=0.1351657
        pennation_angle_at_optimal=0.05235988
      PathPoint P1: socket_parent_frame_connectee_name=../../../femur_r (0.03326996 -0.220729 0.03556444)
      PathPoint P2: socket_parent_frame_connectee_name=../../../femur_r (0.03843254 -0.2390848 0.03269634)
      ConditionalPathPoint P3: socket_parent_frame_connectee_name=../../../femur_r (0.03935033 -0.4623377 0.00630982)
          socket_coordinate_connectee_name=../../../knee_r/knee_angle_r range=(-2.61799 -1.42)
      MovingPathPoint P4: socket_parent_frame_connectee_name=../../../tibia_r
          socket_x_coordinate_connectee_name=../../../knee_r/knee_angle_r
          socket_y_coordinate_connectee_name=../../../knee_r/knee_angle_r
          socket_z_coordinate_connectee_name=../../../knee_r/knee_angle_r
        x_location: MultiplierFunction: scale=0.988523
          SimmSpline: x=(-2.0944 -1.99997 -1.5708 -1.45752 -1.39626 -1.0472 -0.698132 -0.526391 -0.349066 -0.174533 0 0.00017453 0.00034907 0.0279253 0.0872665 0.174533 2.0944)
              y=(0.0082733 0.0106866 0.0202042 0.022353 0.0234583 0.0292715 0.0349465 0.037871 0.0412569 0.0465287 0.0554632 0.0554735 0.0554837 0.0571717 0.061272 0.0684368 0.0648818)
        y_location: MultiplierFunction: scale=0.988523
          SimmSpline: x=(-2.0944 -1.99997 -1.5708 -1.45752 -1.39626 -1.0472 -0.698132 -0.526391 -0.349066 -0.174533 0 0.00017453 0.00034907 0.0279253 0.0872665 0.174533 2.0944)
              y=(0.025599 0.0259487 0.0273124 0.0274796 0.0275151 0.0271363 0.0265737 0.0263073 0.0261187 0.0260129 0.0252923 0.0252911 0.0252898 0.0250526 0.0242191 0.0218288 -0.0685706)
        z_location: MultiplierFunction: scale=0.988523
          SimmSpline: x=(-2.0944 2.0944) y=(0.0018 0.0018)
    Thelen2003Muscle med_gas_r: max_isometric_force=2500 optimal_fiber_length=0.0901287 tendon_slack_length=0.3605148
        pennation_angle_at_optimal=0.296706
      PathPoint P1: socket_parent_frame_connectee_name=../../../femur_r (-0.02179756 -0.4507506 -0.02696014)
      ConditionalPathPoint P2: socket_parent_frame_connectee_name=../../../femur_r (-0.0344172 -0.4614199 -0.02959879)
          socket_coordinate_connectee_name=../../../knee_r/knee_angle_r range=(-0.785398 0.174533)
      PathPoint P3: socket_parent_frame_connectee_name=../../../calcn_r (0 0.03183963 -0.005443549)
    Thelen2003Muscle soleus_r: max_isometric_force=4000 optimal_fiber_length=0.0502888 tendon_slack_length=0.251444
        pennation_angle_at_optimal=0.4363323
      PathPoint P1: socket_parent_frame_connectee_name=../../../tibia_r (-0.002372455 -0.1515406 0.007018513)
      PathPoint P2: socket_parent_frame_connectee_name=../../../calcn_r (0 0.03183963 -0.005443549)
    Thelen2003Muscle tib_post_r: max_isometric_force=3600 optimal_fiber_length=0.03107549 tendon_slack_length=0.3107549
        pennation_angle_at_optimal=0.2094395
      PathPoint P1: socket_parent_frame_connectee_name=../../../tibia_r (-0.009292116 -0.1332529 0.001878194)
      PathPoint P2: socket_parent_frame_connectee_name=../../../tibia_r (-0.01423473 -0.4004507 -0.02263718)
      PathPoint P3: socket_parent_frame_connectee_name=../../../calcn_r (0.04282943 0.03430463 -0.02937462)
      PathPoint P4: socket_parent_frame_connectee_name=../../../calcn_r (0.07929094 0.01633065 -0.02886108)
    Thelen2003Muscle tib_ant_r: max_isometric_force=3000 optimal_fiber_length=0.09791263 tendon_slack_length=0.2228012
        pennation_angle_at_optimal=0.08726646
      PathPoint P1: socket_parent_frame_connectee_name=../../../tibia_r (0.01769456 -0.1605361 0.01136801)
      PathPoint P2: socket_parent_frame_connectee_name=../../../tibia_r (0.03252241 -0.3905654 -0.01749686)
      PathPoint P3: socket_parent_frame_connectee_name=../../../calcn_r (0.1197581 0.01828211 -0.03132609)
    Thelen2003Muscle glut_med1_l: max_isometric_force=1119 optimal_fiber_length=0.05640635
        tendon_slack_length=0.08223729 pennation_angle_at_optimal=0.1396263
      PathPoint P1: socket_parent_frame_connectee_name=../../../pelvis (-0.04180274 0.03114714 -0.1238714)
      PathPoint P2: socket_parent_frame_connectee_name=../../../femur_l (-0.02500983 -0.01342271 -0.06367182)
    Thelen2003Muscle glut_med2_l: max_isometric_force=873 optimal_fiber_length=0.08913177
        tendon_slack_length=0.05590513 pennation_angle_at_optimal=0
      PathPoint P1: socket_parent_frame_connectee_name=../../../pelvis (-0.08760134 0.04559368 -0.0784826)
      PathPoint P2: socket_parent_frame_connectee_name=../../../femur_l (-0.02959879 -0.006653992 -0.06045955)
    Thelen2003Muscle glut_med3_l: max_isometric_force=1000 optimal_fiber_length=0.06853064
        tendon_slack_length=0.05622483 pennation_angle_at_optimal=0.3316126
      PathPoint P1: socket_parent_frame_connectee_name=../../../pelvis (-0.1253058 0.01075806 -0.06639259)
      PathPoint P2: socket_parent_frame_connectee_name=../../../femur_l (-0.03544972 -0.005392028 -0.05942703)
    Thelen2003Muscle bifemlh_l: max_isometric_force=2700 optimal_fiber_length=0.1236311 tendon_slack_length=0.369759
        pennation_angle_at_optimal=0
      PathPoint P1: socket_parent_frame_connectee_name=../../../pelvis (-0.1290557 -0.1050909 -0.07114663)
      PathPoint P2: socket_parent_frame_connectee_name=../../../tibia_l (-0.02975454 -0.03558683 -0.02909223)
      PathPoint P3: socket_parent_frame_connectee_name=../../../tibia_l (-0.02313144 -0.05565384 -0.03390634)
    Thelen2003Muscle bifemsh_l: max_isometric_force=804 optimal_fiber_length=0.1914449 tendon_slack_length=0.09848899
        pennation_angle_at_optimal=0.4014257
      PathPoint P1: socket_parent_frame_connectee_name=../../../femur_l (0.0057362 -0.2421824 -0.02684542)
      PathPoint P2: socket_parent_frame_connectee_name=../../../tibia_l (-0.02975454 -0.03558683 -0.02909223)
      PathPoint P3: socket_parent_frame_connectee_name=../../../tibia_l (-0.02313144 -0.05565384 -0.03390634)
    Thelen2003Muscle sar_l: max_isometric_force=156 optimal_fiber_length=0.5742156 tendon_slack_length=0.1104261
        pennation_angle_at_optimal=0
      PathPoint P1: socket_parent_frame_connectee_name=../../../pelvis (-0.01567603 -0.00133195 -0.1272525)
      PathPoint P2: socket_parent_frame_connectee_name=../../../femur_l (-0.00344172 -0.4093352 0.0482988)
      PathPoint P3: socket_parent_frame_connectee_name=../../../tibia_l (-0.005535729 -0.04141911 0.03944207)
      PathPoint P4: socket_parent_frame_connectee_name=../../../tibia_l (0.005931138 -0.058224 0.03786043)
      PathPoint P5: socket_parent_frame_connectee_name=../../../tibia_l (0.02402111 -0.08303593 0.02491078)
    Thelen2003Muscle add_mag2_l: max_isometric_force=2343 optimal_fiber_length=0.1409897 tendon_slack_length=0.1398245
        pennation_angle_at_optimal=0.05235988
      PathPoint P1: socket_parent_frame_connectee_name=../../../pelvis (-0.08514235 -0.1221296 -0.03155697)
      PathPoint P2: socket_parent_frame_connectee_name=../../../femur_l (0.006195096 -0.2621443 -0.02604235)
    Thelen2003Muscle tfl_l: max_isometric_force=233 optimal_fiber_length=0.1060379 tendon_slack_length=0.4743801
        pennation_angle_at_optimal=0.05235988
      PathPoint P1: socket_parent_frame_connectee_name=../../../pelvis (-0.03186435 0.02192595 -0.12715)
      PathPoint P2: socket_parent_frame_connectee_name=../../../femur_l (0.03372886 -0.1141504 -0.06849023)
      PathPoint P3: socket_parent_frame_connectee_name=../../../femur_l (0.006195096 -0.4645175 -0.04095647)
      PathPoint P4: socket_parent_frame_connectee_name=../../../tibia_l (0.005931138 -0.04814107 -0.02935913)
    Thelen2003Muscle pect_l: max_isometric_force=266 optimal_fiber_length=0.1116559 tendon_slack_length=0.03684646
        pennation_angle_at_optimal=0
      PathPoint P1: socket_parent_frame_connectee_name=../../../pelvis (-0.04415927 -0.07868752 -0.04620842)
      PathPoint P2: socket_parent_frame_connectee_name=../../../femur_l (-0.01399633 -0.09430313 -0.02902517)
    Thelen2003Muscle grac_l: max_isometric_force=162 optimal_fiber_length=0.3965859 tendon_slack_length=0.1419597
        pennation_angle_at_optimal=0.05235988
      PathPoint P1: socket_parent_frame_connectee_name=../../../pelvis (-0.07582895 -0.1216173 -0.02862668)
      ConditionalPathPoint P2: socket_parent_frame_connectee_name=../../../tibia_l (-0.02626506 -0.03153388 0.03730686)
          socket_coordinate_connectee_name=../../../knee_l/knee_angle_l range=(-0.436332 0.174533)
      PathPoint P3: socket_parent_frame_connectee_name=../../../tibia_l (-0.019207 -0.05093859 0.03538912)
      PathPoint P4: socket_parent_frame_connectee_name=../../../tibia_l (0.005931138 -0.08264052 0.02253832)
    Thelen2003Muscle glut_max1_l: max_isometric_force=573 optimal_fiber_length=0.151587 tendon_slack_length=0.1334393
        pennation_angle_at_optimal=0.08726646
      PathPoint P1: socket_parent_frame_connectee_name=../../../pelvis (-0.122437 0.06270411 -0.07172039)
      PathPoint P2: socket_parent_frame_connectee_name=../../../pelvis (-0.1322729 0.001229492 -0.09077753)
      PathPoint P3: socket_parent_frame_connectee_name=../../../femur_l (-0.05242887 -0.02845155 -0.04497181)
      PathPoint P4: socket_parent_frame_connectee_name=../../../femur_l (-0.03177855 -0.06493378 -0.05392028)
    Thelen2003Muscle glut_max2_l: max_isometric_force=819 optimal_fiber_length=0.1593947 tendon_slack_length=0.1377084
        pennation_angle_at_optimal=0
      PathPoint P1: socket_parent_frame_connectee_name=../../../pelvis (-0.1382154 0.01803256 -0.05768369)
      PathPoint P2: socket_parent_frame_connectee_name=../../../pelvis (-0.1409818 -0.05327801 -0.09364634)
      PathPoint P3: socket_parent_frame_connectee_name=../../../femur_l (-0.04887242 -0.06080372 -0.03361413)
      PathPoint P4: socket_parent_frame_connectee_name=../../../femur_l (-0.01789694 -0.1165596 -0.04806936)
    Thelen2003Muscle glut_max3_l: max_isometric_force=552 optimal_fiber_length=0.1562884 tendon_slack_length=0.1573737
        pennation_angle_at_optimal=0.08726646
      PathPoint P1: socket_parent_frame_connectee_name=../../../pelvis (-0.1594242 -0.03217172 -0.005942547)
      PathPoint P2: socket_parent_frame_connectee_name=../../../pelvis (-0.1566578 -0.1077855 -0.04129045)
      PathPoint P3: socket_parent_frame_connectee_name=../../../femur_l (-0.03430248 -0.1194277 -0.01548774)
      PathPoint P4: socket_parent_frame_connectee_name=../../../femur_l (-0.00688344 -0.1627934 -0.04715156)
    Thelen2003Muscle iliacus_l: max_isometric_force=1073 optimal_fiber_length=0.1061641 tendon_slack_length=0.1061641
        pennation_angle_at_optimal=0.1221731
      PathPoint P1: socket_parent_frame_connectee_name=../../../pelvis (-0.06905649 0.03739706 -0.08749888)
      PathPoint P2: socket_parent_frame_connectee_name=../../../pelvis (-0.02643409 -0.05635174 -0.0830932)
      ConditionalPathPoint P3: socket_parent_frame_connectee_name=../../../pelvis (-0.02950782 -0.08247845 -0.08360549)
          socket_coordinate_connectee_name=../../../hip_l/hip_flexion_l range=(-1.5708 0.785398)
      PathPoint P4: socket_parent_frame_connectee_name=../../../femur_l (0.001950308 -0.06229513 -0.006539268)
      PathPoint P5: socket_parent_frame_connectee_name=../../../femur_l (-0.02214173 -0.0712436 -0.0147994)
    Thelen2003Muscle psoas_l: max_isometric_force=1113 optimal_fiber_length=0.1051723 tendon_slack_length=0.1682757
        pennation_angle_at_optimal=0.1396263
      PathPoint P1: socket_parent_frame_connectee_name=../../../pelvis (-0.06629013 0.09087998 -0.02961028)
      PathPoint P2: socket_parent_frame_connectee_name=../../../pelvis (-0.02438493 -0.05840089 -0.0777654)
      ConditionalPathPoint P3: socket_parent_frame_connectee_name=../../../pelvis (-0.02950782 -0.08247845 -0.08360549)
          socket_coordinate_connectee_name=../../../hip_l/hip_flexion_l range=(-1.5708 0.785398)
      PathPoint P4: socket_parent_frame_connectee_name=../../../femur_l (0.001835584 -0.05816507 -0.004359512)
      PathPoint P5: socket_parent_frame_connectee_name=../../../femur_l (-0.02156811 -0.06849023 -0.0119313)
    Thelen2003Muscle quad_fem_l: max_isometric_force=381 optimal_fiber_length=0.05807418 tendon_slack_length=0.02581075
        pennation_angle_at_optimal=0
      PathPoint P1: socket_parent_frame_connectee_name=../../../pelvis (-0.1171092 -0.1179288 -0.05327801)
      PathPoint P2: socket_parent_frame_connectee_name=../../../femur_l (-0.04370984 -0.04118592 -0.04198898)
    Thelen2003Muscle gem_l: max_isometric_force=164 optimal_fiber_length=0.02609439 tendon_slack_length=0.04240338
        pennation_angle_at_optimal=0
      PathPoint P1: socket_parent_frame_connectee_name=../../../pelvis (-0.1160846 -0.08401532 -0.0731548)
      PathPoint P2: socket_parent_frame_connectee_name=../../../femur_l (-0.01629081 -0.003785892 -0.05082273)
    Thelen2003Muscle peri_l: max_isometric_force=444 optimal_fiber_length=0.02732926 tendon_slack_length=0.1208794
        pennation_angle_at_optimal=0.1745329
      PathPoint P1: socket_parent_frame_connectee_name=../../../pelvis (-0.143031 0.0003073731 -0.02407756)
      PathPoint P2: socket_parent_frame_connectee_name=../../../pelvis (-0.122232 -0.02827833 -0.06731471)
      PathPoint P3: socket_parent_frame_connectee_name=../../../femur_l (-0.01697915 -0.004130064 -0.05013439)
    Thelen2003Muscle rect_fem_l: max_isometric_force=1169 optimal_fiber_length=0.1304623 tendon_slack_length=0.354766
        pennation_angle_at_optimal=0.08726646
      PathPoint P1: socket_parent_frame_connectee_name=../../../pelvis (-0.03022502 -0.03186435 -0.09917906)
      ConditionalPathPoint P2: socket_parent_frame_connectee_name=../../../femur_l (0.03831782 -0.4623377 -0.002179756)
          socket_coordinate_connectee_name=../../../knee_l/knee_angle_l range=(-2.61799 -1.45997)
      MovingPathPoint P3: socket_parent_frame_connectee_name=../../../tibia_l
          socket_x_coordinate_connectee_name=../../../knee_l/knee_angle_l
          socket_y_coordinate_connectee_name=../../../knee_l/knee_angle_l
          socket_z_coordinate_connectee_name=../../../knee_l/knee_angle_l
        x_location: MultiplierFunction: scale=0.988523
          SimmSpline: x=(-2.0944 -1.99997 -1.5708 -1.45752 -1.39626 -1.0472 -0.698132 -0.526391 -0.349066 -0.174533 0 0.00017453 0.00034907 0.0279253 0.0872665 0.174533 2.0944)
              y=(0.0155805 0.0179938 0.0275081 0.0296564 0.0307615 0.0365695 0.0422074 0.0450902 0.048391 0.0534299 0.0617576 0.0617669 0.0617762 0.0633083 0.066994 0.0733035 0.0573481)
        y_location: MultiplierFunction: scale=0.988523
          SimmSpline: x=(-2.0944 -1.99997 -1.5708 -1.45752 -1.39626 -1.0472 -0.698132 -0.526391 -0.349066 -0.174533 0 0.00017453 0.00034907 0.0279253 0.0872665 0.174533 2.0944)
              y=(0.0234116 0.0237613 0.0251141 0.0252795 0.0253146 0.0249184 0.0242373 0.0238447 0.0234197 0.0227644 0.020984 0.0209814 0.0209788 0.0205225 0.0191754 0.0159554 -0.0673774)
        z_location: MultiplierFunction: scale=0.988523
          SimmSpline: x=(-2.0944 0.1745) y=(-0.0014 -0.0014)
    Thelen2003Muscle vas_int_l: max_isometric_force=5000 optimal_fiber_length=0.1246787 tendon_slack_length=0.1351657
        pennation_angle_at_optimal=0.05235988
      PathPoint P1: socket_parent_frame_connectee_name=../../../femur_l (0.03326996 -0.220729 -0.03556444)
      PathPoint P2: socket_parent_frame_connectee_name=../../../femur_l (0.03843254 -0.2390848 -0.03269634)
      ConditionalPathPoint P3: socket_parent_frame_connectee_name=../../../femur_l (0.03935033 -0.4623377 -0.00630982)
          socket_coordinate_connectee_name=../../../knee_l/knee_angle_l range=(-2.61799 -1.42)
      MovingPathPoint P4: socket_parent_frame_connectee_name=../../../tibia_l
          socket_x_coordinate_connectee_name=../../../knee_l/knee_angle_l
          socket_y_coordinate_connectee_name=../../../knee_l/knee_angle_l
          socket_z_coordinate_connectee_name=../../../knee_l/knee_angle_l
        x_location: MultiplierFunction: scale=0.988523
          SimmSpline: x=(-2.0944 -1.99997 -1.5708 -1.45752 -1.39626 -1.0472 -0.698132 -0.526391 -0.349066 -0.174533 0 0.00017453 0.00034907 0.0279253 0.0872665 0.174533 2.0944)
              y=(0.0082733 0.0106866 0.0202042 0.022353 0.0234583 0.0292715 0.0349465 0.037871 0.0412569 0.0465287 0.0554632 0.0554735 0.0554837 0.0571717 0.061272 0.0684368 0.0648818)
        y_location: MultiplierFunction: scale=0.988523
          SimmSpline: x=(-2.0944 -1.99997 -1.5708 -1.45752 -1.39626 -1.0472 -0.698132 -0.526391 -0.349066 -0.174533 0 0.00017453 0.00034907 0.0279253 0.0872665 0.174533 2.0944)
              y=(0.025599 0.0259487 0.0273124 0.0274796 0.0275151 0.0271363 0.0265737 0.0263073 0.0261187 0.0260129 0.0252923 0.0252911 0.0252898 0.0250526 0.0242191 0.0218288 -0.0685706)
        z_location: MultiplierFunction: scale=0.988523
          SimmSpline: x=(-2.0944 2.0944) y=(-0.0018 -0.0018)
    Thelen2003Muscle med_gas_l: max_isometric_force=2500 optimal_fiber_length=0.0901287 tendon_slack_length=0.3605148
        pennation_angle_at_optimal=0.296706
      PathPoint P1: socket_parent_frame_connectee_name=../../../femur_l (-0.02179756 -0.4507506 0.02696014)
      ConditionalPathPoint P2: socket_parent_frame_connectee_name=../../../femur_l (-0.0344172 -0.4614199 0.02959879)
          socket_coordinate_connectee_name=../../../knee_l/knee_angle_l range=(-0.785398 0.174533)
      PathPoint P3: socket_parent_frame_connectee_name=../../../calcn_l (0 0.03183963 0.005443549)
    Thelen2003Muscle soleus_l: max_isometric_force=4000 optimal_fiber_length=0.0502888 tendon_slack_length=0.251444
        pennation_angle_at_optimal=0.4363323
      PathPoint P1: socket_parent_frame_connectee_name=../../../tibia_l (-0.002372455 -0.1515406 -0.007018513)
      PathPoint P2: socket_parent_frame_connectee_name=../../../calcn_l (0 0.03183963 0.005443549)
    Thelen2003Muscle tib_post_l: max_isometric_force=3600 optimal_fiber_length=0.03107549 tendon_slack_length=0.3107549
        pennation_angle_at_optimal=0.2094395
      PathPoint P1: socket_parent_frame_connectee_name=../../../tibia_l (-0.009292116 -0.1332529 -0.001878194)
      PathPoint P2: socket_parent_frame_connectee_name=../../../tibia_l (-0.01423473 -0.4004507 0.02263718)
      PathPoint P3: socket_parent_frame_connectee_name=../../../calcn_l (0.04282943 0.03430463 0.02937462)
      PathPoint P4: socket_parent_frame_connectee_name=../../../calcn_l (0.07929094 0.01633065 0.02886108)
    Thelen2003Muscle tib_ant_l: max_isometric_force=3000 optimal_fiber_length=0.09791263 tendon_slack_length=0.2228012
        pennation_angle_at_optimal=0.08726646
      PathPoint P1: socket_parent_frame_connectee_name=../../../tibia_l (0.01769456 -0.1605361 -0.01136801)
      PathPoint P2: socket_parent_frame_connectee_name=../../../tibia_l (0.03252241 -0.3905654 0.01749686)
      PathPoint P3: socket_parent_frame_connectee_name=../../../calcn_l (0.1197581 0.01828211 0.03132609)
    Thelen2003Muscle ercspn_r: max_isometric_force=2500 optimal_fiber_length=0.1278847 tendon_slack_length=0.03197118
        pennation_angle_at_optimal=0
      PathPoint P1: socket_parent_frame_connectee_name=../../../pelvis (-0.1434408 0.04497893 0.04467156)
      PathPoint P2: socket_parent_frame_connectee_name=../../../torso (-0.05938459 0.1187692 0.02602125)
    Thelen2003Muscle ercspn_l: max_isometric_force=2500 optimal_fiber_length=0.1278847 tendon_slack_length=0.03197118
        pennation_angle_at_optimal=0
      PathPoint P1: socket_parent_frame_connectee_name=../../../pelvis (-0.1434408 0.04497893 -0.04467156)
      PathPoint P2: socket_parent_frame_connectee_name=../../../torso (-0.05938459 0.1187692 -0.02602125)
    Thelen2003Muscle intobl_r: max_isometric_force=900 optimal_fiber_length=0.106202 tendon_slack_length=0.106202
        pennation_angle_at_optimal=0
      PathPoint P1: socket_parent_frame_connectee_name=../../../pelvis (-0.04098308 0.07172039 0.1185436)
      PathPoint P2: socket_parent_frame_connectee_name=../../../torso (0.07558039 0.1727552 0.0161958)
    Thelen2003Muscle intobl_l: max_isometric_force=900 optimal_fiber_length=0.106202 tendon_slack_length=0.106202
        pennation_angle_at_optimal=0
      PathPoint P1: socket_parent_frame_connectee_name=../../../pelvis (-0.04098308 0.07172039 -0.1185436)
      PathPoint P2: socket_parent_frame_connectee_name=../../../torso (0.07558039 0.1727552 -0.0161958)
    Thelen2003Muscle extobl_r: max_isometric_force=900 optimal_fiber_length=0.1263775 tendon_slack_length=0.1474404
        pennation_angle_at_optimal=0
      PathPoint P1: socket_parent_frame_connectee_name=../../../pelvis (-0.03073731 -0.0651631 0.01024577)
      PathPoint P2: socket_parent_frame_connectee_name=../../../torso (0.07018179 0.1187692 0.1187692)
    Thelen2003Muscle extobl_l: max_isometric_force=900 optimal_fiber_length=0.1263775 tendon_slack_length=0.1474404
        pennation_angle_at_optimal=0
      PathPoint P1: socket_parent_frame_connectee_name=../../../pelvis (-0.03073731 -0.0651631 -0.01024577)
      PathPoint P2: socket_parent_frame_connectee_name=../../../torso (0.07018179 0.1187692 -0.1187692)
    ObjectGroup R_hip_abd: members=(glut_max1_r glut_med1_r glut_med2_r glut_med3_r peri_r sar_r tfl_r)
    ObjectGroup R_hip_flex: members=(glut_med1_r grac_r iliacus_r pect_r psoas_r rect_fem_r sar_r tfl_r)
    ObjectGroup R_hip_inrot: members=(glut_med1_r iliacus_r psoas_r tfl_r)
    ObjectGroup R_hip_exrot: members=(gem_r glut_med3_r peri_r quad_fem_r)
    ObjectGroup R_hip_ext: members=(add_mag2_r bifemlh_r glut_max1_r glut_max2_r glut_max3_r glut_med3_r)
    ObjectGroup R_hip_add: members=(add_mag2_r bifemlh_r grac_r pect_r)
    ObjectGroup R_knee_bend: members=(bifemlh_r bifemsh_r grac_r med_gas_r sar_r)
    ObjectGroup R_knee_ext: members=(rect_fem_r vas_int_r)
    ObjectGroup R_ankle_pf: members=(med_gas_r soleus_r tib_post_r)
    ObjectGroup R_inverter: members=(tib_ant_r tib_post_r)
    ObjectGroup R_ankle_df: members=tib_ant_r
    ObjectGroup L_hip_abd: members=(glut_max1_l glut_med1_l glut_med2_l glut_med3_l peri_l sar_l tfl_l)
    ObjectGroup L_hip_flex: members=(glut_med1_l grac_l iliacus_l pect_l psoas_l rect_fem_l sar_l tfl_l)
    ObjectGroup L_hip_inrot: members=(glut_med1_l iliacus_l psoas_l tfl_l)
    ObjectGroup L_hip_exrot: members=(gem_l glut_med3_l peri_l quad_fem_l)
    ObjectGroup L_hip_ext: members=(add_mag2_l bifemlh_l glut_max1_l glut_max2_l glut_max3_l glut_med3_l)
    ObjectGroup L_hip_add: members=(add_mag2_l bifemlh_l grac_l pect_l)
    ObjectGroup L_knee_bend: members=(bifemlh_l bifemsh_l grac_l med_gas_l sar_l)
    ObjectGroup L_knee_ext: members=(rect_fem_l vas_int_l)
    ObjectGroup L_ankle_pf: members=(med_gas_l soleus_l tib_post_l)
    ObjectGroup L_inverter: members=(tib_ant_l tib_post_l)
    ObjectGroup L_ankle_df: members=tib_ant_l
    ObjectGroup back_ext: members=(ercspn_l ercspn_r)
    ObjectGroup back_rlb: members=(ercspn_r extobl_r intobl_r)
    ObjectGroup back_introt: members=(ercspn_r extobl_l intobl_r)
    ObjectGroup back_llb: members=(ercspn_l extobl_l intobl_l)
    ObjectGroup back_extrot: members=(ercspn_l extobl_r intobl_l)
    ObjectGroup back_flex: members=(extobl_l extobl_r intobl_l intobl_r)
  MarkerSet:
    Marker Sternum: socket_parent_frame_connectee_name=../torso (0.1174064 0.3072432 0.001215989)
    Marker R.Acromium: socket_parent_frame_connectee_name=../torso (-0.0049316 0.4265379 0.1707041)
    Marker L.Acromium: socket_parent_frame_connectee_name=../torso (-0.00301557 0.4416711 -0.1698245)
    Marker Top.Head: socket_parent_frame_connectee_name=../torso (0.09110955 0.6959822 0.01290735)
    Marker R.ASIS: socket_parent_frame_connectee_name=../pelvis (0.02345623 0.03661548 0.1304556)
    Marker L.ASIS: socket_parent_frame_connectee_name=../pelvis (0.0283456 0.02796563 -0.131569)
    Marker V.Sacral: socket_parent_frame_connectee_name=../pelvis (-0.1722053 0.03952496 0.007566199)
    Marker R.Thigh.Upper: socket_parent_frame_connectee_name=../femur_r (0.04671631 -0.2200541 0.09177896)
    Marker R.Thigh.Front: socket_parent_frame_connectee_name=../femur_r (0.1083765 -0.2818036 -0.0006220605)
    Marker R.Thigh.Rear: socket_parent_frame_connectee_name=../femur_r (0.03576659 -0.3408651 0.08177309)
    Marker R.Knee.Lat: socket_parent_frame_connectee_name=../femur_r (-0.003541244 -0.4261031 0.06139669)
    Marker R.Knee.Med: socket_parent_frame_connectee_name=../femur_r (0.0005075547 -0.442747 -0.05984333)
    Marker R.Shank.Upper: socket_parent_frame_connectee_name=../tibia_r (-0.02677457 -0.06017342 0.07023066)
    Marker R.Shank.Front: socket_parent_frame_connectee_name=../tibia_r (0.0507941 -0.09524077 0.01954526)
    Marker R.Shank.Rear: socket_parent_frame_connectee_name=../tibia_r (-0.01128497 -0.1453282 0.08030946)
    Marker R.Ankle.Lat: socket_parent_frame_connectee_name=../tibia_r (-0.007490564 -0.4306555 0.05551916)
    Marker R.Ankle.Med: socket_parent_frame_connectee_name=../tibia_r (0.004620019 -0.4161799 -0.03324811)
    Marker R.Heel: socket_parent_frame_connectee_name=../calcn_r (-0.02029205 0.01712992 -0.005440307)
    Marker R.Midfoot.Sup: socket_parent_frame_connectee_name=../calcn_r (0.12272 0.03341823 -0.04034795)
    Marker R.Midfoot.Lat: socket_parent_frame_connectee_name=../calcn_r (0.118278 0.00644702 0.06541251)
    Marker R.Toe.Lat: socket_parent_frame_connectee_name=../calcn_r (0.2082818 -0.01647191 0.07260046)
    Marker R.Toe.Med: socket_parent_frame_connectee_name=../calcn_r (0.2099086 0.00385624 -0.03472462)
    Marker R.Toe.Tip: socket_parent_frame_connectee_name=../calcn_r (0.2709641 0.003303963 -0.003200082)
    Marker L.Thigh.Upper: socket_parent_frame_connectee_name=../femur_l (0.02307987 -0.2066959 -0.09791892)
    Marker L.Thigh.Front: socket_parent_frame_connectee_name=../femur_l (0.1109895 -0.2487444 -0.03395385)
    Marker L.Thigh.Rear: socket_parent_frame_connectee_name=../femur_l (0.01551848 -0.3155637 -0.08218529)
    Marker L.Knee.Lat: socket_parent_frame_connectee_name=../femur_l (-0.008518684 -0.4456877 -0.06419552)
    Marker L.Knee.Med: socket_parent_frame_connectee_name=../femur_l (0.00855441 -0.4458812 0.05079903)
    Marker L.Shank.Upper: socket_parent_frame_connectee_name=../tibia_l (-0.00597981 -0.07146934 -0.07966306)
    Marker L.Shank.Front: socket_parent_frame_connectee_name=../tibia_l (0.04524209 -0.1215878 -0.0309138)
    Marker L.Shank.Rear: socket_parent_frame_connectee_name=../tibia_l (-0.02460178 -0.1145463 -0.08809441)
    Marker L.Ankle.Lat: socket_parent_frame_connectee_name=../tibia_l (-0.003600802 -0.4283611 -0.05731688)
    Marker L.Ankle.Med: socket_parent_frame_connectee_name=../tibia_l (0.01294244 -0.4052856 0.03267867)
    Marker L.Heel: socket_parent_frame_connectee_name=../calcn_l (-0.02242131 0.02641146 0.006381476)
    Marker L.Midfoot.Sup: socket_parent_frame_connectee_name=../calcn_l (0.1493378 0.03658397 0.03471797)
    Marker L.Midfoot.Lat: socket_parent_frame_connectee_name=../calcn_l (0.1328842 0.0174129 -0.06237171)
    Marker L.Toe.Lat: socket_parent_frame_connectee_name=../calcn_l (0.1965945 -0.006464801 -0.06711574)
    Marker L.Toe.Med: socket_parent_frame_connectee_name=../calcn_l (0.2116365 0.01334313 0.03342028)
    Marker L.Toe.Tip: socket_parent_frame_connectee_name=../calcn_l (0.2613071 0.01003944 0.009268411)
