# OpenSim document version 30000
Model RaabeFullBody:
  length_units: meters
  force_units: N
  gravity: 0 -9.80665 0
  credits:
    Delp S.L., Loan J.P., Hoy M.G., Zajac F.E., Topp E.L., Rosen J.M., Thelen D.G., Anderson F.C., Seth A., Hamner S.R., Arnold E., Raabe M.E.
  publications:
    Notes: Raabe Full Body model combines Hamner Full Body Model 2010, Christophy 2012 Lumbar DOF torso, and Arnold patella; 3D, 23 DOF gait model created by D.G. Thelen, Univ. of Wisconsin-Madison, and Samuel Hamner, Ajay Seth, Frank C. Anderson, and Scott L. Delp, Stanford University. Lower extremity joint defintions based on Delp et al. (1990). Low back joint and anthropometry based on Anderson and Pandy (1999, 2001). Planar knee model of Yamaguchi and Zajac (1989). Hamner added arms adapted from Holzbaur et al., 2005. Hamner, S.R., Seth, A, Delp, S.L.: Muscle contributions to propulsion and support during running. Journal of Biomechanics, 2010. Delp, S.L., Loan, J.P., Hoy, M.G., Zajac, F.E., Topp E.L., Rosen, J.M.: An interactive graphics-based model of the lower extremity to study orthopaedic surgical procedures, IEEE Transactions on Biomedical Engineering, vol. 37, pp. 757-767, 1990. Yamaguchi G.T., Zajac F.E.: A planar model of the knee joint to characterize the knee extensor mechanism." J . Biomech. vol. 21. pp. 1-10. 1989. Anderson F.C., Pandy M.G.: A dynamic optimization solution for vertical jumping in three dimensions. Computer Methods in Biomechanics and Biomedical Engineering 2:201-231, 1999. Anderson F.C., Pandy M.G.: Dynamic optimization of human walking. Journal of Biomechanical Engineering 123:381-390, 2001. Holzbaur, KR, WM Murray and SL Delp, 2005. A model of the upper extremity for simulating musculoskeletal surgery and analyzing neuromuscular control. Ann Biomed Eng 33(6): 829-840.
  defaults: Thelen2003Muscle default: max_isometric_force=546 optimal_fiber_length=0.0535 tendon_slack_length=0.078
      pennation_angle_at_optimal=0 [radians] activation_time_constant=0.01 deactivation_time_constant=0.04
      FmaxTendonStrain=0.033 FmaxMuscleStrain=0.6 KshapeActive=0.5 KshapePassive=4 Af=0.3 Flen=1.8
  BodySet:
    Body ground: mass=0 mass_center=(0 0 0) inertia_xx=0 inertia_yy=0 inertia_zz=0
    Body pelvis: mass=11.777 mass_center=(-0.0707 0 0) inertia_xx=0.1028 inertia_yy=0.0871 inertia_zz=0.0579
        meshes=(r_pelvis.vtp l_pelvis.vtp)
      CustomJoint ground_pelvis: parent_body=ground location_in_parent=(0 0 0) location=(0 0 0)
        Coordinate pelvis_tilt: motion_type=rotational default_value=0 range=(-1.570796 1.570796) clamped=true
        Coordinate pelvis_list: motion_type=rotational default_value=0 range=(-1.570796 1.570796) clamped=true
        Coordinate pelvis_rotation: motion_type=rotational default_value=0 range=(-1.570796 1.570796) clamped=true
        Coordinate pelvis_tx: motion_type=translational default_value=0 range=(-5 5) clamped=true
        Coordinate pelvis_ty: motion_type=translational default_value=0 range=(-1 2) clamped=true
        Coordinate pelvis_tz: motion_type=translational default_value=0 range=(-3 3) clamped=true
        SpatialTransform:
          TransformAxis rotation1: coordinates=pelvis_tilt axis=(0 0 1) LinearFunction(coefficients=1 0)
          TransformAxis rotation2: coordinates=pelvis_list axis=(1 0 0) LinearFunction(coefficients=1 0)
          TransformAxis rotation3: coordinates=pelvis_rotation axis=(0 1 0) LinearFunction(coefficients=1 0)
          TransformAxis translation1: coordinates=pelvis_tx axis=(1 0 0) LinearFunction(coefficients=1 0)
          TransformAxis translation2: coordinates=pelvis_ty axis=(0 1 0) LinearFunction(coefficients=1 0)
          TransformAxis translation3: coordinates=pelvis_tz axis=(0 0 1) LinearFunction(coefficients=1 0)
    Body sacrum: mass=0 mass_center=(0 0 0) inertia_xx=0 inertia_yy=0 inertia_zz=0 meshes=sacrum.vtp
      WeldJoint sacrumjnt: parent_body=pelvis location_in_parent=(0.01 -0.017 0) location=(0 0 0)
    Body femur_r: mass=9.3014 mass_center=(0 -0.17 0) inertia_xx=0.1339 inertia_yy=0.0351 inertia_zz=0.1412
        meshes=femur_r.vtp
      CustomJoint hip_r: parent_body=pelvis location_in_parent=(-0.0707 -0.0661 0.0835) location=(0 0 0)
        Coordinate hip_flexion_r: motion_type=rotational default_value=0 range=(-2.094395 2.094395) clamped=true
        Coordinate hip_adduction_r: motion_type=rotational default_value=0 range=(-2.094395 2.094395) clamped=true
        Coordinate hip_rotation_r: motion_type=rotational default_value=0 range=(-2.094395 2.094395) clamped=true
        SpatialTransform: axes_held_at_zero=(translation1 translation2 translation3)
          TransformAxis rotation1: coordinates=hip_flexion_r axis=(0 0 1) LinearFunction(coefficients=1 0)
          TransformAxis rotation2: coordinates=hip_adduction_r axis=(1 0 0) LinearFunction(coefficients=1 0)
          TransformAxis rotation3: coordinates=hip_rotation_r axis=(0 1 0) LinearFunction(coefficients=1 0)
    Body patella_r: mass=0.0862 mass_center=(0.0018 0.0264 0) inertia_xx=2.87e-6 inertia_yy=1.311e-5
        inertia_zz=1.311e-5 meshes=r_patella.vtp
      CustomJoint patellofemoral_r: parent_body=femur_r location_in_parent=(0 0 0) location=(0 0 0)
        Coordinate knee_angle_r_beta: motion_type=rotational default_value=0 range=(-99999.9 99999.9) clamped=false
        SpatialTransform: axes_held_at_zero=(rotation2 rotation3 translation3)
          TransformAxis rotation1: coordinates=knee_angle_r_beta axis=(0 0 1)
            SimmSpline f11: x=(0 0.174533 0.349066 0.523599 0.698132 0.872665 1.0472 1.22173 1.39626 1.5708 1.74533 1.91986 2.0944)
                y=(0.00113686 -0.00629212 -0.105582 -0.253683 -0.414245 -0.579047 -0.747244 -0.91799 -1.09044 -1.26379 -1.43763 -1.61186 -1.78634)
          TransformAxis translation1: coordinates=knee_angle_r_beta axis=(1 0 0)
            SimmSpline f9: x=(0 0.174533 0.349066 0.523599 0.698132 0.872665 1.0472 1.22173 1.39626 1.5708 1.74533 1.91986 2.0944)
                y=(0.04435 0.040692 0.035581 0.029012 0.021473 0.013523 0.005483 -0.002412 -0.009959 -0.016903 -0.022926 -0.027739 -0.030815)
          TransformAxis translation2: coordinates=knee_angle_r_beta axis=(0 1 0)
            SimmSpline f10: x=(0 0.174533 0.349066 0.523599 0.698132 0.872665 1.0472 1.22173 1.39626 1.5708 1.74533 1.91986 2.0944)
                y=(-0.418712 -0.426965 -0.43422 -0.440152 -0.444617 -0.447495 -0.448724 -0.448337 -0.446353 -0.442826 -0.438035 -0.432448 -0.426632)
    Body tibia_r: mass=3.7075 mass_center=(0 -0.1867 0) inertia_xx=0.0504 inertia_yy=0.0051 inertia_zz=0.0511
        meshes=(tibia_r.vtp fibula_r.vtp)
      CustomJoint knee_r: parent_body=femur_r location_in_parent=(0 0 0) location=(0 0 0)
        Coordinate knee_angle_r: motion_type=rotational default_value=0 range=(-2.094395 0.1745329) clamped=true
        SpatialTransform: axes_held_at_zero=(rotation2 rotation3 translation3)
          TransformAxis rotation1: coordinates=knee_angle_r axis=(0 0 1) LinearFunction(coefficients=1 0)
          TransformAxis translation1: coordinates=knee_angle_r axis=(1 0 0)
            SimmSpline: x=(-2.0944 -1.74533 -1.39626 -1.0472 -0.698132 -0.349066 -0.174533 0.197344 0.337395 0.490178 1.52146 2.0944)
                y=(-0.0032 0.00179 0.00411 0.0041 0.00212 -0.001 -0.0031 -0.005227 -0.005435 -0.005574 -0.005435 -0.00525)
          TransformAxis translation2: coordinates=knee_angle_r axis=(0 1 0)
            SimmSpline: x=(-2.0944 -1.22173 -0.523599 -0.349066 -0.174533 0.159149 2.0944)
                y=(-0.4226 -0.4082 -0.399 -0.3976 -0.3966 -0.395264 -0.396)
    Body talus_r: mass=0.1 mass_center=(0 0 0) inertia_xx=0.001 inertia_yy=0.001 inertia_zz=0.001 meshes=talus_rv.vtp
      CustomJoint ankle_r: parent_body=tibia_r location_in_parent=(0 -0.43 0) location=(0 0 0)
        Coordinate ankle_angle_r: motion_type=rotational default_value=0 range=(-1.570796 1.570796) clamped=true
        SpatialTransform: axes_held_at_zero=(rotation2 rotation3 translation1 translation2 translation3)
          TransformAxis rotation1: coordinates=ankle_angle_r axis=(-0.1050135 -0.1740224 0.9791263)
              LinearFunction(coefficients=1 0)
    Body calcn_r: mass=1.25 mass_center=(0.1 0.03 0) inertia_xx=0.0014 inertia_yy=0.0039 inertia_zz=0.0041
        meshes=foot.vtp
      CustomJoint subtalar_r: parent_body=talus_r location_in_parent=(-0.04877 -0.04195 0.00792) location=(0 0 0)
        Coordinate subtalar_angle_r: motion_type=rotational default_value=0 range=(-1.570796 1.570796) clamped=true
            locked=true
        SpatialTransform: axes_held_at_zero=(rotation2 rotation3 translation1 translation2 translation3)
          TransformAxis rotation1: coordinates=subtalar_angle_r axis=(0.7871796 0.6047475 -0.1209495)
              LinearFunction(coefficients=1 0)
    Body toes_r: mass=0.2166 mass_center=(0.0346 0.006 -0.0175) inertia_xx=0.0001 inertia_yy=0.0002 inertia_zz=0.001
        meshes=bofoot.vtp
      CustomJoint mtp_r: parent_body=calcn_r location_in_parent=(0.1788 -0.002 0.00108) location=(0 0 0)
        Coordinate mtp_angle_r: motion_type=rotational default_value=0 range=(-1.570796 1.570796) clamped=true
            locked=true
        SpatialTransform: axes_held_at_zero=(rotation2 rotation3 translation1 translation2 translation3)
          TransformAxis rotation1: coordinates=mtp_angle_r axis=(-0.5809544 0 0.8139361)
              LinearFunction(coefficients=1 0)
    Body femur_l: mass=9.3014 mass_center=(0 -0.17 0) inertia_xx=0.1339 inertia_yy=0.0351 inertia_zz=0.1412
        meshes=femur_l.vtp
      CustomJoint hip_l: parent_body=pelvis location_in_parent=(-0.0707 -0.0661 -0.0835) location=(0 0 0)
        Coordinate hip_flexion_l: motion_type=rotational default_value=0 range=(-2.094395 2.094395) clamped=true
        Coordinate hip_adduction_l: motion_type=rotational default_value=0 range=(-2.094395 2.094395) clamped=true
        Coordinate hip_rotation_l: motion_type=rotational default_value=0 range=(-2.094395 2.094395) clamped=true
        SpatialTransform: axes_held_at_zero=(translation1 translation2 translation3)
          TransformAxis rotation1: coordinates=hip_flexion_l axis=(0 0 1) LinearFunction(coefficients=1 0)
          TransformAxis rotation2: coordinates=hip_adduction_l axis=(-1 0 0) LinearFunction(coefficients=1 0)
          TransformAxis rotation3: coordinates=hip_rotation_l axis=(0 -1 0) LinearFunction(coefficients=1 0)
    Body patella_l: mass=0.0862 mass_center=(0.0018 0.0264 0) inertia_xx=2.87e-6 inertia_yy=1.311e-5
        inertia_zz=1.311e-5 meshes=l_patella.vtp
      CustomJoint patellofemoral_l: parent_body=femur_l location_in_parent=(0 0 0) location=(0 0 0)
        Coordinate knee_angle_l_beta: motion_type=rotational default_value=0 range=(-99999.9 99999.9) clamped=false
        SpatialTransform: axes_held_at_zero=(rotation2 rotation3 translation3)
          TransformAxis rotation1: coordinates=knee_angle_l_beta axis=(0 0 1)
            SimmSpline f25: x=(0 0.174533 0.349066 0.523599 0.698132 0.872665 1.0472 1.22173 1.39626 1.5708 1.74533 1.91986 2.0944)
                y=(0.00113686 -0.00629212 -0.105582 -0.253683 -0.414245 -0.579047 -0.747244 -0.91799 -1.09044 -1.26379 -1.43763 -1.61186 -1.78634)
          TransformAxis translation1: coordinates=knee_angle_l_beta axis=(1 0 0)
            SimmSpline f23: x=(0 0.174533 0.349066 0.523599 0.698132 0.872665 1.0472 1.22173 1.39626 1.5708 1.74533 1.91986 2.0944)
                y=(0.04435 0.040692 0.035581 0.029012 0.021473 0.013523 0.005483 -0.002412 -0.009959 -0.016903 -0.022926 -0.027739 -0.030815)
          TransformAxis translation2: coordinates=knee_angle_l_beta axis=(0 1 0)
            SimmSpline f24: x=(0 0.174533 0.349066 0.523599 0.698132 0.872665 1.0472 1.22173 1.39626 1.5708 1.74533 1.91986 2.0944)
                y=(-0.418712 -0.426965 -0.43422 -0.440152 -0.444617 -0.447495 -0.448724 -0.448337 -0.446353 -0.442826 -0.438035 -0.432448 -0.426632)
    Body tibia_l: mass=3.7075 mass_center=(0 -0.1867 0) inertia_xx=0.0504 inertia_yy=0.0051 inertia_zz=0.0511
        meshes=(tibia_l.vtp fibula_l.vtp)
      CustomJoint knee_l: parent_body=femur_l location_in_parent=(0 0 0) location=(0 0 0)
        Coordinate knee_angle_l: motion_type=rotational default_value=0 range=(-2.094395 0.1745329) clamped=true
        SpatialTransform: axes_held_at_zero=(rotation2 rotation3 translation3)
          TransformAxis rotation1: coordinates=knee_angle_l axis=(0 0 1) LinearFunction(coefficients=1 0)
          TransformAxis translation1: coordinates=knee_angle_l axis=(1 0 0)
            SimmSpline: x=(-2.0944 -1.74533 -1.39626 -1.0472 -0.698132 -0.349066 -0.174533 0.197344 0.337395 0.490178 1.52146 2.0944)
                y=(-0.0032 0.00179 0.00411 0.0041 0.00212 -0.001 -0.0031 -0.005227 -0.005435 -0.005574 -0.005435 -0.00525)
          TransformAxis translation2: coordinates=knee_angle_l axis=(0 1 0)
            SimmSpline: x=(-2.0944 -1.22173 -0.523599 -0.349066 -0.174533 0.159149 2.0944)
                y=(-0.4226 -0.4082 -0.399 -0.3976 -0.3966 -0.395264 -0.396)
    Body talus_l: mass=0.1 mass_center=(0 0 0) inertia_xx=0.001 inertia_yy=0.001 inertia_zz=0.001 meshes=talus_lv.vtp
      CustomJoint ankle_l: parent_body=tibia_l location_in_parent=(0 -0.43 0) location=(0 0 0)
        Coordinate ankle_angle_l: motion_type=rotational default_value=0 range=(-1.047198 1.047198) clamped=true
        SpatialTransform: axes_held_at_zero=(rotation2 rotation3 translation1 translation2 translation3)
          TransformAxis rotation1: coordinates=ankle_angle_l axis=(0.1050135 0.1740224 0.9791263)
              LinearFunction(coefficients=1 0)
    Body calcn_l: mass=1.25 mass_center=(0.1 0.03 0) inertia_xx=0.0014 inertia_yy=0.0039 inertia_zz=0.0041
        meshes=l_foot.vtp
      CustomJoint subtalar_l: parent_body=talus_l location_in_parent=(-0.04877 -0.04195 -0.00792) location=(0 0 0)
        Coordinate subtalar_angle_l: motion_type=rotational default_value=0 range=(-1.570796 1.570796) clamped=true
            locked=true
        SpatialTransform: axes_held_at_zero=(rotation2 rotation3 translation1 translation2 translation3)
          TransformAxis rotation1: coordinates=subtalar_angle_l axis=(-0.7871796 -0.6047475 -0.1209495)
              LinearFunction(coefficients=1 0)
    Body toes_l: mass=0.2166 mass_center=(0.0346 0.006 0.0175) inertia_xx=0.0001 inertia_yy=0.0002 inertia_zz=0.001
        meshes=l_bofoot.vtp
      CustomJoint mtp_l: parent_body=calcn_l location_in_parent=(0.1788 -0.002 -0.00108) location=(0 0 0)
        Coordinate mtp_angle_l: motion_type=rotational default_value=0 range=(-1.047198 1.047198) clamped=true
            locked=true
        SpatialTransform: axes_held_at_zero=(rotation2 rotation3 translation1 translation2 translation3)
          TransformAxis rotation1: coordinates=mtp_angle_l axis=(0.5809544 0 0.8139361)
              LinearFunction(coefficients=1 0)
    Body lumbar5: mass=1.824 mass_center=(0.01728 0.0183 0) inertia_xx=0.1782158 inertia_yy=0.02172737
        inertia_zz=0.1714858 meshes=lumbar5.vtp
      CustomJoint L5_S1_IVDjnt: parent_body=sacrum location_in_parent=(-0.098 0.071 0) location=(0 0 0)
        Coordinate flex_extension: motion_type=rotational default_value=0 range=(-1.22173 0.4537856) clamped=true
        Coordinate lat_bending: motion_type=rotational default_value=0 range=(-0.4363323 0.4363323) clamped=true
        Coordinate axial_rotation: motion_type=rotational default_value=0 range=(-0.9791297 0.9791297) clamped=true
        SpatialTransform: axes_held_at_zero=(translation1 translation2 translation3)
          TransformAxis rotation1: coordinates=flex_extension axis=(0 0 1) LinearFunction(coefficients=0.0889273 0)
          TransformAxis rotation2: coordinates=lat_bending axis=(1 0 0)
              PiecewiseLinearFunction(x=-1.01875 1.01875, y=-0.138056 0.138056)
          TransformAxis rotation3: coordinates=axial_rotation axis=(0 1 0)
            SimmSpline: x=(-0.97913 0 0.97913) y=(-0.0296706 0 0.0279253)
    Body lumbar4: mass=1.799 mass_center=(0.0186 0.0217953 0) inertia_xx=0.171208 inertia_yy=0.02067917
        inertia_zz=0.165178 meshes=lumbar4.vtp
      CustomJoint L4_L5_IVDjnt: parent_body=lumbar5 location_in_parent=(0.01 0.0296 0) location=(0.001 -0.0025 0)
        Coordinate L4_L5_IVDjnt_r3: motion_type=rotational default_value=0 range=(-99999.9 99999.9) clamped=false
        Coordinate L4_L5_IVD_bendjnt_r1: motion_type=rotational default_value=0 range=(-99999.9 99999.9) clamped=false
        Coordinate L4_L5_IVD_rotjnt_r2: motion_type=rotational default_value=0 range=(-99999.9 99999.9) clamped=false
        SpatialTransform: axes_held_at_zero=(translation1 translation2 translation3)
          TransformAxis rotation1: coordinates=L4_L5_IVDjnt_r3 axis=(0 0 1) LinearFunction(coefficients=1 0)
          TransformAxis rotation2: coordinates=L4_L5_IVD_bendjnt_r1 axis=(1 0 0) LinearFunction(coefficients=1 0)
          TransformAxis rotation3: coordinates=L4_L5_IVD_rotjnt_r2 axis=(0 1 0) LinearFunction(coefficients=1 0)
    Body lumbar3: mass=1.67 mass_center=(0.0178939 0.0232739 0) inertia_xx=0.1576974 inertia_yy=0.01991069
        inertia_zz=0.1524474 meshes=lumbar3.vtp
      CustomJoint L3_L4_IVDjnt: parent_body=lumbar4 location_in_parent=(0 0.032 0) location=(-0.0006 -0.0012 0)
        Coordinate L3_L4_IVDjnt_r3: motion_type=rotational default_value=0 range=(-99999.9 99999.9) clamped=false
        Coordinate L3_L4_IVD_bendjnt_r1: motion_type=rotational default_value=0 range=(-99999.9 99999.9) clamped=false
        Coordinate L3_L4_IVD_rotjnt_r2: motion_type=rotational default_value=0 range=(-99999.9 99999.9) clamped=false
        SpatialTransform: axes_held_at_zero=(translation1 translation2 translation3)
          TransformAxis rotation1: coordinates=L3_L4_IVDjnt_r3 axis=(0 0 1) LinearFunction(coefficients=1 0)
          TransformAxis rotation2: coordinates=L3_L4_IVD_bendjnt_r1 axis=(1 0 0) LinearFunction(coefficients=1 0)
          TransformAxis rotation3: coordinates=L3_L4_IVD_rotjnt_r2 axis=(0 1 0) LinearFunction(coefficients=1 0)
    Body lumbar2: mass=1.689 mass_center=(0.0252462 0.0202124 0) inertia_xx=0.1627048 inertia_yy=0.02197507
        inertia_zz=0.1577048 meshes=lumbar2.vtp
      CustomJoint L2_L3_IVD_jnt: parent_body=lumbar3 location_in_parent=(-0.008 0.0312 0) location=(-0.0013 -0.0039 0)
        Coordinate L2_L3_IVDjnt_r3: motion_type=rotational default_value=0 range=(-99999.9 99999.9) clamped=false
        Coordinate L2_L3_IVD_bendjnt_r1: motion_type=rotational default_value=0 range=(-99999.9 99999.9) clamped=false
        Coordinate L2_L3_IVD_rotjnt_r2: motion_type=rotational default_value=0 range=(-99999.9 99999.9) clamped=false
        SpatialTransform: axes_held_at_zero=(translation1 translation2 translation3)
          TransformAxis rotation1: coordinates=L2_L3_IVDjnt_r3 axis=(0 0 1) LinearFunction(coefficients=1 0)
          TransformAxis rotation2: coordinates=L2_L3_IVD_bendjnt_r1 axis=(1 0 0) LinearFunction(coefficients=1 0)
          TransformAxis rotation3: coordinates=L2_L3_IVD_rotjnt_r2 axis=(0 1 0) LinearFunction(coefficients=1 0)
    Body lumbar1: mass=1.677 mass_center=(0.03274 0.0194073 0.00132891) inertia_xx=0.162657 inertia_yy=0.02413119
        inertia_zz=0.157927 meshes=lumbar1.vtp
      CustomJoint L1_L2_IVD_jnt: parent_body=lumbar2 location_in_parent=(-0.01 0.025 0) location=(0.0014 -0.0038 0)
        Coordinate L1_L2_IVDjnt_r3: motion_type=rotational default_value=0 range=(-99999.9 99999.9) clamped=false
        Coordinate L1_L2_IVD_bendjnt_r1: motion_type=rotational default_value=0 range=(-99999.9 99999.9) clamped=false
        Coordinate L1_L2_IVD_rotjnt_r2: motion_type=rotational default_value=0 range=(-99999.9 99999.9) clamped=false
        SpatialTransform: axes_held_at_zero=(translation1 translation2 translation3)
          TransformAxis rotation1: coordinates=L1_L2_IVDjnt_r3 axis=(0 0 1) LinearFunction(coefficients=0.85 0)
          TransformAxis rotation2: coordinates=L1_L2_IVD_bendjnt_r1 axis=(1 0 0) LinearFunction(coefficients=1 0)
          TransformAxis rotation3: coordinates=L1_L2_IVD_rotjnt_r2 axis=(0 1 0) LinearFunction(coefficients=1 0)
    Body torso: mass=18.1676 mass_center=(-0.03 0.32 0) inertia_xx=1.192387 inertia_yy=0.5133458 inertia_zz=1.163199
        meshes=(cerv1sm.vtp cerv2sm.vtp cerv3sm.vtp cerv4sm.vtp cerv5sm.vtp cerv6sm.vtp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)
      CustomJoint Torsojnt: parent_body=lumbar1 location_in_parent=(0.0025 -0.09 0) location=(0 0 0)
        Coordinate Torso_Rot: motion_type=rotational default_value=0 range=(-1.1 1.1) clamped=true
        SpatialTransform: axes_held_at_zero=(rotation2 rotation3 translation1 translation2 translation3)
          TransformAxis rotation1: coordinates=Torso_Rot axis=(0 1 0) LinearFunction(coefficients=1 0)
      WrapCylinder Cylinder: translation=(-0.208 0.04 0) quadrant=all radius=0.17 length=0.26
      WrapEllipsoid Chest_r: xyz_body_rotation=(0 -0.4 0.2) translation=(0 0.21 0.01) quadrant=z
          dimensions=(0.075 0.17 0.13)
      WrapEllipsoid Chest_l: xyz_body_rotation=(0 0.4 0.2) translation=(0 0.21 -0.01) quadrant=-z
          dimensions=(0.075 0.17 0.13)
    Body Abdomen: mass=0.001 mass_center=(0.008 0 0) inertia_xx=1.78e-6 inertia_yy=5.8e-7 inertia_zz=1.36e-6
      CustomJoint Abdjnt: parent_body=sacrum location_in_parent=(-0.098 0.071 0) location=(-0.09 -0.09 0)
        Coordinate Abs_r3: motion_type=rotational default_value=0 range=(-1.7 1.7) clamped=false
        Coordinate Abs_t1: motion_type=translational default_value=0 range=(-99999.9 99999.9) clamped=false locked=true
        Coordinate Abs_t2: motion_type=translational default_value=0 range=(-99999.9 99999.9) clamped=false locked=true
        SpatialTransform: axes_held_at_zero=(rotation2 rotation3 translation3)
          TransformAxis rotation1: coordinates=Abs_r3 axis=(0 0 1) LinearFunction(coefficients=1 0)
          TransformAxis translation1: coordinates=Abs_t1 axis=(1 0 0) LinearFunction(coefficients=1 0)
          TransformAxis translation2: coordinates=Abs_t2 axis=(0 1 0) LinearFunction(coefficients=1 0)
      WrapEllipsoid Abdomen: translation=(0 0 0) quadrant=x dimensions=(0.01 0.08 0.05)
    Body LB_wrap: mass=0.001 mass_center=(-0.098 0.071 0) inertia_xx=6.85833e-6 inertia_yy=6.85833e-6
        inertia_zz=2.45e-6
      CustomJoint LB_wrapjnt: parent_body=sacrum location_in_parent=(-0.098 0.071 0) location=(0 0 0)
        Coordinate LB_wrapjnt_r3: motion_type=rotational default_value=0 range=(-99999.9 99999.9) clamped=false
        Coordinate LB_wrapjnt_t1: motion_type=translational default_value=0 range=(-99999.9 99999.9) clamped=false
        Coordinate LB_wrapjnt_t2: motion_type=translational default_value=0 range=(-99999.9 99999.9) clamped=false
        SpatialTransform: axes_held_at_zero=(rotation2 rotation3 translation3)
          TransformAxis rotation1: coordinates=LB_wrapjnt_r3 axis=(0 0 1) LinearFunction(coefficients=1 0)
          TransformAxis translation1: coordinates=LB_wrapjnt_t1 axis=(1 0 0) LinearFunction(coefficients=1 0)
          TransformAxis translation2: coordinates=LB_wrapjnt_t2 axis=(0 1 0) LinearFunction(coefficients=1 0)
      WrapCylinder Cylinder2: translation=(-0.1151 0.0768 0) quadrant=all radius=0.07 length=0.26
    Body humerus_r: mass=2.0325 mass_center=(0 -0.164502 0) inertia_xx=0.011946 inertia_yy=0.004121 inertia_zz=0.013409
        meshes=humerus_rv.vtp
      CustomJoint acromial_r: parent_body=torso location_in_parent=(0.003155 0.3715 0.17) location=(0 0 0)
        Coordinate arm_flex_r: motion_type=rotational default_value=0 range=(-1.570796 1.570796) clamped=true
        Coordinate arm_add_r: motion_type=rotational default_value=0 range=(-2.094395 1.570796) clamped=true
        Coordinate arm_rot_r: motion_type=rotational default_value=0 range=(-1.570796 1.570796) clamped=true
        SpatialTransform: axes_held_at_zero=(translation1 translation2 translation3)
          TransformAxis rotation1: coordinates=arm_flex_r axis=(0 0 1) LinearFunction(coefficients=1 0)
          TransformAxis rotation2: coordinates=arm_add_r axis=(1 0 0) LinearFunction(coefficients=1 0)
          TransformAxis rotation3: coordinates=arm_rot_r axis=(0 1 0) LinearFunction(coefficients=1 0)
    Body ulna_r: mass=0.6075 mass_center=(0 -0.120525 0) inertia_xx=0.002962 inertia_yy=0.000618 inertia_zz=0.003213
        meshes=ulna_rv.vtp
      CustomJoint elbow_r: parent_body=humerus_r location_in_parent=(0.013144 -0.286273 -0.009595) location=(0 0 0)
        Coordinate elbow_flex_r: motion_type=rotational default_value=0 range=(0 2.618) clamped=true
        SpatialTransform: axes_held_at_zero=(rotation2 rotation3 translation1 translation2 translation3)
          TransformAxis rotation1: coordinates=elbow_flex_r axis=(0.226047 0.022269 0.9738618)
              LinearFunction(coefficients=1 0)
    Body radius_r: mass=0.6075 mass_center=(0 -0.120525 0) inertia_xx=0.002962 inertia_yy=0.000618 inertia_zz=0.003213
        meshes=radius_rv.vtp
      CustomJoint radioulnar_r: parent_body=ulna_r location_in_parent=(-0.006727 -0.013007 0.026083) location=(0 0 0)
        Coordinate pro_sup_r: motion_type=rotational default_value=0 range=(0 1.570796) clamped=true
        SpatialTransform: axes_held_at_zero=(rotation2 rotation3 translation1 translation2 translation3)
          TransformAxis rotation1: coordinates=pro_sup_r axis=(0.05639803 0.9984065 0.001952)
              LinearFunction(coefficients=1 0)
    Body hand_r: mass=0.4575 mass_center=(0 -0.068095 0) inertia_xx=0.000892 inertia_yy=0.000547 inertia_zz=0.00134
        meshes=(pisiform_rvs.vtp lunate_rvs.vtp scaphoid_rvs.vtp triquetrum_rvs.vtp hamate_rvs.vtp capitate_rvs.vtp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)
      CustomJoint radius_hand_r: parent_body=radius_r location_in_parent=(-0.008797 -0.235841 0.01361) location=(0 0 0)
        Coordinate wrist_flex_r: motion_type=rotational default_value=0 range=(-1.22173 1.22173) clamped=true
            locked=true
        Coordinate wrist_dev_r: motion_type=rotational default_value=0 range=(-0.4363323 0.6108652) clamped=true
            locked=true
        SpatialTransform: axes_held_at_zero=(rotation3 translation1 translation2 translation3)
          TransformAxis rotation1: coordinates=wrist_flex_r axis=(0 0 1) LinearFunction(coefficients=1 0)
          TransformAxis rotation2: coordinates=wrist_dev_r axis=(1 0 0) LinearFunction(coefficients=1 0)
    Body humerus_l: mass=2.0325 mass_center=(0 -0.164502 0) inertia_xx=0.011946 inertia_yy=0.004121 inertia_zz=0.013409
        meshes=humerus_lv.vtp
      CustomJoint acromial_l: parent_body=torso location_in_parent=(0.003155 0.3715 -0.17) location=(0 0 0)
        Coordinate arm_flex_l: motion_type=rotational default_value=0 range=(-1.570796 1.570796) clamped=true
        Coordinate arm_add_l: motion_type=rotational default_value=0 range=(-2.094395 1.570796) clamped=true
        Coordinate arm_rot_l: motion_type=rotational default_value=0 range=(-1.570796 1.570796) clamped=true
        SpatialTransform: axes_held_at_zero=(translation1 translation2 translation3)
          TransformAxis rotation1: coordinates=arm_flex_l axis=(0 0 1) LinearFunction(coefficients=1 0)
          TransformAxis rotation2: coordinates=arm_add_l axis=(-1 0 0) LinearFunction(coefficients=1 0)
          TransformAxis rotation3: coordinates=arm_rot_l axis=(0 -1 0) LinearFunction(coefficients=1 0)
    Body ulna_l: mass=0.6075 mass_center=(0 -0.120525 0) inertia_xx=0.002962 inertia_yy=0.000618 inertia_zz=0.003213
        meshes=ulna_lv.vtp
      CustomJoint elbow_l: parent_body=humerus_l location_in_parent=(0.013144 -0.286273 0.009595) location=(0 0 0)
        Coordinate elbow_flex_l: motion_type=rotational default_value=0 range=(0 2.618) clamped=true
        SpatialTransform: axes_held_at_zero=(rotation2 rotation3 translation1 translation2 translation3)
          TransformAxis rotation1: coordinates=elbow_flex_l axis=(-0.226047 -0.022269 0.9738618)
              LinearFunction(coefficients=1 0)
    Body radius_l: mass=0.6075 mass_center=(0 -0.120525 0) inertia_xx=0.002962 inertia_yy=0.000618 inertia_zz=0.003213
        meshes=radius_lv.vtp
      CustomJoint radioulnar_l: parent_body=ulna_l location_in_parent=(-0.006727 -0.013007 -0.026083) location=(0 0 0)
        Coordinate pro_sup_l: motion_type=rotational default_value=0 range=(0 1.570796) clamped=true
        SpatialTransform: axes_held_at_zero=(rotation2 rotation3 translation1 translation2 translation3)
          TransformAxis rotation1: coordinates=pro_sup_l axis=(-0.05639803 -0.9984065 0.001952)
              LinearFunction(coefficients=1 0)
    Body hand_l: mass=0.4575 mass_center=(0 -0.068095 0) inertia_xx=0.000892 inertia_yy=0.000547 inertia_zz=0.00134
        meshes=(pisiform_lvs.vtp lunate_lvs.vtp scaphoid_lvs.vtp triquetrum_lvs.vtp hamate_lvs.vtp capitate_lvs.vtp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)
      CustomJoint radius_hand_l: parent_body=radius_l location_in_parent=(-0.008797 -0.235841 -0.01361)
          location=(0 0 0)
        Coordinate wrist_flex_l: motion_type=rotational default_value=0 range=(-1.22173 1.22173) clamped=true
            locked=true
        Coordinate wrist_dev_l: motion_type=rotational default_value=0 range=(-0.4363323 0.6108652) clamped=true
            locked=true
        SpatialTransform: axes_held_at_zero=(rotation3 translation1 translation2 translation3)
          TransformAxis rotation1: coordinates=wrist_flex_l axis=(0 0 1) LinearFunction(coefficients=1 0)
          TransformAxis rotation2: coordinates=wrist_dev_l axis=(-1 0 0) LinearFunction(coefficients=1 0)
  ConstraintSet:
    CoordinateCouplerConstraint LB_wrapjnt_r3_con: independent_coordinate_names=flex_extension
        dependent_coordinate_name=LB_wrapjnt_r3 scale_factor=1
        coupled_coordinates_function=PiecewiseLinearFunction(x=0 1, y=0 0.6)
    CoordinateCouplerConstraint LB_wrapjnt_t1_con: independent_coordinate_names=flex_extension
        dependent_coordinate_name=LB_wrapjnt_t1 scale_factor=1
      coupled_coordinates_function: PiecewiseLinearFunction: x=(0 0.453786) y=(0 0.015)
    CoordinateCouplerConstraint LB_wrapjnt_t2_con: independent_coordinate_names=flex_extension
        dependent_coordinate_name=LB_wrapjnt_t2 scale_factor=1
      coupled_coordinates_function: PiecewiseLinearFunction: x=(0 0.453786) y=(0 0.005)
    CoordinateCouplerConstraint Abs_r3_con: independent_coordinate_names=flex_extension
        dependent_coordinate_name=Abs_r3 scale_factor=1
      coupled_coordinates_function: PiecewiseLinearFunction: x=(-1.22173 0) y=(-0.785398 0)
    CoordinateCouplerConstraint L4_L5_IVDjnt_r3_con: independent_coordinate_names=flex_extension
        dependent_coordinate_name=L4_L5_IVDjnt_r3 scale_factor=1
        coupled_coordinates_function=LinearFunction(coefficients=0.144 0)
    CoordinateCouplerConstraint L4_L5_IVD_rotjnt_r2_con: independent_coordinate_names=axial_rotation
        dependent_coordinate_name=L4_L5_IVD_rotjnt_r2 scale_factor=1
      coupled_coordinates_function: PiecewiseLinearFunction f452: x=(-0.785398 0 0.785398) y=(-0.0331613 0 0.0331613)
    CoordinateCouplerConstraint L4_L5_IVD_bendjnt_r1_con: independent_coordinate_names=lat_bending
        dependent_coordinate_name=L4_L5_IVD_bendjnt_r1 scale_factor=1
      coupled_coordinates_function: PiecewiseLinearFunction f61: x=(-1.01875 1.01875) y=(-0.184481 0.184481)
    CoordinateCouplerConstraint L3_L4_IVDjnt_r3_con: independent_coordinate_names=flex_extension
        dependent_coordinate_name=L3_L4_IVDjnt_r3 scale_factor=1
        coupled_coordinates_function=LinearFunction(coefficients=0.204745 0)
    CoordinateCouplerConstraint L3_L4_IVD_rotjnt_r2_con: independent_coordinate_names=axial_rotation
        dependent_coordinate_name=L3_L4_IVD_rotjnt_r2 scale_factor=1
      coupled_coordinates_function: PiecewiseLinearFunction f232: x=(-0.785398 0 0.785398) y=(-0.0331613 0 0.0331613)
    CoordinateCouplerConstraint L3_L4_IVD_bendjnt_r1_con: independent_coordinate_names=lat_bending
        dependent_coordinate_name=L3_L4_IVD_bendjnt_r1 scale_factor=1
      coupled_coordinates_function: PiecewiseLinearFunction f51: x=(-1.01875 1.01875) y=(-0.249931 0.249931)
    CoordinateCouplerConstraint L2_L3_IVDjnt_r3_con: independent_coordinate_names=flex_extension
        dependent_coordinate_name=L2_L3_IVDjnt_r3 scale_factor=1
        coupled_coordinates_function=LinearFunction(coefficients=0.246618 0)
    CoordinateCouplerConstraint L2_L3_IVD_rotjnt_r2_con: independent_coordinate_names=axial_rotation
        dependent_coordinate_name=L2_L3_IVD_rotjnt_r2 scale_factor=1
      coupled_coordinates_function: PiecewiseLinearFunction f232: x=(-0.785398 0 0.785398) y=(-0.0261799 0 0.0261799)
    CoordinateCouplerConstraint L2_L3_IVD_bendjnt_r1_con: independent_coordinate_names=lat_bending
        dependent_coordinate_name=L2_L3_IVD_bendjnt_r1 scale_factor=1
      coupled_coordinates_function: PiecewiseLinearFunction f41: x=(-1.01875 1.01875) y=(-0.254818 0.254818)
    CoordinateCouplerConstraint L1_L2_IVDjnt_r3_con: independent_coordinate_names=flex_extension
        dependent_coordinate_name=L1_L2_IVDjnt_r3 scale_factor=1
        coupled_coordinates_function=LinearFunction(coefficients=0.294182 0)
    CoordinateCouplerConstraint L1_L2_IVD_rotjnt_r2_con: independent_coordinate_names=axial_rotation
        dependent_coordinate_name=L1_L2_IVD_rotjnt_r2 scale_factor=1
      coupled_coordinates_function: PiecewiseLinearFunction f32: x=(-0.785398 0 0.785398) y=(-0.0226893 0 0.0226893)
    CoordinateCouplerConstraint L1_L2_IVD_bendjnt_r1_con: independent_coordinate_names=lat_bending
        dependent_coordinate_name=L1_L2_IVD_bendjnt_r1 scale_factor=1
      coupled_coordinates_function: PiecewiseLinearFunction f31: x=(-1.01875 1.01875) y=(-0.191463 0.191463)
    CoordinateCouplerConstraint patellofemoral_knee_angle_r_con: independent_coordinate_names=knee_angle_r
        dependent_coordinate_name=knee_angle_r_beta scale_factor=1
        coupled_coordinates_function=LinearFunction(coefficients=-1 0)
    CoordinateCouplerConstraint patellofemoral_knee_angle_l_con: independent_coordinate_names=knee_angle_l
        dependent_coordinate_name=knee_angle_l_beta scale_factor=1
        coupled_coordinates_function=LinearFunction(coefficients=-1 0)
    CoordinateCouplerConstraint Torso_rot_con: independent_coordinate_names=axial_rotation
        dependent_coordinate_name=Torso_Rot scale_factor=1
      coupled_coordinates_function: PiecewiseLinearFunction f40: x=(-0.11 0 0.11) y=(-0.0226209 0 0.0226209)
  ForceSet:
    Thelen2003Muscle glut_med1_r: max_isometric_force=1228.5 optimal_fiber_length=0.0535 tendon_slack_length=0.078
        pennation_angle_at_optimal=0.1396263 activation_time_constant=0.01 deactivation_time_constant=0.04
        FmaxTendonStrain=0.033 FmaxMuscleStrain=0.6 KshapeActive=0.5 KshapePassive=4 Af=0.3 Flen=1.8
      PathPoint P1: pelvis (-0.0408 0.0304 0.1209)
      PathPoint P2: femur_r (-0.0218 -0.0117 0.0555)
    Thelen2003Muscle glut_med2_r: max_isometric_force=859.5 optimal_fiber_length=0.0845 tendon_slack_length=0.053
        pennation_angle_at_optimal=0 activation_time_constant=0.01 deactivation_time_constant=0.04
        FmaxTendonStrain=0.033 FmaxMuscleStrain=0.6 KshapeActive=0.5 KshapePassive=4 Af=0.3 Flen=1.8
      PathPoint P1: pelvis (-0.0855 0.0445 0.0766)
      PathPoint P2: femur_r (-0.0258 -0.0058 0.0527)
    Thelen2003Muscle glut_med3_r: max_isometric_force=979.5 optimal_fiber_length=0.0646 tendon_slack_length=0.053
        pennation_angle_at_optimal=0.3316126 activation_time_constant=0.01 deactivation_time_constant=0.04
        FmaxTendonStrain=0.033 FmaxMuscleStrain=0.6 KshapeActive=0.5 KshapePassive=4 Af=0.3 Flen=1.8
      PathPoint P1: pelvis (-0.1223 0.0105 0.0648)
      PathPoint P2: femur_r (-0.0309 -0.0047 0.0518)
    Thelen2003Muscle glut_min1_r: max_isometric_force=405 optimal_fiber_length=0.068 tendon_slack_length=0.016
        pennation_angle_at_optimal=0.1745329 activation_time_constant=0.01 deactivation_time_constant=0.04
        FmaxTendonStrain=0.033 FmaxMuscleStrain=0.6 KshapeActive=0.5 KshapePassive=4 Af=0.3 Flen=1.8
      PathPoint P1: pelvis (-0.0467 -0.008 0.1056)
      PathPoint P2: femur_r (-0.0072 -0.0104 0.056)
    Thelen2003Muscle glut_min2_r: max_isometric_force=427.5 optimal_fiber_length=0.056 tendon_slack_length=0.026
        pennation_angle_at_optimal=0 activation_time_constant=0.01 deactivation_time_constant=0.04
        FmaxTendonStrain=0.033 FmaxMuscleStrain=0.6 KshapeActive=0.5 KshapePassive=4 Af=0.3 Flen=1.8
      PathPoint P1: pelvis (-0.0633 -0.0065 0.0991)
      PathPoint P2: femur_r (-0.0096 -0.0104 0.056)
    Thelen2003Muscle glut_min3_r: max_isometric_force=484.5 optimal_fiber_length=0.038 tendon_slack_length=0.051
        pennation_angle_at_optimal=0.01745329 activation_time_constant=0.01 deactivation_time_constant=0.04
        FmaxTendonStrain=0.033 FmaxMuscleStrain=0.6 KshapeActive=0.5 KshapePassive=4 Af=0.3 Flen=1.8
      PathPoint P1: pelvis (-0.0834 -0.0063 0.0856)
      PathPoint P2: femur_r (-0.0135 -0.0083 0.055)
    Thelen2003Muscle semimem_r: max_isometric_force=1288 optimal_fiber_length=0.08 tendon_slack_length=0.359
        pennation_angle_at_optimal=0.2617994 activation_time_constant=0.01 deactivation_time_constant=0.04
        FmaxTendonStrain=0.033 FmaxMuscleStrain=0.6 KshapeActive=0.5 KshapePassive=4 Af=0.3 Flen=1.8
      PathPoint P1: pelvis (-0.1192 -0.09747 0.07151)
      ConditionalPathPoint P2: tibia_r (-0.0348 -0.03519 -0.01891) range=(-0.558505 0.174533) coordinate=knee_angle_r
      PathPoint P3: tibia_r (-0.027 -0.04771 -0.01957)
    Thelen2003Muscle semiten_r: max_isometric_force=615 optimal_fiber_length=0.201 tendon_slack_length=0.2555
        pennation_angle_at_optimal=0.08726646 activation_time_constant=0.01 deactivation_time_constant=0.04
        FmaxTendonStrain=0.033 FmaxMuscleStrain=0.6 KshapeActive=0.5 KshapePassive=4 Af=0.3 Flen=1.8
      PathPoint P1: pelvis (-0.12635 -0.10988 0.06039)
      ConditionalPathPoint P2: tibia_r (-0.04203 -0.02859 -0.02277) range=(-0.331613 0.174533) coordinate=knee_angle_r
      PathPoint P3: tibia_r (-0.03322 -0.05282 -0.02288)
      PathPoint P4: tibia_r (-0.0113 -0.0746 -0.0245)
      PathPoint P5: tibia_r (0.0027 -0.0956 -0.0193)
    Thelen2003Muscle bifemlh_r: max_isometric_force=896 optimal_fiber_length=0.109 tendon_slack_length=0.326
        pennation_angle_at_optimal=0 activation_time_constant=0.01 deactivation_time_constant=0.04
        FmaxTendonStrain=0.033 FmaxMuscleStrain=0.6 KshapeActive=0.5 KshapePassive=4 Af=0.3 Flen=1.8
      PathPoint P1: pelvis (-0.12596 -0.10257 0.06944)
      PathPoint P2: tibia_r (-0.0301 -0.036 0.02943)
      PathPoint P3: tibia_r (-0.0234 -0.0563 0.0343)
    Thelen2003Muscle bifemsh_r: max_isometric_force=804 optimal_fiber_length=0.173 tendon_slack_length=0.089
        pennation_angle_at_optimal=0.4014257 activation_time_constant=0.01 deactivation_time_constant=0.04
        FmaxTendonStrain=0.033 FmaxMuscleStrain=0.6 KshapeActive=0.5 KshapePassive=4 Af=0.3 Flen=1.8
      PathPoint P1: femur_r (0.005 -0.2111 0.0234)
      PathPoint P2: tibia_r (-0.0301 -0.036 0.02943)
      PathPoint P3: tibia_r (-0.0234 -0.0563 0.0343)
    Thelen2003Muscle sar_r: max_isometric_force=156 optimal_fiber_length=0.52 tendon_slack_length=0.1
        pennation_angle_at_optimal=0 activation_time_constant=0.01 deactivation_time_constant=0.04
        FmaxTendonStrain=0.033 FmaxMuscleStrain=0.6 KshapeActive=0.5 KshapePassive=4 Af=0.3 Flen=1.8
      PathPoint P1: pelvis (-0.0153 -0.0013 0.1242)
      PathPoint P2: femur_r (-0.003 -0.3568 -0.0421)
      PathPoint P3: tibia_r (-0.0056 -0.0419 -0.0399)
      PathPoint P4: tibia_r (0.006 -0.0589 -0.0383)
      PathPoint P5: tibia_r (0.0243 -0.084 -0.0252)
    Thelen2003Muscle add_long_r: max_isometric_force=627 optimal_fiber_length=0.138 tendon_slack_length=0.11
        pennation_angle_at_optimal=0.1047198 activation_time_constant=0.01 deactivation_time_constant=0.04
        FmaxTendonStrain=0.033 FmaxMuscleStrain=0.6 KshapeActive=0.5 KshapePassive=4 Af=0.3 Flen=1.8
      PathPoint P1: pelvis (-0.0316 -0.0836 0.0169)
      PathPoint P2: femur_r (0.005 -0.2111 0.0234)
    Thelen2003Muscle add_brev_r: max_isometric_force=429 optimal_fiber_length=0.133 tendon_slack_length=0.02
        pennation_angle_at_optimal=0 activation_time_constant=0.01 deactivation_time_constant=0.04
        FmaxTendonStrain=0.033 FmaxMuscleStrain=0.6 KshapeActive=0.5 KshapePassive=4 Af=0.3 Flen=1.8
      PathPoint P1: pelvis (-0.0587 -0.0915 0.0164)
      PathPoint P2: femur_r (0.0009 -0.1196 0.0294)
    Thelen2003Muscle add_mag1_r: max_isometric_force=381 optimal_fiber_length=0.087 tendon_slack_length=0.06
        pennation_angle_at_optimal=0.08726646 activation_time_constant=0.01 deactivation_time_constant=0.04
        FmaxTendonStrain=0.033 FmaxMuscleStrain=0.6 KshapeActive=0.5 KshapePassive=4 Af=0.3 Flen=1.8
      PathPoint P1: pelvis (-0.0732 -0.1174 0.0255)
      PathPoint P2: femur_r (-0.0045 -0.1211 0.0339)
    Thelen2003Muscle add_mag2_r: max_isometric_force=343 optimal_fiber_length=0.121 tendon_slack_length=0.12
        pennation_angle_at_optimal=0.05235988 activation_time_constant=0.01 deactivation_time_constant=0.04
        FmaxTendonStrain=0.033 FmaxMuscleStrain=0.6 KshapeActive=0.5 KshapePassive=4 Af=0.3 Flen=1.8
      PathPoint P1: pelvis (-0.0831 -0.1192 0.0308)
      PathPoint P2: femur_r (0.0054 -0.2285 0.0227)
    Thelen2003Muscle add_mag3_r: max_isometric_force=488 optimal_fiber_length=0.131 tendon_slack_length=0.249
        pennation_angle_at_optimal=0.08726646 activation_time_constant=0.01 deactivation_time_constant=0.04
        FmaxTendonStrain=0.033 FmaxMuscleStrain=0.6 KshapeActive=0.5 KshapePassive=4 Af=0.3 Flen=1.8
      PathPoint P1: pelvis (-0.11108 -0.11413 0.04882)
      PathPoint P2: femur_r (0.007 -0.3837 -0.0266)
    Thelen2003Muscle tfl_r: max_isometric_force=349.5 optimal_fiber_length=0.095 tendon_slack_length=0.425
        pennation_angle_at_optimal=0.05235988 activation_time_constant=0.01 deactivation_time_constant=0.04
        FmaxTendonStrain=0.033 FmaxMuscleStrain=0.6 KshapeActive=0.5 KshapePassive=4 Af=0.3 Flen=1.8
      PathPoint P1: pelvis (-0.0311 0.0214 0.1241)
      PathPoint P2: femur_r (0.0294 -0.0995 0.0597)
      PathPoint P3: femur_r (0.0054 -0.4049 0.0357)
      PathPoint P4: tibia_r (0.006 -0.0487 0.0297)
    Thelen2003Muscle pect_r: max_isometric_force=266 optimal_fiber_length=0.1 tendon_slack_length=0.033
        pennation_angle_at_optimal=0 activation_time_constant=0.01 deactivation_time_constant=0.04
        FmaxTendonStrain=0.033 FmaxMuscleStrain=0.6 KshapeActive=0.5 KshapePassive=4 Af=0.3 Flen=1.8
      PathPoint P1: pelvis (-0.0431 -0.0768 0.0451)
      PathPoint P2: femur_r (-0.0122 -0.0822 0.0253)
    Thelen2003Muscle grac_r: max_isometric_force=162 optimal_fiber_length=0.352 tendon_slack_length=0.126
        pennation_angle_at_optimal=0.05235988 activation_time_constant=0.01 deactivation_time_constant=0.04
        FmaxTendonStrain=0.033 FmaxMuscleStrain=0.6 KshapeActive=0.5 KshapePassive=4 Af=0.3 Flen=1.8
      PathPoint P1: pelvis (-0.07401 -0.1187 0.02794)
      ConditionalPathPoint P2: tibia_r (-0.02657 -0.0319 -0.03774) range=(-0.436332 0.174533) coordinate=knee_angle_r
      PathPoint P3: tibia_r (-0.01943 -0.05153 -0.0358)
      PathPoint P4: tibia_r (0.006 -0.0836 -0.0228)
    Thelen2003Muscle glut_max1_r: max_isometric_force=573 optimal_fiber_length=0.142 tendon_slack_length=0.125
        pennation_angle_at_optimal=0.08726646 activation_time_constant=0.01 deactivation_time_constant=0.04
        FmaxTendonStrain=0.033 FmaxMuscleStrain=0.6 KshapeActive=0.5 KshapePassive=4 Af=0.3 Flen=1.8
      PathPoint P1: pelvis (-0.1195 0.0612 0.07)
      PathPoint P2: pelvis (-0.1291 0.0012 0.0886)
      PathPoint P3: femur_r (-0.0457 -0.0248 0.0392)
      PathPoint P4: femur_r (-0.0277 -0.0566 0.047)
    Thelen2003Muscle glut_max2_r: max_isometric_force=819 optimal_fiber_length=0.147 tendon_slack_length=0.127
        pennation_angle_at_optimal=0 activation_time_constant=0.01 deactivation_time_constant=0.04
        FmaxTendonStrain=0.033 FmaxMuscleStrain=0.6 KshapeActive=0.5 KshapePassive=4 Af=0.3 Flen=1.8
      PathPoint P1: pelvis (-0.1349 0.0176 0.0563)
      PathPoint P2: pelvis (-0.1376 -0.052 0.0914)
      PathPoint P3: femur_r (-0.0426 -0.053 0.0293)
      PathPoint P4: femur_r (-0.0156 -0.1016 0.0419)
    Thelen2003Muscle glut_max3_r: max_isometric_force=552 optimal_fiber_length=0.144 tendon_slack_length=0.145
        pennation_angle_at_optimal=0.08726646 activation_time_constant=0.01 deactivation_time_constant=0.04
        FmaxTendonStrain=0.033 FmaxMuscleStrain=0.6 KshapeActive=0.5 KshapePassive=4 Af=0.3 Flen=1.8
      PathPoint P1: pelvis (-0.1556 -0.0314 0.0058)
      PathPoint P2: pelvis (-0.1529 -0.1052 0.0403)
      PathPoint P3: femur_r (-0.0299 -0.1041 0.0135)
      PathPoint P4: femur_r (-0.006 -0.1419 0.0411)
    Thelen2003Muscle iliacus_r: max_isometric_force=1609.5 optimal_fiber_length=0.1 tendon_slack_length=0.1
        pennation_angle_at_optimal=0.1221731 activation_time_constant=0.01 deactivation_time_constant=0.04
        FmaxTendonStrain=0.033 FmaxMuscleStrain=0.6 KshapeActive=0.5 KshapePassive=4 Af=0.3 Flen=1.8
      PathPoint P1: pelvis (-0.0674 0.0365 0.0854)
      PathPoint P2: pelvis (-0.0258 -0.055 0.0811)
      ConditionalPathPoint P3: pelvis (-0.0288 -0.0805 0.0816) range=(-1.5708 0.785398) coordinate=hip_flexion_r
      PathPoint P4: femur_r (0.0017 -0.0543 0.0057)
      PathPoint P5: femur_r (-0.0193 -0.0621 0.0129)
    Thelen2003Muscle quad_fem_r: max_isometric_force=381 optimal_fiber_length=0.054 tendon_slack_length=0.024
        pennation_angle_at_optimal=0 activation_time_constant=0.01 deactivation_time_constant=0.04
        FmaxTendonStrain=0.033 FmaxMuscleStrain=0.6 KshapeActive=0.5 KshapePassive=4 Af=0.3 Flen=1.8
      PathPoint P1: pelvis (-0.1143 -0.1151 0.052)
      PathPoint P2: femur_r (-0.0381 -0.0359 0.0366)
    Thelen2003Muscle gem_r: max_isometric_force=164 optimal_fiber_length=0.024 tendon_slack_length=0.039
        pennation_angle_at_optimal=0 activation_time_constant=0.01 deactivation_time_constant=0.04
        FmaxTendonStrain=0.033 FmaxMuscleStrain=0.6 KshapeActive=0.5 KshapePassive=4 Af=0.3 Flen=1.8
      PathPoint P1: pelvis (-0.1133 -0.082 0.0714)
      PathPoint P2: femur_r (-0.0142 -0.0033 0.0443)
    Thelen2003Muscle peri_r: max_isometric_force=444 optimal_fiber_length=0.026 tendon_slack_length=0.115
        pennation_angle_at_optimal=0.1745329 activation_time_constant=0.01 deactivation_time_constant=0.04
        FmaxTendonStrain=0.033 FmaxMuscleStrain=0.6 KshapeActive=0.5 KshapePassive=4 Af=0.3 Flen=1.8
      PathPoint P1: pelvis (-0.1396 0.0003 0.0235)
      PathPoint P2: pelvis (-0.1193 -0.0276 0.0657)
      PathPoint P3: femur_r (-0.0148 -0.0036 0.0437)
    Thelen2003Muscle rect_fem_r: max_isometric_force=1169 optimal_fiber_length=0.114 tendon_slack_length=0.31
        pennation_angle_at_optimal=0.08726646 activation_time_constant=0.01 deactivation_time_constant=0.04
        FmaxTendonStrain=0.033 FmaxMuscleStrain=0.6 KshapeActive=0.5 KshapePassive=4 Af=0.3 Flen=1.8
      PathPoint P1: pelvis (-0.0295 -0.0311 0.0968)
      ConditionalPathPoint P2: femur_r (0.0334 -0.403 0.0019) range=(-2.61799 -1.45997) coordinate=knee_angle_r
      PathPoint P3: patella_r (0.01 0.049 0.0007)
      PathPoint P4: patella_r (0.0121 0.0437 -0.001)
    Thelen2003Muscle vas_med_r: max_isometric_force=1294 optimal_fiber_length=0.089 tendon_slack_length=0.126
        pennation_angle_at_optimal=0.08726646 activation_time_constant=0.01 deactivation_time_constant=0.04
        FmaxTendonStrain=0.033 FmaxMuscleStrain=0.6 KshapeActive=0.5 KshapePassive=4 Af=0.3 Flen=1.8
      PathPoint P1: femur_r (0.014 -0.2099 0.0188)
      PathPoint P2: femur_r (0.0356 -0.2769 0.0009)
      ConditionalPathPoint P3: femur_r (0.037 -0.4048 -0.0125) range=(-2.61799 -1.21004) coordinate=knee_angle_r
      ConditionalPathPoint P4: femur_r (0.0274 -0.4255 -0.0131) range=(-2.61799 -1.78006) coordinate=knee_angle_r
      PathPoint P5: patella_r (0.0063 0.0445 -0.017)
    Thelen2003Muscle vas_int_r: max_isometric_force=1365 optimal_fiber_length=0.087 tendon_slack_length=0.136
        pennation_angle_at_optimal=0.05235988 activation_time_constant=0.01 deactivation_time_constant=0.04
        FmaxTendonStrain=0.033 FmaxMuscleStrain=0.6 KshapeActive=0.5 KshapePassive=4 Af=0.3 Flen=1.8
      PathPoint P1: femur_r (0.029 -0.1924 0.031)
      PathPoint P2: femur_r (0.0335 -0.2084 0.0285)
      ConditionalPathPoint P3: femur_r (0.0343 -0.403 0.0055) range=(-2.61799 -1.42) coordinate=knee_angle_r
      PathPoint P4: patella_r (0.0058 0.048 -0.0006)
    Thelen2003Muscle vas_lat_r: max_isometric_force=1871 optimal_fiber_length=0.084 tendon_slack_length=0.157
        pennation_angle_at_optimal=0.08726646 activation_time_constant=0.01 deactivation_time_constant=0.04
        FmaxTendonStrain=0.033 FmaxMuscleStrain=0.6 KshapeActive=0.5 KshapePassive=4 Af=0.3 Flen=1.8
      PathPoint P1: femur_r (0.0048 -0.1854 0.0349)
      PathPoint P2: femur_r (0.0269 -0.2591 0.0409)
      ConditionalPathPoint P3: femur_r (0.0361 -0.403 0.0205) range=(-2.61799 -1.21004) coordinate=knee_angle_r
      ConditionalPathPoint P4: femur_r (0.0253 -0.4243 0.0184) range=(-2.61799 -1.92004) coordinate=knee_angle_r
      PathPoint P5: patella_r (0.0103 0.0423 0.0141)
    Thelen2003Muscle patlig_r: max_isometric_force=1 optimal_fiber_length=0.05 tendon_slack_length=0.005
        pennation_angle_at_optimal=0 activation_time_constant=0.01 deactivation_time_constant=0.04
        FmaxTendonStrain=0.033 FmaxMuscleStrain=0.6 KshapeActive=0.5 KshapePassive=4 Af=0.3 Flen=1.8
      PathPoint P1: tibia_r (0.0282 -0.0579 0.0057)
      PathPoint P2: patella_r (0.0021 0.0015 0.0001)
    Thelen2003Muscle med_gas_r: max_isometric_force=2337 optimal_fiber_length=0.06 tendon_slack_length=0.39
        pennation_angle_at_optimal=0.296706 activation_time_constant=0.01 deactivation_time_constant=0.04
        FmaxTendonStrain=0.033 FmaxMuscleStrain=0.6 KshapeActive=0.5 KshapePassive=4 Af=0.3 Flen=1.8
      PathPoint P1: femur_r (-0.019 -0.3929 -0.0235)
      ConditionalPathPoint P2: femur_r (-0.03 -0.4022 -0.0258) range=(-0.785398 0.174533) coordinate=knee_angle_r
      PathPoint P3: calcn_r (0 0.031 -0.0053)
    Thelen2003Muscle lat_gas_r: max_isometric_force=1024.5 optimal_fiber_length=0.064 tendon_slack_length=0.38
        pennation_angle_at_optimal=0.1396263 activation_time_constant=0.01 deactivation_time_constant=0.04
        FmaxTendonStrain=0.033 FmaxMuscleStrain=0.6 KshapeActive=0.5 KshapePassive=4 Af=0.3 Flen=1.8
      PathPoint P1: femur_r (-0.022 -0.3946 0.0272)
      ConditionalPathPoint P2: femur_r (-0.03 -0.4018 0.0274) range=(-0.785398 0.174533) coordinate=knee_angle_r
      PathPoint P3: calcn_r (0 0.031 -0.0053)
    Thelen2003Muscle soleus_r: max_isometric_force=5323.5 optimal_fiber_length=0.05 tendon_slack_length=0.25
        pennation_angle_at_optimal=0.4363323 activation_time_constant=0.01 deactivation_time_constant=0.04
        FmaxTendonStrain=0.033 FmaxMuscleStrain=0.6 KshapeActive=0.5 KshapePassive=4 Af=0.3 Flen=1.8
      PathPoint P1: tibia_r (-0.0024 -0.1533 0.0071)
      PathPoint P2: calcn_r (0 0.031 -0.0053)
    Thelen2003Muscle tib_post_r: max_isometric_force=2382 optimal_fiber_length=0.031 tendon_slack_length=0.31
        pennation_angle_at_optimal=0.2094395 activation_time_constant=0.01 deactivation_time_constant=0.04
        FmaxTendonStrain=0.033 FmaxMuscleStrain=0.6 KshapeActive=0.5 KshapePassive=4 Af=0.3 Flen=1.8
      PathPoint P1: tibia_r (-0.0094 -0.1348 0.0019)
      PathPoint P2: tibia_r (-0.0144 -0.4051 -0.0229)
      PathPoint P3: calcn_r (0.0417 0.0334 -0.0286)
      PathPoint P4: calcn_r (0.0772 0.0159 -0.0281)
    Thelen2003Muscle flex_dig_r: max_isometric_force=465 optimal_fiber_length=0.034 tendon_slack_length=0.4
        pennation_angle_at_optimal=0.1221731 activation_time_constant=0.01 deactivation_time_constant=0.04
        FmaxTendonStrain=0.033 FmaxMuscleStrain=0.6 KshapeActive=0.5 KshapePassive=4 Af=0.3 Flen=1.8
      PathPoint P1: tibia_r (-0.0083 -0.2046 -0.0018)
      PathPoint P2: tibia_r (-0.0154 -0.4051 -0.0196)
      PathPoint P3: calcn_r (0.0436 0.0315 -0.028)
      PathPoint P4: calcn_r (0.0708 0.0176 -0.0263)
      PathPoint P5: calcn_r (0.1658 -0.0081 0.0116)
      PathPoint P6: toes_r (-0.0019 -0.0078 0.0147)
      PathPoint P7: toes_r (0.0285 -0.0071 0.0215)
      PathPoint P8: toes_r (0.0441 -0.006 0.0242)
    Thelen2003Muscle flex_hal_r: max_isometric_force=483 optimal_fiber_length=0.043 tendon_slack_length=0.38
        pennation_angle_at_optimal=0.1745329 activation_time_constant=0.01 deactivation_time_constant=0.04
        FmaxTendonStrain=0.033 FmaxMuscleStrain=0.6 KshapeActive=0.5 KshapePassive=4 Af=0.3 Flen=1.8
      PathPoint P1: tibia_r (-0.0079 -0.2334 0.0244)
      PathPoint P2: tibia_r (-0.0186 -0.4079 -0.0174)
      PathPoint P3: calcn_r (0.0374 0.0276 -0.0241)
      PathPoint P4: calcn_r (0.1038 0.0068 -0.0256)
      PathPoint P5: calcn_r (0.1726 -0.0053 -0.0269)
      PathPoint P6: toes_r (0.0155 -0.0064 -0.0265)
      PathPoint P7: toes_r (0.0562 -0.0102 -0.0181)
    Thelen2003Muscle tib_ant_r: max_isometric_force=905 optimal_fiber_length=0.098 tendon_slack_length=0.223
        pennation_angle_at_optimal=0.08726646 activation_time_constant=0.01 deactivation_time_constant=0.04
        FmaxTendonStrain=0.033 FmaxMuscleStrain=0.6 KshapeActive=0.5 KshapePassive=4 Af=0.3 Flen=1.8
      PathPoint P1: tibia_r (0.0179 -0.1624 0.0115)
      PathPoint P2: tibia_r (0.0329 -0.3951 -0.0177)
      PathPoint P3: calcn_r (0.1166 0.0178 -0.0305)
    Thelen2003Muscle per_brev_r: max_isometric_force=435 optimal_fiber_length=0.05 tendon_slack_length=0.161
        pennation_angle_at_optimal=0.08726646 activation_time_constant=0.01 deactivation_time_constant=0.04
        FmaxTendonStrain=0.033 FmaxMuscleStrain=0.6 KshapeActive=0.5 KshapePassive=4 Af=0.3 Flen=1.8
      PathPoint P1: tibia_r (-0.007 -0.2646 0.0325)
      PathPoint P2: tibia_r (-0.0198 -0.4184 0.0283)
      PathPoint P3: tibia_r (-0.0144 -0.4295 0.0289)
      PathPoint P4: calcn_r (0.0471 0.027 0.0233)
      PathPoint P5: calcn_r (0.0677 0.0219 0.0343)
    Thelen2003Muscle per_long_r: max_isometric_force=1414.5 optimal_fiber_length=0.049 tendon_slack_length=0.345
        pennation_angle_at_optimal=0.1745329 activation_time_constant=0.01 deactivation_time_constant=0.04
        FmaxTendonStrain=0.033 FmaxMuscleStrain=0.6 KshapeActive=0.5 KshapePassive=4 Af=0.3 Flen=1.8
      PathPoint P1: tibia_r (0.0005 -0.1568 0.0362)
      PathPoint P2: tibia_r (-0.0207 -0.4205 0.0286)
      PathPoint P3: tibia_r (-0.0162 -0.4319 0.0289)
      PathPoint P4: calcn_r (0.0438 0.023 0.0221)
      PathPoint P5: calcn_r (0.0681 0.0106 0.0284)
      PathPoint P6: calcn_r (0.0852 0.0069 0.0118)
      PathPoint P7: calcn_r (0.1203 0.0085 -0.0184)
    Thelen2003Muscle per_tert_r: max_isometric_force=180 optimal_fiber_length=0.079 tendon_slack_length=0.1
        pennation_angle_at_optimal=0.2268928 activation_time_constant=0.01 deactivation_time_constant=0.04
        FmaxTendonStrain=0.033 FmaxMuscleStrain=0.6 KshapeActive=0.5 KshapePassive=4 Af=0.3 Flen=1.8
      PathPoint P1: tibia_r (0.001 -0.2804 0.0231)
      PathPoint P2: tibia_r (0.0229 -0.4069 0.0159)
      PathPoint P3: calcn_r (0.0857 0.0228 0.0299)
    Thelen2003Muscle ext_dig_r: max_isometric_force=512 optimal_fiber_length=0.102 tendon_slack_length=0.345
        pennation_angle_at_optimal=0.1396263 activation_time_constant=0.01 deactivation_time_constant=0.04
        FmaxTendonStrain=0.033 FmaxMuscleStrain=0.6 KshapeActive=0.5 KshapePassive=4 Af=0.3 Flen=1.8
      PathPoint P1: tibia_r (0.0032 -0.1381 0.0276)
      PathPoint P2: tibia_r (0.0289 -0.4007 0.0072)
      PathPoint P3: calcn_r (0.0922 0.0388 -0.0001)
      PathPoint P4: calcn_r (0.1616 0.0055 0.013)
      PathPoint P5: toes_r (0.0003 0.0047 0.0153)
      PathPoint P6: toes_r (0.0443 -0.0004 0.025)
    Thelen2003Muscle ext_hal_r: max_isometric_force=162 optimal_fiber_length=0.111 tendon_slack_length=0.305
        pennation_angle_at_optimal=0.1047198 activation_time_constant=0.01 deactivation_time_constant=0.04
        FmaxTendonStrain=0.033 FmaxMuscleStrain=0.6 KshapeActive=0.5 KshapePassive=4 Af=0.3 Flen=1.8
      PathPoint P1: tibia_r (0.0012 -0.1767 0.0228)
      PathPoint P2: tibia_r (0.0326 -0.3985 -0.0085)
      PathPoint P3: calcn_r (0.097 0.0389 -0.0211)
      PathPoint P4: calcn_r (0.1293 0.0309 -0.0257)
      PathPoint P5: calcn_r (0.1734 0.0139 -0.028)
      PathPoint P6: toes_r (0.0298 0.0041 -0.0245)
      PathPoint P7: toes_r (0.0563 0.0034 -0.0186)
    Thelen2003Muscle glut_med1_l: max_isometric_force=1228.5 optimal_fiber_length=0.0535 tendon_slack_length=0.078
        pennation_angle_at_optimal=0.1396263 activation_time_constant=0.01 deactivation_time_constant=0.04
        FmaxTendonStrain=0.033 FmaxMuscleStrain=0.6 KshapeActive=0.5 KshapePassive=4 Af=0.3 Flen=1.8
      PathPoint P1: pelvis (-0.0408 0.0304 -0.1209)
      PathPoint P2: femur_l (-0.0218 -0.0117 -0.0555)
    Thelen2003Muscle glut_med2_l: max_isometric_force=859.5 optimal_fiber_length=0.0845 tendon_slack_length=0.053
        pennation_angle_at_optimal=0 activation_time_constant=0.01 deactivation_time_constant=0.04
        FmaxTendonStrain=0.033 FmaxMuscleStrain=0.6 KshapeActive=0.5 KshapePassive=4 Af=0.3 Flen=1.8
      PathPoint P1: pelvis (-0.0855 0.0445 -0.0766)
      PathPoint P2: femur_l (-0.0258 -0.0058 -0.0527)
    Thelen2003Muscle glut_med3_l: max_isometric_force=979.5 optimal_fiber_length=0.0646 tendon_slack_length=0.053
        pennation_angle_at_optimal=0.3316126 activation_time_constant=0.01 deactivation_time_constant=0.04
        FmaxTendonStrain=0.033 FmaxMuscleStrain=0.6 KshapeActive=0.5 KshapePassive=4 Af=0.3 Flen=1.8
      PathPoint P1: pelvis (-0.1223 0.0105 -0.0648)
      PathPoint P2: femur_l (-0.0309 -0.0047 -0.0518)
    Thelen2003Muscle glut_min1_l: max_isometric_force=405 optimal_fiber_length=0.068 tendon_slack_length=0.016
        pennation_angle_at_optimal=0.1745329 activation_time_constant=0.01 deactivation_time_constant=0.04
        FmaxTendonStrain=0.033 FmaxMuscleStrain=0.6 KshapeActive=0.5 KshapePassive=4 Af=0.3 Flen=1.8
      PathPoint P1: pelvis (-0.0467 -0.008 -0.1056)
      PathPoint P2: femur_l (-0.0072 -0.0104 -0.056)
    Thelen2003Muscle glut_min2_l: max_isometric_force=427.5 optimal_fiber_length=0.056 tendon_slack_length=0.026
        pennation_angle_at_optimal=0 activation_time_constant=0.01 deactivation_time_constant=0.04
        FmaxTendonStrain=0.033 FmaxMuscleStrain=0.6 KshapeActive=0.5 KshapePassive=4 Af=0.3 Flen=1.8
      PathPoint P1: pelvis (-0.0633 -0.0065 -0.0991)
      PathPoint P2: femur_l (-0.0096 -0.0104 -0.056)
    Thelen2003Muscle glut_min3_l: max_isometric_force=484.5 optimal_fiber_length=0.038 tendon_slack_length=0.051
        pennation_angle_at_optimal=0.01745329 activation_time_constant=0.01 deactivation_time_constant=0.04
        FmaxTendonStrain=0.033 FmaxMuscleStrain=0.6 KshapeActive=0.5 KshapePassive=4 Af=0.3 Flen=1.8
      PathPoint P1: pelvis (-0.0834 -0.0063 -0.0856)
      PathPoint P2: femur_l (-0.0135 -0.0083 -0.055)
    Thelen2003Muscle semimem_l: max_isometric_force=1288 optimal_fiber_length=0.08 tendon_slack_length=0.359
        pennation_angle_at_optimal=0.2617994 activation_time_constant=0.01 deactivation_time_constant=0.04
        FmaxTendonStrain=0.033 FmaxMuscleStrain=0.6 KshapeActive=0.5 KshapePassive=4 Af=0.3 Flen=1.8
      PathPoint P1: pelvis (-0.1192 -0.09747 -0.07151)
      ConditionalPathPoint P2: tibia_l (-0.0348 -0.03519 0.01891) range=(-0.558505 0.174533) coordinate=knee_angle_l
      PathPoint P3: tibia_l (-0.027 -0.04771 0.01957)
    Thelen2003Muscle semiten_l: max_isometric_force=615 optimal_fiber_length=0.201 tendon_slack_length=0.2555
        pennation_angle_at_optimal=0.08726646 activation_time_constant=0.01 deactivation_time_constant=0.04
        FmaxTendonStrain=0.033 FmaxMuscleStrain=0.6 KshapeActive=0.5 KshapePassive=4 Af=0.3 Flen=1.8
      PathPoint P1: pelvis (-0.12635 -0.10988 -0.06039)
      ConditionalPathPoint P2: tibia_l (-0.04203 -0.02859 0.02277) range=(-0.331613 0.174533) coordinate=knee_angle_l
      PathPoint P3: tibia_l (-0.03322 -0.05282 0.02288)
      PathPoint P4: tibia_l (-0.0113 -0.0746 0.0245)
      PathPoint P5: tibia_l (0.0027 -0.0956 0.0193)
    Thelen2003Muscle bifemlh_l: max_isometric_force=896 optimal_fiber_length=0.109 tendon_slack_length=0.326
        pennation_angle_at_optimal=0 activation_time_constant=0.01 deactivation_time_constant=0.04
        FmaxTendonStrain=0.033 FmaxMuscleStrain=0.6 KshapeActive=0.5 KshapePassive=4 Af=0.3 Flen=1.8
      PathPoint P1: pelvis (-0.12596 -0.10257 -0.06944)
      PathPoint P2: tibia_l (-0.0301 -0.036 -0.02943)
      PathPoint P3: tibia_l (-0.0234 -0.0563 -0.0343)
    Thelen2003Muscle bifemsh_l: max_isometric_force=804 optimal_fiber_length=0.173 tendon_slack_length=0.089
        pennation_angle_at_optimal=0.4014257 activation_time_constant=0.01 deactivation_time_constant=0.04
        FmaxTendonStrain=0.033 FmaxMuscleStrain=0.6 KshapeActive=0.5 KshapePassive=4 Af=0.3 Flen=1.8
      PathPoint P1: femur_l (0.005 -0.2111 -0.0234)
      PathPoint P2: tibia_l (-0.0301 -0.036 -0.02943)
      PathPoint P3: tibia_l (-0.0234 -0.0563 -0.0343)
    Thelen2003Muscle sar_l: max_isometric_force=156 optimal_fiber_length=0.52 tendon_slack_length=0.1
        pennation_angle_at_optimal=0 activation_time_constant=0.01 deactivation_time_constant=0.04
        FmaxTendonStrain=0.033 FmaxMuscleStrain=0.6 KshapeActive=0.5 KshapePassive=4 Af=0.3 Flen=1.8
      PathPoint P1: pelvis (-0.0153 -0.0013 -0.1242)
      PathPoint P2: femur_l (-0.003 -0.3568 0.0421)
      PathPoint P3: tibia_l (-0.0056 -0.0419 0.0399)
      PathPoint P4: tibia_l (0.006 -0.0589 0.0383)
      PathPoint P5: tibia_l (0.0243 -0.084 0.0252)
    Thelen2003Muscle add_long_l: max_isometric_force=627 optimal_fiber_length=0.138 tendon_slack_length=0.11
        pennation_angle_at_optimal=0.1047198 activation_time_constant=0.01 deactivation_time_constant=0.04
        FmaxTendonStrain=0.033 FmaxMuscleStrain=0.6 KshapeActive=0.5 KshapePassive=4 Af=0.3 Flen=1.8
      PathPoint P1: pelvis (-0.0316 -0.0836 -0.0169)
      PathPoint P2: femur_l (0.005 -0.2111 -0.0234)
    Thelen2003Muscle add_brev_l: max_isometric_force=429 optimal_fiber_length=0.133 tendon_slack_length=0.02
        pennation_angle_at_optimal=0 activation_time_constant=0.01 deactivation_time_constant=0.04
        FmaxTendonStrain=0.033 FmaxMuscleStrain=0.6 KshapeActive=0.5 KshapePassive=4 Af=0.3 Flen=1.8
      PathPoint P1: pelvis (-0.0587 -0.0915 -0.0164)
      PathPoint P2: femur_l (0.0009 -0.1196 -0.0294)
    Thelen2003Muscle add_mag1_l: max_isometric_force=381 optimal_fiber_length=0.087 tendon_slack_length=0.06
        pennation_angle_at_optimal=0.08726646 activation_time_constant=0.01 deactivation_time_constant=0.04
        FmaxTendonStrain=0.033 FmaxMuscleStrain=0.6 KshapeActive=0.5 KshapePassive=4 Af=0.3 Flen=1.8
      PathPoint P1: pelvis (-0.0732 -0.1174 -0.0255)
      PathPoint P2: femur_l (-0.0045 -0.1211 -0.0339)
    Thelen2003Muscle add_mag2_l: max_isometric_force=343 optimal_fiber_length=0.121 tendon_slack_length=0.12
        pennation_angle_at_optimal=0.05235988 activation_time_constant=0.01 deactivation_time_constant=0.04
        FmaxTendonStrain=0.033 FmaxMuscleStrain=0.6 KshapeActive=0.5 KshapePassive=4 Af=0.3 Flen=1.8
      PathPoint P1: pelvis (-0.0831 -0.1192 -0.0308)
      PathPoint P2: femur_l (0.0054 -0.2285 -0.0227)
    Thelen2003Muscle add_mag3_l: max_isometric_force=488 optimal_fiber_length=0.131 tendon_slack_length=0.249
        pennation_angle_at_optimal=0.08726646 activation_time_constant=0.01 deactivation_time_constant=0.04
        FmaxTendonStrain=0.033 FmaxMuscleStrain=0.6 KshapeActive=0.5 KshapePassive=4 Af=0.3 Flen=1.8
      PathPoint P1: pelvis (-0.11108 -0.11413 -0.04882)
      PathPoint P2: femur_l (0.007 -0.3837 0.0266)
    Thelen2003Muscle tfl_l: max_isometric_force=349.5 optimal_fiber_length=0.095 tendon_slack_length=0.425
        pennation_angle_at_optimal=0.05235988 activation_time_constant=0.01 deactivation_time_constant=0.04
        FmaxTendonStrain=0.033 FmaxMuscleStrain=0.6 KshapeActive=0.5 KshapePassive=4 Af=0.3 Flen=1.8
      PathPoint P1: pelvis (-0.0311 0.0214 -0.1241)
      PathPoint P2: femur_l (0.0294 -0.0995 -0.0597)
      PathPoint P3: femur_l (0.0054 -0.4049 -0.0357)
      PathPoint P4: tibia_l (0.006 -0.0487 -0.0297)
    Thelen2003Muscle pect_l: max_isometric_force=266 optimal_fiber_length=0.1 tendon_slack_length=0.033
        pennation_angle_at_optimal=0 activation_time_constant=0.01 deactivation_time_constant=0.04
        FmaxTendonStrain=0.033 FmaxMuscleStrain=0.6 KshapeActive=0.5 KshapePassive=4 Af=0.3 Flen=1.8
      PathPoint P1: pelvis (-0.0431 -0.0768 -0.0451)
      PathPoint P2: femur_l (-0.0122 -0.0822 -0.0253)
    Thelen2003Muscle grac_l: max_isometric_force=162 optimal_fiber_length=0.352 tendon_slack_length=0.126
        pennation_angle_at_optimal=0.05235988 activation_time_constant=0.01 deactivation_time_constant=0.04
        FmaxTendonStrain=0.033 FmaxMuscleStrain=0.6 KshapeActive=0.5 KshapePassive=4 Af=0.3 Flen=1.8
      PathPoint P1: pelvis (-0.07401 -0.1187 -0.02794)
      ConditionalPathPoint P2: tibia_l (-0.02657 -0.0319 0.03774) range=(-0.436332 0.174533) coordinate=knee_angle_l
      PathPoint P3: tibia_l (-0.01943 -0.05153 0.0358)
      PathPoint P4: tibia_l (0.006 -0.0836 0.0228)
    Thelen2003Muscle glut_max1_l: max_isometric_force=573 optimal_fiber_length=0.142 tendon_slack_length=0.125
        pennation_angle_at_optimal=0.08726646 activation_time_constant=0.01 deactivation_time_constant=0.04
        FmaxTendonStrain=0.033 FmaxMuscleStrain=0.6 KshapeActive=0.5 KshapePassive=4 Af=0.3 Flen=1.8
      PathPoint P1: pelvis (-0.1195 0.0612 -0.07)
      PathPoint P2: pelvis (-0.1291 0.0012 -0.0886)
      PathPoint P3: femur_l (-0.0457 -0.0248 -0.0392)
      PathPoint P4: femur_l (-0.0277 -0.0566 -0.047)
    Thelen2003Muscle glut_max2_l: max_isometric_force=819 optimal_fiber_length=0.147 tendon_slack_length=0.127
        pennation_angle_at_optimal=0 activation_time_constant=0.01 deactivation_time_constant=0.04
        FmaxTendonStrain=0.033 FmaxMuscleStrain=0.6 KshapeActive=0.5 KshapePassive=4 Af=0.3 Flen=1.8
      PathPoint P1: pelvis (-0.1349 0.0176 -0.0563)
      PathPoint P2: pelvis (-0.1376 -0.052 -0.0914)
      PathPoint P3: femur_l (-0.0426 -0.053 -0.0293)
      PathPoint P4: femur_l (-0.0156 -0.1016 -0.0419)
    Thelen2003Muscle glut_max3_l: max_isometric_force=552 optimal_fiber_length=0.144 tendon_slack_length=0.145
        pennation_angle_at_optimal=0.08726646 activation_time_constant=0.01 deactivation_time_constant=0.04
        FmaxTendonStrain=0.033 FmaxMuscleStrain=0.6 KshapeActive=0.5 KshapePassive=4 Af=0.3 Flen=1.8
      PathPoint P1: pelvis (-0.1556 -0.0314 -0.0058)
      PathPoint P2: pelvis (-0.1529 -0.1052 -0.0403)
      PathPoint P3: femur_l (-0.0299 -0.1041 -0.0135)
      PathPoint P4: femur_l (-0.006 -0.1419 -0.0411)
    Thelen2003Muscle iliacus_l: max_isometric_force=1609.5 optimal_fiber_length=0.1 tendon_slack_length=0.1
        pennation_angle_at_optimal=0.1221731 activation_time_constant=0.01 deactivation_time_constant=0.04
        FmaxTendonStrain=0.033 FmaxMuscleStrain=0.6 KshapeActive=0.5 KshapePassive=4 Af=0.3 Flen=1.8
      PathPoint P1: pelvis (-0.0674 0.0365 -0.0854)
      PathPoint P2: pelvis (-0.0258 -0.055 -0.0811)
      ConditionalPathPoint P3: pelvis (-0.0288 -0.0805 -0.0816) range=(-1.5708 0.785398) coordinate=hip_flexion_l
      PathPoint P4: femur_l (0.0017 -0.0543 -0.0057)
      PathPoint P5: femur_l (-0.0193 -0.0621 -0.0129)
    Thelen2003Muscle quad_fem_l: max_isometric_force=381 optimal_fiber_length=0.054 tendon_slack_length=0.024
        pennation_angle_at_optimal=0 activation_time_constant=0.01 deactivation_time_constant=0.04
        FmaxTendonStrain=0.033 FmaxMuscleStrain=0.6 KshapeActive=0.5 KshapePassive=4 Af=0.3 Flen=1.8
      PathPoint P1: pelvis (-0.1143 -0.1151 -0.052)
      PathPoint P2: femur_l (-0.0381 -0.0359 -0.0366)
    Thelen2003Muscle gem_l: max_isometric_force=164 optimal_fiber_length=0.024 tendon_slack_length=0.039
        pennation_angle_at_optimal=0 activation_time_constant=0.01 deactivation_time_constant=0.04
        FmaxTendonStrain=0.033 FmaxMuscleStrain=0.6 KshapeActive=0.5 KshapePassive=4 Af=0.3 Flen=1.8
      PathPoint P1: pelvis (-0.1133 -0.082 -0.0714)
      PathPoint P2: femur_l (-0.0142 -0.0033 -0.0443)
    Thelen2003Muscle peri_l: max_isometric_force=444 optimal_fiber_length=0.026 tendon_slack_length=0.115
        pennation_angle_at_optimal=0.1745329 activation_time_constant=0.01 deactivation_time_constant=0.04
        FmaxTendonStrain=0.033 FmaxMuscleStrain=0.6 KshapeActive=0.5 KshapePassive=4 Af=0.3 Flen=1.8
      PathPoint P1: pelvis (-0.1396 0.0003 -0.0235)
      PathPoint P2: pelvis (-0.1193 -0.0276 -0.0657)
      PathPoint P3: femur_l (-0.0148 -0.0036 -0.0437)
    Thelen2003Muscle rect_fem_l: max_isometric_force=1169 optimal_fiber_length=0.114 tendon_slack_length=0.31
        pennation_angle_at_optimal=0.08726646 activation_time_constant=0.01 deactivation_time_constant=0.04
        FmaxTendonStrain=0.033 FmaxMuscleStrain=0.6 KshapeActive=0.5 KshapePassive=4 Af=0.3 Flen=1.8
      PathPoint P1: pelvis (-0.0295 -0.0311 -0.0968)
      ConditionalPathPoint P2: femur_l (0.0334 -0.403 -0.0019) range=(-2.61799 -1.45997) coordinate=knee_angle_l
      PathPoint P3: patella_l (0.01 0.049 -0.0007)
      PathPoint P4: patella_l (0.0121 0.0437 0.001)
    Thelen2003Muscle vas_med_l: max_isometric_force=1294 optimal_fiber_length=0.089 tendon_slack_length=0.126
        pennation_angle_at_optimal=0.08726646 activation_time_constant=0.01 deactivation_time_constant=0.04
        FmaxTendonStrain=0.033 FmaxMuscleStrain=0.6 KshapeActive=0.5 KshapePassive=4 Af=0.3 Flen=1.8
      PathPoint P1: femur_l (0.014 -0.2099 -0.0188)
      PathPoint P2: femur_l (0.0356 -0.2769 -0.0009)
      ConditionalPathPoint P3: femur_l (0.037 -0.4048 0.0125) range=(-2.61799 -1.21004) coordinate=knee_angle_l
      ConditionalPathPoint P4: femur_l (0.0274 -0.4255 0.0131) range=(-2.61799 -1.78006) coordinate=knee_angle_l
      MovingPathPoint P5: tibia_l (0.0559586 0.0217917 0.0146) x_coordinate=knee_angle_l y_coordinate=knee_angle_l
          z_coordinate=knee_angle_l
        x_location: SimmSpline: x=(-2.0944 -1.99997 -1.5708 -1.45752 -1.39626 -1.0472 -0.698132 -0.526391 -0.349066 -0.174533 0 0.00017453 0.00034907 0.0279253 0.0872665 0.174533 2.0944)
            y=(0.00981097 0.0122243 0.0217371 0.0238851 0.0249902 0.0307959 0.0364187 0.0392871 0.0425654 0.0475764 0.0559586 0.0559681 0.0559776 0.0575419 0.0613368 0.0679503 0.0629332)
        y_location: SimmSpline: x=(-2.0944 -1.99997 -1.5708 -1.45752 -1.39626 -1.0472 -0.698132 -0.526391 -0.349066 -0.174533 0 0.00017453 0.00034907 0.0279253 0.0872665 0.174533 2.0944)
            y=(0.0224154 0.0227651 0.0241265 0.0242933 0.0243287 0.0239462 0.0233593 0.0230677 0.0228342 0.0226362 0.0217917 0.0217903 0.0217889 0.0215365 0.0206842 0.0183269 -0.0656205)
        z_location: SimmSpline: x=(-2.0944 2.0944) y=(0.0146 0.0146)
    Thelen2003Muscle vas_int_l: max_isometric_force=1365 optimal_fiber_length=0.087 tendon_slack_length=0.136
        pennation_angle_at_optimal=0.05235988 activation_time_constant=0.01 deactivation_time_constant=0.04
        FmaxTendonStrain=0.033 FmaxMuscleStrain=0.6 KshapeActive=0.5 KshapePassive=4 Af=0.3 Flen=1.8
      PathPoint P1: femur_l (0.029 -0.1924 -0.031)
      PathPoint P2: femur_l (0.0335 -0.2084 -0.0285)
      ConditionalPathPoint P3: femur_l (0.0343 -0.403 -0.0055) range=(-2.61799 -1.42) coordinate=knee_angle_l
      MovingPathPoint P4: tibia_l (0.0617576 0.020984 -0.0014) x_coordinate=knee_angle_l y_coordinate=knee_angle_l
          z_coordinate=knee_angle_l
        x_location: SimmSpline: x=(-2.0944 -1.99997 -1.5708 -1.45752 -1.39626 -1.0472 -0.698132 -0.526391 -0.349066 -0.174533 0 0.00017453 0.00034907 0.0279253 0.0872665 0.174533 2.0944)
            y=(0.0155805 0.0179938 0.0275081 0.0296564 0.0307615 0.0365695 0.0422074 0.0450902 0.048391 0.0534299 0.0617576 0.0617669 0.0617762 0.0633083 0.066994 0.0733035 0.0573481)
        y_location: SimmSpline: x=(-2.0944 -1.99997 -1.5708 -1.45752 -1.39626 -1.0472 -0.698132 -0.526391 -0.349066 -0.174533 0 0.00017453 0.00034907 0.0279253 0.0872665 0.174533 2.0944)
            y=(0.0234116 0.0237613 0.0251141 0.0252795 0.0253146 0.0249184 0.0242373 0.0238447 0.0234197 0.0227644 0.020984 0.0209814 0.0209788 0.0205225 0.0191754 0.0159554 -0.0673774)
        z_location: SimmSpline: x=(-2.0944 0.1745) y=(-0.0014 -0.0014)
    Thelen2003Muscle vas_lat_l: max_isometric_force=1871 optimal_fiber_length=0.084 tendon_slack_length=0.157
        pennation_angle_at_optimal=0.08726646 activation_time_constant=0.01 deactivation_time_constant=0.04
        FmaxTendonStrain=0.033 FmaxMuscleStrain=0.6 KshapeActive=0.5 KshapePassive=4 Af=0.3 Flen=1.8
      PathPoint P1: femur_l (0.0048 -0.1854 -0.0349)
      PathPoint P2: femur_l (0.0269 -0.2591 -0.0409)
      ConditionalPathPoint P3: femur_l (0.0361 -0.403 -0.0205) range=(-2.61799 -1.21004) coordinate=knee_angle_l
      ConditionalPathPoint P4: femur_l (0.0253 -0.4243 -0.0184) range=(-2.61799 -1.92004) coordinate=knee_angle_l
      MovingPathPoint P5: tibia_l (0.0599557 0.0195864 -0.0165) x_coordinate=knee_angle_l y_coordinate=knee_angle_l
          z_coordinate=knee_angle_l
        x_location: SimmSpline: x=(-2.0944 -1.99997 -1.5708 -1.45752 -1.39626 -1.0472 -0.698132 -0.526391 -0.349066 -0.174533 0 0.00017453 0.00034907 0.0279253 0.0872665 0.174533 2.0944)
            y=(0.0142897 0.016703 0.0262145 0.0283623 0.0294674 0.0352709 0.0408785 0.0437291 0.0469704 0.0518742 0.0599557 0.0599647 0.0599738 0.0614577 0.0650351 0.0711867 0.0583766)
        y_location: SimmSpline: x=(-2.0944 -1.99997 -1.5708 -1.45752 -1.39626 -1.0472 -0.698132 -0.526391 -0.349066 -0.174533 0 0.00017453 0.00034907 0.0279253 0.0872665 0.174533 2.0944)
            y=(0.0215318 0.0218815 0.0232362 0.0234019 0.0234371 0.0230439 0.0223842 0.0220151 0.0216359 0.0210971 0.0195864 0.0195842 0.019582 0.01919 0.018008 0.0151073 -0.0653421)
        z_location: SimmSpline: x=(-2.0944 2.0944) y=(-0.0165 -0.0165)
    Thelen2003Muscle patlig_l: max_isometric_force=1 optimal_fiber_length=0.05 tendon_slack_length=0.005
        pennation_angle_at_optimal=0 activation_time_constant=0.01 deactivation_time_constant=0.04
        FmaxTendonStrain=0.033 FmaxMuscleStrain=0.6 KshapeActive=0.5 KshapePassive=4 Af=0.3 Flen=1.8
      PathPoint P1: tibia_l (0.0282 -0.0579 -0.0057)
      PathPoint P2: patella_l (0.0021 0.0015 -0.0001)
    Thelen2003Muscle med_gas_l: max_isometric_force=2337 optimal_fiber_length=0.06 tendon_slack_length=0.39
        pennation_angle_at_optimal=0.296706 activation_time_constant=0.01 deactivation_time_constant=0.04
        FmaxTendonStrain=0.033 FmaxMuscleStrain=0.6 KshapeActive=0.5 KshapePassive=4 Af=0.3 Flen=1.8
      PathPoint P1: femur_l (-0.019 -0.3929 0.0235)
      ConditionalPathPoint P2: femur_l (-0.03 -0.4022 0.0258) range=(-0.785398 0.174533) coordinate=knee_angle_l
      PathPoint P3: calcn_l (0 0.031 0.0053)
    Thelen2003Muscle lat_gas_l: max_isometric_force=1024.5 optimal_fiber_length=0.064 tendon_slack_length=0.38
        pennation_angle_at_optimal=0.1396263 activation_time_constant=0.01 deactivation_time_constant=0.04
        FmaxTendonStrain=0.033 FmaxMuscleStrain=0.6 KshapeActive=0.5 KshapePassive=4 Af=0.3 Flen=1.8
      PathPoint P1: femur_l (-0.022 -0.3946 -0.0272)
      ConditionalPathPoint P2: femur_l (-0.03 -0.4018 -0.0274) range=(-0.785398 0.174533) coordinate=knee_angle_l
      PathPoint P3: calcn_l (0 0.031 0.0053)
    Thelen2003Muscle soleus_l: max_isometric_force=5323.5 optimal_fiber_length=0.05 tendon_slack_length=0.25
        pennation_angle_at_optimal=0.4363323 activation_time_constant=0.01 deactivation_time_constant=0.04
        FmaxTendonStrain=0.033 FmaxMuscleStrain=0.6 KshapeActive=0.5 KshapePassive=4 Af=0.3 Flen=1.8
      PathPoint P1: tibia_l (-0.0024 -0.1533 -0.0071)
      PathPoint P2: calcn_l (0 0.031 0.0053)
    Thelen2003Muscle tib_post_l: max_isometric_force=2382 optimal_fiber_length=0.031 tendon_slack_length=0.31
        pennation_angle_at_optimal=0.2094395 activation_time_constant=0.01 deactivation_time_constant=0.04
        FmaxTendonStrain=0.033 FmaxMuscleStrain=0.6 KshapeActive=0.5 KshapePassive=4 Af=0.3 Flen=1.8
      PathPoint P1: tibia_l (-0.0094 -0.1348 -0.0019)
      PathPoint P2: tibia_l (-0.0144 -0.4051 0.0229)
      PathPoint P3: calcn_l (0.0417 0.0334 0.0286)
      PathPoint P4: calcn_l (0.0772 0.0159 0.0281)
    Thelen2003Muscle flex_dig_l: max_isometric_force=465 optimal_fiber_length=0.034 tendon_slack_length=0.4
        pennation_angle_at_optimal=0.1221731 activation_time_constant=0.01 deactivation_time_constant=0.04
        FmaxTendonStrain=0.033 FmaxMuscleStrain=0.6 KshapeActive=0.5 KshapePassive=4 Af=0.3 Flen=1.8
      PathPoint P1: tibia_l (-0.0083 -0.2046 0.0018)
      PathPoint P2: tibia_l (-0.0154 -0.4051 0.0196)
      PathPoint P3: calcn_l (0.0436 0.0315 0.028)
      PathPoint P4: calcn_l (0.0708 0.0176 0.0263)
      PathPoint P5: calcn_l (0.1658 -0.0081 -0.0116)
      PathPoint P6: toes_l (-0.0019 -0.0078 -0.0147)
      PathPoint P7: toes_l (0.0285 -0.0071 -0.0215)
      PathPoint P8: toes_l (0.0441 -0.006 -0.0242)
    Thelen2003Muscle flex_hal_l: max_isometric_force=483 optimal_fiber_length=0.043 tendon_slack_length=0.38
        pennation_angle_at_optimal=0.1745329 activation_time_constant=0.01 deactivation_time_constant=0.04
        FmaxTendonStrain=0.033 FmaxMuscleStrain=0.6 KshapeActive=0.5 KshapePassive=4 Af=0.3 Flen=1.8
      PathPoint P1: tibia_l (-0.0079 -0.2334 -0.0244)
      PathPoint P2: tibia_l (-0.0186 -0.4079 0.0174)
      PathPoint P3: calcn_l (0.0374 0.0276 0.0241)
      PathPoint P4: calcn_l (0.1038 0.0068 0.0256)
      PathPoint P5: calcn_l (0.1726 -0.0053 0.0269)
      PathPoint P6: toes_l (0.0155 -0.0064 0.0265)
      PathPoint P7: toes_l (0.0562 -0.0102 0.0181)
    Thelen2003Muscle tib_ant_l: max_isometric_force=905 optimal_fiber_length=0.098 tendon_slack_length=0.223
        pennation_angle_at_optimal=0.08726646 activation_time_constant=0.01 deactivation_time_constant=0.04
        FmaxTendonStrain=0.033 FmaxMuscleStrain=0.6 KshapeActive=0.5 KshapePassive=4 Af=0.3 Flen=1.8
      PathPoint P1: tibia_l (0.0179 -0.1624 -0.0115)
      PathPoint P2: tibia_l (0.0329 -0.3951 0.0177)
      PathPoint P3: calcn_l (0.1166 0.0178 0.0305)
    Thelen2003Muscle per_brev_l: max_isometric_force=435 optimal_fiber_length=0.05 tendon_slack_length=0.161
        pennation_angle_at_optimal=0.08726646 activation_time_constant=0.01 deactivation_time_constant=0.04
        FmaxTendonStrain=0.033 FmaxMuscleStrain=0.6 KshapeActive=0.5 KshapePassive=4 Af=0.3 Flen=1.8
      PathPoint P1: tibia_l (-0.007 -0.2646 -0.0325)
      PathPoint P2: tibia_l (-0.0198 -0.4184 -0.0283)
      PathPoint P3: tibia_l (-0.0144 -0.4295 -0.0289)
      PathPoint P4: calcn_l (0.0471 0.027 -0.0233)
      PathPoint P5: calcn_l (0.0677 0.0219 -0.0343)
    Thelen2003Muscle per_long_l: max_isometric_force=943 optimal_fiber_length=0.049 tendon_slack_length=0.345
        pennation_angle_at_optimal=0.1745329 activation_time_constant=0.01 deactivation_time_constant=0.04
        FmaxTendonStrain=0.033 FmaxMuscleStrain=0.6 KshapeActive=0.5 KshapePassive=4 Af=0.3 Flen=1.8
      PathPoint P1: tibia_l (0.0005 -0.1568 -0.0362)
      PathPoint P2: tibia_l (-0.0207 -0.4205 -0.0286)
      PathPoint P3: tibia_l (-0.0162 -0.4319 -0.0289)
      PathPoint P4: calcn_l (0.0438 0.023 -0.0221)
      PathPoint P5: calcn_l (0.0681 0.0106 -0.0284)
      PathPoint P6: calcn_l (0.0852 0.0069 -0.0118)
      PathPoint P7: calcn_l (0.1203 0.0085 0.0184)
    Thelen2003Muscle per_tert_l: max_isometric_force=180 optimal_fiber_length=0.079 tendon_slack_length=0.1
        pennation_angle_at_optimal=0.2268928 activation_time_constant=0.01 deactivation_time_constant=0.04
        FmaxTendonStrain=0.033 FmaxMuscleStrain=0.6 KshapeActive=0.5 KshapePassive=4 Af=0.3 Flen=1.8
      PathPoint P1: tibia_l (0.001 -0.2804 -0.0231)
      PathPoint P2: tibia_l (0.0229 -0.4069 -0.0159)
      PathPoint P3: calcn_l (0.0857 0.0228 -0.0299)
    Thelen2003Muscle ext_dig_l: max_isometric_force=512 optimal_fiber_length=0.102 tendon_slack_length=0.345
        pennation_angle_at_optimal=0.1396263 activation_time_constant=0.01 deactivation_time_constant=0.04
        FmaxTendonStrain=0.033 FmaxMuscleStrain=0.6 KshapeActive=0.5 KshapePassive=4 Af=0.3 Flen=1.8
      PathPoint P1: tibia_l (0.0032 -0.1381 -0.0276)
      PathPoint P2: tibia_l (0.0289 -0.4007 -0.0072)
      PathPoint P3: calcn_l (0.0922 0.0388 0.0001)
      PathPoint P4: calcn_l (0.1616 0.0055 -0.013)
      PathPoint P5: toes_l (0.0003 0.0047 -0.0153)
      PathPoint P6: toes_l (0.0443 -0.0004 -0.025)
    Thelen2003Muscle ext_hal_l: max_isometric_force=162 optimal_fiber_length=0.111 tendon_slack_length=0.305
        pennation_angle_at_optimal=0.1047198 activation_time_constant=0.01 deactivation_time_constant=0.04
        FmaxTendonStrain=0.033 FmaxMuscleStrain=0.6 KshapeActive=0.5 KshapePassive=4 Af=0.3 Flen=1.8
      PathPoint P1: tibia_l (0.0012 -0.1767 -0.0228)
      PathPoint P2: tibia_l (0.0326 -0.3985 0.0085)
      PathPoint P3: calcn_l (0.097 0.0389 0.0211)
      PathPoint P4: calcn_l (0.1293 0.0309 0.0257)
      PathPoint P5: calcn_l (0.1734 0.0139 0.028)
      PathPoint P6: toes_l (0.0298 0.0041 0.0245)
      PathPoint P7: toes_l (0.0563 0.0034 0.0186)
    Thelen2003Muscle rect_abd_r: max_isometric_force=163 optimal_fiber_length=0.2238 tendon_slack_length=0.017
        pennation_angle_at_optimal=0 activation_time_constant=0.01 deactivation_time_constant=0.04
        FmaxTendonStrain=0.033 FmaxMuscleStrain=0.6 KshapeActive=0.5 KshapePassive=4 Af=0.3 Flen=1.8
      PathPoint P1: pelvis (-0.026 -0.07 0.011)
      PathPoint P2: torso (0.092 0.221982 0.031)
    Thelen2003Muscle rect_abd_l: max_isometric_force=163 optimal_fiber_length=0.2238 tendon_slack_length=0.017
        pennation_angle_at_optimal=0 activation_time_constant=0.01 deactivation_time_constant=0.04
        FmaxTendonStrain=0.033 FmaxMuscleStrain=0.6 KshapeActive=0.5 KshapePassive=4 Af=0.3 Flen=1.8
      PathPoint P1: pelvis (-0.026 -0.07 -0.011)
      PathPoint P2: torso (0.092 0.221663 -0.031)
    Thelen2003Muscle Ps_L1_VB_r: max_isometric_force=160.4797 optimal_fiber_length=0.1841 tendon_slack_length=0.0647
        pennation_angle_at_optimal=0.18675
      PathPoint P1: lumbar1 (-0.0101595 0.02327 0.02)
      PathPoint P2: pelvis (-0.0238 -0.057 0.0759)
      ConditionalPathPoint P3: pelvis (-0.0288 -0.0805 0.0816) range=(-1.5708 0.785398) coordinate=hip_flexion_r
      PathPoint P4: femur_r (0.0016 -0.0507 0.0038)
      PathPoint P5: femur_r (-0.0188 -0.0597 0.0104)
    Thelen2003Muscle Ps_L1_TP_r: max_isometric_force=46.32404 optimal_fiber_length=0.1818 tendon_slack_length=0.0639
        pennation_angle_at_optimal=0.18675
      PathPoint P1: lumbar1 (-0.02325 0.0146584 0.0226252)
      PathPoint P2: pelvis (-0.0238 -0.057 0.0759)
      ConditionalPathPoint P3: pelvis (-0.0288 -0.0805 0.0816) range=(-1.5708 0.785398) coordinate=hip_flexion_r
      PathPoint P4: femur_r (0.0016 -0.0507 0.0038)
      PathPoint P5: femur_r (-0.0188 -0.0597 0.0104)
    Thelen2003Muscle Ps_L1_L2_IVD_r: max_isometric_force=91.32454 optimal_fiber_length=0.166 tendon_slack_length=0.0583
        pennation_angle_at_optimal=0.1867502
      PathPoint P1: lumbar1 (-0.00125362 0.00350798 0.0206834)
      PathPoint P2: pelvis (-0.0238 -0.057 0.0759)
      ConditionalPathPoint P3: pelvis (-0.0288 -0.0805 0.0816) range=(-1.5708 0.785398) coordinate=hip_flexion_r
      PathPoint P4: femur_r (0.0016 -0.0507 0.0038)
      PathPoint P5: femur_r (-0.0188 -0.0597 0.0104)
    Thelen2003Muscle Ps_L2_TP_r: max_isometric_force=160.4797 optimal_fiber_length=0.1597 tendon_slack_length=0.0561
        pennation_angle_at_optimal=0.1867502
      PathPoint P1: lumbar2 (-0.0216214 0.014587 0.022249)
      PathPoint P2: pelvis (-0.0238 -0.057 0.0759)
      ConditionalPathPoint P3: pelvis (-0.0288 -0.0805 0.0816) range=(-1.5708 0.785398) coordinate=hip_flexion_r
      PathPoint P4: femur_r (0.0016 -0.0507 0.0038)
      PathPoint P5: femur_r (-0.0188 -0.0597 0.0104)
    Thelen2003Muscle Ps_L2_L3_IVD_r: max_isometric_force=90.5635 optimal_fiber_length=0.144 tendon_slack_length=0.0506
        pennation_angle_at_optimal=0.1867502
      PathPoint P1: lumbar2 (0.00196252 0.00338519 0.0214479)
      PathPoint P2: pelvis (-0.0238 -0.057 0.0759)
      ConditionalPathPoint P3: pelvis (-0.0288 -0.0805 0.0816) range=(-1.5708 0.785398) coordinate=hip_flexion_r
      PathPoint P4: femur_r (0.0016 -0.0507 0.0038)
      PathPoint P5: femur_r (-0.0188 -0.0597 0.0104)
    Thelen2003Muscle Ps_L3_TP_r: max_isometric_force=76.86482 optimal_fiber_length=0.1394 tendon_slack_length=0.049
        pennation_angle_at_optimal=0.1867502
      PathPoint P1: lumbar3 (-0.0245065 0.0207283 0.0282599)
      PathPoint P2: pelvis (-0.0238 -0.057 0.0759)
      ConditionalPathPoint P3: pelvis (-0.0288 -0.0805 0.0816) range=(-1.5708 0.785398) coordinate=hip_flexion_r
      PathPoint P4: femur_r (0.0016 -0.0507 0.0038)
      PathPoint P5: femur_r (-0.0188 -0.0597 0.0104)
    Thelen2003Muscle Ps_L3_L4_IVD_r: max_isometric_force=27.39736 optimal_fiber_length=0.1235
        tendon_slack_length=0.0434 pennation_angle_at_optimal=0.1867502
      PathPoint P1: lumbar3 (0.00115193 0.00621063 0.0211533)
      PathPoint P2: pelvis (-0.0238 -0.057 0.0759)
      ConditionalPathPoint P3: pelvis (-0.0288 -0.0805 0.0816) range=(-1.5708 0.785398) coordinate=hip_flexion_r
      PathPoint P4: femur_r (0.0016 -0.0507 0.0038)
      PathPoint P5: femur_r (-0.0188 -0.0597 0.0104)
    Thelen2003Muscle Ps_L4_TP_r: max_isometric_force=122.4278 optimal_fiber_length=0.1195 tendon_slack_length=0.042
        pennation_angle_at_optimal=0.1867502
      PathPoint P1: lumbar4 (-0.015649 0.0249464 0.0258768)
      PathPoint P2: pelvis (-0.0238 -0.057 0.0759)
      ConditionalPathPoint P3: pelvis (-0.0288 -0.0805 0.0816) range=(-1.5708 0.785398) coordinate=hip_flexion_r
      PathPoint P4: femur_r (0.0016 -0.0507 0.0038)
      PathPoint P5: femur_r (-0.0188 -0.0597 0.0104)
    Thelen2003Muscle Ps_L4_L5_IVD_r: max_isometric_force=60.12199 optimal_fiber_length=0.0998
        tendon_slack_length=0.0351 pennation_angle_at_optimal=0.1867502
      PathPoint P1: lumbar4 (0.00541963 0.00394754 0.0205966)
      PathPoint P2: pelvis (-0.0238 -0.057 0.0759)
      ConditionalPathPoint P3: pelvis (-0.0288 -0.0805 0.0816) range=(-1.5708 0.785398) coordinate=hip_flexion_r
      PathPoint P4: femur_r (0.0016 -0.0507 0.0038)
      PathPoint P5: femur_r (-0.0188 -0.0597 0.0104)
    Thelen2003Muscle Ps_L5_TP_r: max_isometric_force=131.6595 optimal_fiber_length=0.1034 tendon_slack_length=0.0363
        pennation_angle_at_optimal=0.1867502
      PathPoint P1: lumbar5 (-0.00562001 0.0291398 0.0252881)
      PathPoint P2: pelvis (-0.0238 -0.057 0.0759)
      ConditionalPathPoint P3: pelvis (-0.0288 -0.0805 0.0816) range=(-1.5708 0.785398) coordinate=hip_flexion_r
      PathPoint P4: femur_r (0.0016 -0.0507 0.0038)
      PathPoint P5: femur_r (-0.0188 -0.0597 0.0104)
    Thelen2003Muscle Ps_L5_VB_r: max_isometric_force=145.3582 optimal_fiber_length=0.0903 tendon_slack_length=0.0317
        pennation_angle_at_optimal=0.1867502
      PathPoint P1: lumbar5 (0.01 0.01241 0.019)
      PathPoint P2: pelvis (-0.0238 -0.057 0.0759)
      ConditionalPathPoint P3: pelvis (-0.0288 -0.0805 0.0816) range=(-1.5708 0.785398) coordinate=hip_flexion_r
      PathPoint P4: femur_r (0.0016 -0.0507 0.0038)
      PathPoint P5: femur_r (-0.0188 -0.0597 0.0104)
    Thelen2003Muscle Ps_L1_VB_l: max_isometric_force=160.4797 optimal_fiber_length=0.1841 tendon_slack_length=0.0647
        pennation_angle_at_optimal=0.18675
      PathPoint P1: lumbar1 (-0.0101595 0.02327 -0.02)
      PathPoint P2: pelvis (-0.0238 -0.057 -0.0759)
      ConditionalPathPoint P3: pelvis (-0.0288 -0.0805 -0.0816) range=(-1.5708 0.785398) coordinate=hip_flexion_l
      PathPoint P4: femur_l (0.0016 -0.0507 -0.0038)
      PathPoint P5: femur_l (-0.0188 -0.0597 -0.0104)
    Thelen2003Muscle Ps_L1_TP_l: max_isometric_force=46.32404 optimal_fiber_length=0.1818 tendon_slack_length=0.0639
        pennation_angle_at_optimal=0.18675
      PathPoint P1: lumbar1 (-0.02325 0.0146584 -0.02263)
      PathPoint P2: pelvis (-0.0238 -0.057 -0.0759)
      ConditionalPathPoint P3: pelvis (-0.0288 -0.0805 -0.0816) range=(-1.5708 0.785398) coordinate=hip_flexion_l
      PathPoint P4: femur_l (0.0016 -0.0507 -0.0038)
      PathPoint P5: femur_l (-0.0188 -0.0597 -0.0104)
    Thelen2003Muscle Ps_L1_L2_IVD_l: max_isometric_force=91.32454 optimal_fiber_length=0.166 tendon_slack_length=0.0583
        pennation_angle_at_optimal=0.1867502
      PathPoint P1: lumbar1 (-0.00125362 0.00350798 -0.02068)
      PathPoint P2: pelvis (-0.0238 -0.057 -0.0759)
      ConditionalPathPoint P3: pelvis (-0.0288 -0.0805 -0.0816) range=(-1.5708 0.785398) coordinate=hip_flexion_l
      PathPoint P4: femur_l (0.0016 -0.0507 -0.0038)
      PathPoint P5: femur_l (-0.0188 -0.0597 -0.0104)
    Thelen2003Muscle Ps_L2_TP_l: max_isometric_force=160.4797 optimal_fiber_length=0.1597 tendon_slack_length=0.0561
        pennation_angle_at_optimal=0.1867502
      PathPoint P1: lumbar2 (-0.0216214 0.014587 -0.02225)
      PathPoint P2: pelvis (-0.0238 -0.057 -0.0759)
      ConditionalPathPoint P3: pelvis (-0.0288 -0.0805 -0.0816) range=(-1.5708 0.785398) coordinate=hip_flexion_l
      PathPoint P4: femur_l (0.0016 -0.0507 -0.0038)
      PathPoint P5: femur_l (-0.0188 -0.0597 -0.0104)
    Thelen2003Muscle Ps_L2_L3_IVD_l: max_isometric_force=90.5635 optimal_fiber_length=0.144 tendon_slack_length=0.0506
        pennation_angle_at_optimal=0.1867502
      PathPoint P1: lumbar2 (0.00196252 0.00338519 -0.02145)
      PathPoint P2: pelvis (-0.0238 -0.057 -0.0759)
      ConditionalPathPoint P3: pelvis (-0.0288 -0.0805 -0.0816) range=(-1.5708 0.785398) coordinate=hip_flexion_l
      PathPoint P4: femur_l (0.0016 -0.0507 -0.0038)
      PathPoint P5: femur_l (-0.0188 -0.0597 -0.0104)
    Thelen2003Muscle Ps_L3_TP_l: max_isometric_force=76.86482 optimal_fiber_length=0.1394 tendon_slack_length=0.049
        pennation_angle_at_optimal=0.1867502
      PathPoint P1: lumbar3 (-0.0245065 0.0207283 -0.02826)
      PathPoint P2: pelvis (-0.0238 -0.057 -0.0759)
      ConditionalPathPoint P3: pelvis (-0.0288 -0.0805 -0.0816) range=(-1.5708 0.785398) coordinate=hip_flexion_l
      PathPoint P4: femur_l (0.0016 -0.0507 -0.0038)
      PathPoint P5: femur_l (-0.0188 -0.0597 -0.0104)
    Thelen2003Muscle Ps_L3_L4_IVD_l: max_isometric_force=27.39736 optimal_fiber_length=0.1235
        tendon_slack_length=0.0434 pennation_angle_at_optimal=0.1867502
      PathPoint P1: lumbar3 (0.00115193 0.00621063 -0.02115)
      PathPoint P2: pelvis (-0.0238 -0.057 -0.0759)
      ConditionalPathPoint P3: pelvis (-0.0288 -0.0805 -0.0816) range=(-1.5708 0.785398) coordinate=hip_flexion_l
      PathPoint P4: femur_l (0.0016 -0.0507 -0.0038)
      PathPoint P5: femur_l (-0.0188 -0.0597 -0.0104)
    Thelen2003Muscle Ps_L4_TP_l: max_isometric_force=122.4278 optimal_fiber_length=0.1195 tendon_slack_length=0.042
        pennation_angle_at_optimal=0.1867502
      PathPoint P1: lumbar4 (-0.015649 0.0249464 -0.02588)
      PathPoint P2: pelvis (-0.0238 -0.057 -0.0759)
      ConditionalPathPoint P3: pelvis (-0.0288 -0.0805 -0.0816) range=(-1.5708 0.785398) coordinate=hip_flexion_l
      PathPoint P4: femur_l (0.0016 -0.0507 -0.0038)
      PathPoint P5: femur_l (-0.0188 -0.0597 -0.0104)
    Thelen2003Muscle Ps_L4_L5_IVD_l: max_isometric_force=60.12199 optimal_fiber_length=0.0998
        tendon_slack_length=0.0351 pennation_angle_at_optimal=0.1867502
      PathPoint P1: lumbar4 (0.00541963 0.00394754 -0.0206)
      PathPoint P2: pelvis (-0.0238 -0.057 -0.0759)
      ConditionalPathPoint P3: pelvis (-0.0288 -0.0805 -0.0816) range=(-1.5708 0.785398) coordinate=hip_flexion_l
      PathPoint P4: femur_l (0.0016 -0.0507 -0.0038)
      PathPoint P5: femur_l (-0.0188 -0.0597 -0.0104)
    Thelen2003Muscle Ps_L5_TP_l: max_isometric_force=131.6595 optimal_fiber_length=0.1034 tendon_slack_length=0.0363
        pennation_angle_at_optimal=0.1867502
      PathPoint P1: lumbar5 (-0.00562001 0.0291398 -0.02529)
      PathPoint P2: pelvis (-0.0238 -0.057 -0.0759)
      ConditionalPathPoint P3: pelvis (-0.0288 -0.0805 -0.0816) range=(-1.5708 0.785398) coordinate=hip_flexion_l
      PathPoint P4: femur_l (0.0016 -0.0507 -0.0038)
      PathPoint P5: femur_l (-0.0188 -0.0597 -0.0104)
    Thelen2003Muscle Ps_L5_VB_l: max_isometric_force=145.3582 optimal_fiber_length=0.0903 tendon_slack_length=0.0317
        pennation_angle_at_optimal=0.1867502
      PathPoint P1: lumbar5 (0.01 0.01241 -0.019)
      PathPoint P2: pelvis (-0.0238 -0.057 -0.0759)
      ConditionalPathPoint P3: pelvis (-0.0288 -0.0805 -0.0816) range=(-1.5708 0.785398) coordinate=hip_flexion_l
      PathPoint P4: femur_l (0.0016 -0.0507 -0.0038)
      PathPoint P5: femur_l (-0.0188 -0.0597 -0.0104)
    Thelen2003Muscle QL_post_I_1-L3_r: max_isometric_force=18.2 optimal_fiber_length=0.03836231
        tendon_slack_length=0.03218577 pennation_angle_at_optimal=0.1291544
      PathPoint I_1_r-P1: pelvis (-0.112 0.077 0.059)
      PathPoint L3_TP_r-P2: lumbar3 (-0.029 0.01963 0.0303)
    Thelen2003Muscle QL_post_I_2-L4_r: max_isometric_force=24.2 optimal_fiber_length=0.02219488
        tendon_slack_length=0.01862138 pennation_angle_at_optimal=0.1291544
      PathPoint I_2_r-P1: pelvis (-0.106 0.081 0.063)
      PathPoint L4_TP_r-P2: lumbar4 (-0.022 0.02605 0.0303)
    Thelen2003Muscle QL_post_I_2-L3_r: max_isometric_force=14.1 optimal_fiber_length=0.05023
        tendon_slack_length=0.04214269 pennation_angle_at_optimal=0.1291544
      PathPoint I_2_r-P1: pelvis (-0.106 0.081 0.063)
      PathPoint L3_TP_r-P2: lumbar3 (-0.029 0.01963 0.0303)
    Thelen2003Muscle QL_post_I_2-L2_r: max_isometric_force=8.8 optimal_fiber_length=0.03478374
        tendon_slack_length=0.0191 pennation_angle_at_optimal=0.1291544
      PathPoint I_2_r-P1: pelvis (-0.106 0.081 0.063)
      PathPoint L2_TP_r-P2: lumbar2 (-0.031 0.012 0.0303)
    Thelen2003Muscle QL_post_I_3-L1_r: max_isometric_force=12.92 optimal_fiber_length=0.08560792
        tendon_slack_length=0.04446546 pennation_angle_at_optimal=0.1291544
      PathPoint L1_TP-P1: lumbar1 (-0.032 0.014 0.032)
      PathPoint I_3_r-P1: pelvis (-0.098 0.089 0.066)
    Thelen2003Muscle QL_post_I_3-L2_r: max_isometric_force=13.6 optimal_fiber_length=0.05041593
        tendon_slack_length=0.04229869 pennation_angle_at_optimal=0.1291544
      PathPoint L2_TP_r-P2: lumbar2 (-0.031 0.012 0.0303)
      PathPoint I_3_r-P1: pelvis (-0.098 0.089 0.066)
    Thelen2003Muscle QL_post_I_3-L3_r: max_isometric_force=23.2 optimal_fiber_length=0.03605963
        tendon_slack_length=0.0302538 pennation_angle_at_optimal=0.1291544
      PathPoint L3_TP_r-P2: lumbar3 (-0.029 0.01963 0.0303)
      PathPoint I_3_r-P1: pelvis (-0.098 0.089 0.066)
    Thelen2003Muscle QL_post_I_1-L3_l: max_isometric_force=18.2 optimal_fiber_length=0.03836231
        tendon_slack_length=0.03218577 pennation_angle_at_optimal=0.1291544
      PathPoint I.1_l-P1: pelvis (-0.113577 0.0794995 -0.0581971)
      PathPoint L3_TP_l-P2: lumbar3 (-0.029 0.02 -0.0303)
    Thelen2003Muscle QL_post_I_2-L4_l: max_isometric_force=24.2 optimal_fiber_length=0.02219488
        tendon_slack_length=0.01862138 pennation_angle_at_optimal=0.1291544
      PathPoint I_2_l-P1: pelvis (-0.106 0.081 -0.063)
      PathPoint L4_TP_l-P2: lumbar4 (-0.022 0.02605 -0.03)
    Thelen2003Muscle QL_post_I_2-L3_l: max_isometric_force=14.1 optimal_fiber_length=0.05023
        tendon_slack_length=0.04214269 pennation_angle_at_optimal=0.1291544
      PathPoint I_2_l-P1: pelvis (-0.106 0.081 -0.063)
      PathPoint L3_TP_l-P2: lumbar3 (-0.029 0.01963 -0.0303)
    Thelen2003Muscle QL_post_I_2-L2_l: max_isometric_force=8.8 optimal_fiber_length=0.03478374
        tendon_slack_length=0.0191 pennation_angle_at_optimal=0.1291544
      PathPoint I_2_l-P1: pelvis (-0.106 0.081 -0.063)
      PathPoint L2_TP_l-P2: lumbar2 (-0.031 0.012 -0.0303)
    Thelen2003Muscle QL_post_I_3-L1_l: max_isometric_force=12.92 optimal_fiber_length=0.08560792
        tendon_slack_length=0.04446546 pennation_angle_at_optimal=0.1291544
      PathPoint L1_TP_l-P1: lumbar1 (-0.0318695 0.0143282 -0.032)
      PathPoint I_3_l-P1: pelvis (-0.098 0.089 -0.066)
    Thelen2003Muscle QL_post_I_3-L2_l: max_isometric_force=13.6 optimal_fiber_length=0.05041593
        tendon_slack_length=0.04229869 pennation_angle_at_optimal=0.1291544
      PathPoint L2_TP_l-P2: lumbar2 (-0.031 0.012 -0.0303)
      PathPoint I_3_l-P1: pelvis (-0.098 0.089 -0.066)
    Thelen2003Muscle QL_post_I_3-L3_l: max_isometric_force=23.2 optimal_fiber_length=0.03605963
        tendon_slack_length=0.0302538 pennation_angle_at_optimal=0.1291544
      PathPoint L3_TP_l-P2: lumbar3 (-0.029 0.01963 -0.0303)
      PathPoint I_3_l-P1: pelvis (-0.098 0.089 -0.066)
    Thelen2003Muscle QL_mid_L3-12_3_r: max_isometric_force=5.8 optimal_fiber_length=0.05463846
        tendon_slack_length=0.02837967 pennation_angle_at_optimal=0.1291544
      PathPoint quadratus_lumb_mid_L3_1_r-P1: torso (-0.0419115 0.11237 0.05166)
      PathPoint quadratus_lumb_mid_L3_1_r-P2: lumbar3 (-0.0293616 0.0217307 0.03038)
    Thelen2003Muscle QL_mid_L3-12_2_r: max_isometric_force=6.6 optimal_fiber_length=0.05793535
        tendon_slack_length=0.0300921 pennation_angle_at_optimal=0.1291544
      PathPoint quadratus_lumb_mid_L3_2_r-P2: torso (-0.0424782 0.119222 0.04319)
      PathPoint quadratus_lumb_mid_L3_2_r-P3: lumbar3 (-0.02936 0.02173 0.03038)
    Thelen2003Muscle QL_mid_L3-12_1_r: max_isometric_force=11 optimal_fiber_length=0.06305602
        tendon_slack_length=0.03275182 pennation_angle_at_optimal=0.1291544
      PathPoint quadratus_lumb_mid_L3_3_r-P2: torso (-0.0412845 0.1282 0.03119)
      PathPoint quadratus_lumb_mid_L3_3_r-P3: lumbar3 (-0.02936 0.02173 0.03038)
    Thelen2003Muscle QL_mid_L2-12_1_r: max_isometric_force=9.2 optimal_fiber_length=0.04077783
        tendon_slack_length=0.02118034 pennation_angle_at_optimal=0.1291544
      PathPoint QL_mid_L2-12_1_l-P1: torso (-0.04128 0.1282 0.03119)
      PathPoint QL_mid_L2-12_1_l-P1: lumbar2 (-0.0291214 0.0168959 0.02562)
    Thelen2003Muscle QL_mid_L4-12_3_r: max_isometric_force=5.4 optimal_fiber_length=0.07288648
        tendon_slack_length=0.03785784 pennation_angle_at_optimal=0.1291544
      PathPoint quadratus_lumb_mid_L4_1_r-P1: torso (-0.0417825 0.112316 0.05167)
      PathPoint quadratus_lumb_mid_L4_1_r-P2: lumbar4 (-0.0213825 0.0307 0.02806)
    Thelen2003Muscle QL_mid_L3-12_3_l: max_isometric_force=5.8 optimal_fiber_length=0.05463846
        tendon_slack_length=0.02837967 pennation_angle_at_optimal=0.1291544
      PathPoint quadratus_lumb_mid_L3_1_r-P1: torso (-0.0419115 0.11237 -0.05166)
      PathPoint quadratus_lumb_mid_L3_1_r-P2: lumbar3 (-0.0293616 0.0217307 -0.03038)
    Thelen2003Muscle QL_mid_L3-12_2_l: max_isometric_force=6.6 optimal_fiber_length=0.05793535
        tendon_slack_length=0.0300921 pennation_angle_at_optimal=0.1291544
      PathPoint quadratus_lumb_mid_L3_2_r-P2: torso (-0.0424782 0.119222 -0.04319)
      PathPoint quadratus_lumb_mid_L3_2_r-P3: lumbar3 (-0.02936 0.02173 -0.03038)
    Thelen2003Muscle QL_mid_L3-12_1_l: max_isometric_force=11 optimal_fiber_length=0.06305602
        tendon_slack_length=0.03275182 pennation_angle_at_optimal=0.1291544
      PathPoint quadratus_lumb_mid_L3_3_r-P2: torso (-0.0412845 0.1282 -0.03119)
      PathPoint quadratus_lumb_mid_L3_3_r-P3: lumbar3 (-0.02936 0.02173 -0.03038)
    Thelen2003Muscle QL_mid_L2-12_1_l: max_isometric_force=9.2 optimal_fiber_length=0.04077783
        tendon_slack_length=0.02118034 pennation_angle_at_optimal=0.1291544
      PathPoint P1: torso (-0.04128 0.1282 -0.03119)
      PathPoint P1: lumbar2 (-0.0291214 0.0168959 -0.02562)
    Thelen2003Muscle QL_mid_L4-12_3_l: max_isometric_force=5.4 optimal_fiber_length=0.07288648
        tendon_slack_length=0.03785784 pennation_angle_at_optimal=0.1291544
      PathPoint quadratus_lumb_mid_L4_1_r-P1: torso (-0.0417825 0.112316 -0.05167)
      PathPoint quadratus_lumb_mid_L4_1_r-P2: lumbar4 (-0.0213825 0.0307 -0.02806)
    Thelen2003Muscle QL_ant_I_2-T12_r: max_isometric_force=7.1 optimal_fiber_length=0.1045452
        tendon_slack_length=0.054301 pennation_angle_at_optimal=0.1291544
      PathPoint I_2_r-P1: pelvis (-0.106 0.081 0.063)
      PathPoint T12_r-P2: torso (-0.0142008 0.13 0.02)
    Thelen2003Muscle QL_ant_I_3-T12_r: max_isometric_force=13.34 optimal_fiber_length=0.1033426
        tendon_slack_length=0.05367702 pennation_angle_at_optimal=0.1291544
      PathPoint I_3_r-P1: pelvis (-0.098 0.089 0.066)
      PathPoint T12_r-P2: torso (-0.01 0.131 0.019)
    Thelen2003Muscle QL_ant_I_2-12_1_r: max_isometric_force=4.7 optimal_fiber_length=0.09988925
        tendon_slack_length=0.0518833 pennation_angle_at_optimal=0.1291544
      PathPoint I_2_r-P2: pelvis (-0.106 0.081 0.063)
      PathPoint 12.1_r-P3: torso (-0.041 0.118 0.043)
    Thelen2003Muscle QL_ant_I_3-12_1_r: max_isometric_force=8.9 optimal_fiber_length=0.0986533
        tendon_slack_length=0.05124134 pennation_angle_at_optimal=0.1291544
      PathPoint I_3_r-P1: pelvis (-0.098 0.089 0.066)
      PathPoint 12.1_r-P2: torso (-0.0402807 0.124401 0.03745)
    Thelen2003Muscle QL_ant_I_3-12_2_r: max_isometric_force=5.9 optimal_fiber_length=0.09285171
        tendon_slack_length=0.04822795 pennation_angle_at_optimal=0.1291544
      PathPoint I_3_r-P1: pelvis (-0.098 0.089 0.066)
      PathPoint 12.2_r-P2: torso (-0.04024 0.11786 0.04608)
    Thelen2003Muscle QL_ant_I_3-12_3_r: max_isometric_force=6.8 optimal_fiber_length=0.08691859
        tendon_slack_length=0.0451 pennation_angle_at_optimal=0.1291544
      PathPoint I_3_r-P2: pelvis (-0.098 0.089 0.066)
      PathPoint 12.3_r-P3: torso (-0.03801 0.111359 0.05452)
    Thelen2003Muscle QL_ant_I_2-T12_l: max_isometric_force=7.1 optimal_fiber_length=0.1045452
        tendon_slack_length=0.054301 pennation_angle_at_optimal=0.1291544
      PathPoint I_2_l-P1: pelvis (-0.106 0.081 -0.063)
      PathPoint T12_l-P2: torso (-0.01 0.131 -0.019)
    Thelen2003Muscle QL_ant_I_3-T12_l: max_isometric_force=13.34 optimal_fiber_length=0.1033426
        tendon_slack_length=0.05367702 pennation_angle_at_optimal=0.1291544
      PathPoint I_3_l-P1: pelvis (-0.098 0.089 -0.066)
      PathPoint T12_l-P2: torso (-0.01 0.131 -0.019)
    Thelen2003Muscle QL_ant_I_2-12_1_l: max_isometric_force=4.7 optimal_fiber_length=0.09988925
        tendon_slack_length=0.0518833 pennation_angle_at_optimal=0.1291544
      PathPoint I_2_l-P2: pelvis (-0.106 0.081 -0.063)
      PathPoint 12.1_l-P3: torso (-0.041 0.118 -0.043)
    Thelen2003Muscle QL_ant_I_3-12_1_l: max_isometric_force=8.9 optimal_fiber_length=0.0986533
        tendon_slack_length=0.05124134 pennation_angle_at_optimal=0.1291544
      PathPoint I_3_l-P1: pelvis (-0.098 0.089 -0.066)
      PathPoint 12.1_l-P2: torso (-0.04 0.124 -0.037)
    Thelen2003Muscle QL_ant_I_3-12_2_l: max_isometric_force=5.9 optimal_fiber_length=0.09285171
        tendon_slack_length=0.04822795 pennation_angle_at_optimal=0.1291544
      PathPoint I_3_l-P1: pelvis (-0.098 0.089 -0.066)
      PathPoint 12.2_l-P2: torso (-0.04024 0.11786 -0.04608)
    Thelen2003Muscle QL_ant_I_3-12_3_l: max_isometric_force=6.8 optimal_fiber_length=0.08691859
        tendon_slack_length=0.0451 pennation_angle_at_optimal=0.1291544
      PathPoint I_3_l-P2: pelvis (-0.098 0.089 -0.066)
      PathPoint 12.3_l-P3: torso (-0.038 0.111 -0.055)
    Thelen2003Muscle MF_m1s_r: max_isometric_force=18.4 optimal_fiber_length=0.04684634 tendon_slack_length=0.01947641
        pennation_angle_at_optimal=0
      PathPoint P1: lumbar4 (-0.033 0.0323951 0.0174744)
      PathPoint P2: lumbar1 (-0.037 -0.013 0.003)
    Thelen2003Muscle MF_m1t_1_r: max_isometric_force=19.32 optimal_fiber_length=0.0751687 tendon_slack_length=0.0225396
        pennation_angle_at_optimal=0
      PathPoint P1: lumbar5 (-0.02 0.039 0.0175946)
      PathPoint P2: lumbar1 (-0.044 -0.0160046 0.00309636)
    Thelen2003Muscle MF_m1t_2_r: max_isometric_force=16.56 optimal_fiber_length=0.09431214
        tendon_slack_length=0.0282798 pennation_angle_at_optimal=0
      PathPoint P1: sacrum (-0.121424 0.0839766 0.021)
      PathPoint P2: lumbar1 (-0.044 -0.016 0.0031)
    Thelen2003Muscle MF_m1t_3_r: max_isometric_force=27.66 optimal_fiber_length=0.103 tendon_slack_length=0.03088368
        pennation_angle_at_optimal=0
      PathPoint P1: pelvis (-0.132132 0.0543197 0.0480001)
      PathPoint P2: lumbar1 (-0.044 -0.016 0.0031)
    Thelen2003Muscle MF_m2s_r: max_isometric_force=17.94 optimal_fiber_length=0.0453974 tendon_slack_length=0.01756569
        pennation_angle_at_optimal=0
      PathPoint P1: lumbar5 (-0.02 0.04 0.0158123)
      PathPoint P2: lumbar2 (-0.041 -0.0117591 0.004)
    Thelen2003Muscle MF_m2t_1_r: max_isometric_force=17.94 optimal_fiber_length=0.0638826
        tendon_slack_length=0.01942145 pennation_angle_at_optimal=0
      PathPoint P1: sacrum (-0.120758 0.0852181 0.0204354)
      PathPoint P2: lumbar2 (-0.045 -0.01839 0.004)
    Thelen2003Muscle MF_m2t_2_r: max_isometric_force=45.54 optimal_fiber_length=0.080875 tendon_slack_length=0.0245875
        pennation_angle_at_optimal=0
      PathPoint P1: pelvis (-0.134 0.049 0.047)
      PathPoint P2: lumbar2 (-0.045 -0.01839 0.00364)
    Thelen2003Muscle MF_m2t_3_r: max_isometric_force=45.54 optimal_fiber_length=0.091657 tendon_slack_length=0.0278654
        pennation_angle_at_optimal=0
      PathPoint P1: pelvis (-0.137 0.036 0.045)
      PathPoint P2: lumbar2 (-0.044 -0.0187383 0.00236534)
    Thelen2003Muscle MF_m3s_r: max_isometric_force=24.84 optimal_fiber_length=0.039717 tendon_slack_length=0.01651236
        pennation_angle_at_optimal=0
      PathPoint P1: sacrum (-0.122 0.084 0.019)
      PathPoint P2: lumbar3 (-0.042 -0.00645328 0.00290733)
    Thelen2003Muscle MF_m3t_1_r: max_isometric_force=24 optimal_fiber_length=0.102818 tendon_slack_length=0.03423556
        pennation_angle_at_optimal=0
      PathPoint P1: pelvis (-0.153895 0.0020886 0.0163612)
      PathPoint P2: lumbar3 (-0.048 -0.0102252 0.00166214)
    Thelen2003Muscle MF_m3t_2_r: max_isometric_force=24 optimal_fiber_length=0.08536116 tendon_slack_length=0.0284229
        pennation_angle_at_optimal=0
      PathPoint P1: pelvis (-0.147053 0.0213268 0.0221121)
      PathPoint P2: lumbar3 (-0.048 -0.01023 0.00266)
    Thelen2003Muscle MF_m3t_3_r: max_isometric_force=24 optimal_fiber_length=0.08536116 tendon_slack_length=0.0284229
        pennation_angle_at_optimal=0
      PathPoint P1: pelvis (-0.147 0.021 0.022)
      PathPoint P2: lumbar3 (-0.048 -0.01023 0.00266)
    Thelen2003Muscle MF_m4s_r: max_isometric_force=24 optimal_fiber_length=0.037155 tendon_slack_length=0.02351
        pennation_angle_at_optimal=0
      PathPoint P1: sacrum (-0.143689 0.0547099 0.018)
      PathPoint P2: lumbar4 (-0.036 -0.00021522 0.00224284)
    Thelen2003Muscle MF_m4t_1_r: max_isometric_force=21.4 optimal_fiber_length=0.054815 tendon_slack_length=0.02221967
        pennation_angle_at_optimal=0
      PathPoint P1: sacrum (-0.152233 0.0415265 0.0153587)
      PathPoint P2: lumbar4 (-0.043 0.00016821 0.00288018)
    Thelen2003Muscle MF_m4t_2_r: max_isometric_force=21.4 optimal_fiber_length=0.07336 tendon_slack_length=0.0297369
        pennation_angle_at_optimal=0
      PathPoint P1: pelvis (-0.151 0.008 0.016)
      PathPoint P2: lumbar4 (-0.044 0.00017 0.00288)
    Thelen2003Muscle MF_m4t_3_r: max_isometric_force=21.4 optimal_fiber_length=0.084787 tendon_slack_length=0.034369
        pennation_angle_at_optimal=0
      PathPoint P1: pelvis (-0.16 -0.004 0.014)
      PathPoint P2: lumbar4 (-0.045 0.00017 0.00288)
    Thelen2003Muscle MF_m5s_r: max_isometric_force=10.35 optimal_fiber_length=0.0145575 tendon_slack_length=0.00644247
        pennation_angle_at_optimal=0
      PathPoint P1: sacrum (-0.130455 0.0662703 0.012)
      PathPoint P2: lumbar5 (-0.031 0.017 0.00392934)
    Thelen2003Muscle MF_m5t_1_r: max_isometric_force=10.35 optimal_fiber_length=0.0759196 tendon_slack_length=0.0307746
        pennation_angle_at_optimal=0
      PathPoint P1: sacrum (-0.174067 0.00522922 0.0100331)
      PathPoint P2: lumbar5 (-0.03551 0.016863 0.00292592)
    Thelen2003Muscle MF_m5t_2_r: max_isometric_force=10.35 optimal_fiber_length=0.056763 tendon_slack_length=0.02301
        pennation_angle_at_optimal=0
      PathPoint P1: sacrum (-0.163116 0.0256618 0.011708)
      PathPoint P2: lumbar5 (-0.0345516 0.0159287 0.00277147)
    Thelen2003Muscle MF_m5t_3_r: max_isometric_force=10.35 optimal_fiber_length=0.0403 tendon_slack_length=0.0070892
        pennation_angle_at_optimal=0
      PathPoint P1: sacrum (-0.152276 0.0425844 0.0115967)
      PathPoint P2: lumbar5 (-0.0328228 0.015247 0.00232083)
    Thelen2003Muscle MF_m1_laminar_r: max_isometric_force=8.85 optimal_fiber_length=0.03129
        tendon_slack_length=0.0118819 pennation_angle_at_optimal=0
      PathPoint P1: lumbar3 (-0.04 0.025 0.018)
      PathPoint P2: lumbar1 (-0.035 -0.00560525 0.008)
    Thelen2003Muscle MF_m2_laminar_r: max_isometric_force=10.2 optimal_fiber_length=0.02692174
        tendon_slack_length=0.01022244 pennation_angle_at_optimal=0
      PathPoint P1: lumbar4 (-0.033 0.034 0.01694)
      PathPoint P2: lumbar2 (-0.036 -0.006 0.007)
    Thelen2003Muscle MF_m3_laminar_r: max_isometric_force=10.615 optimal_fiber_length=0.02616
        tendon_slack_length=0.009933 pennation_angle_at_optimal=0
      PathPoint P1: lumbar5 (-0.022 0.039 0.016)
      PathPoint P2: lumbar3 (-0.038 0.00069045 0.00635)
    Thelen2003Muscle MF_m4_laminar_r: max_isometric_force=7.7 optimal_fiber_length=0.028602 tendon_slack_length=0.01086
        pennation_angle_at_optimal=0
      PathPoint P1: sacrum (-0.128 0.0774879 0.018)
      PathPoint P2: lumbar4 (-0.034 0.00581344 0.00694)
    Thelen2003Muscle MF_m5_laminar_r: max_isometric_force=16.6 optimal_fiber_length=0.02565
        tendon_slack_length=0.009739 pennation_angle_at_optimal=0
      PathPoint P1: pelvis (-0.138 0.045 0.012)
      PathPoint MF_m5_laminar_-P2: lumbar5 (-0.029 0.018 0.00564)
    Thelen2003Muscle MF_m1s_l: max_isometric_force=18.4 optimal_fiber_length=0.04684634 tendon_slack_length=0.01947641
        pennation_angle_at_optimal=0
      PathPoint P1: lumbar4 (-0.033 0.032 -0.017)
      PathPoint P2: lumbar1 (-0.037 -0.013 -0.003)
    Thelen2003Muscle MF_m1t_1_l: max_isometric_force=19.32 optimal_fiber_length=0.0751687 tendon_slack_length=0.0225396
        pennation_angle_at_optimal=0
      PathPoint P1: lumbar5 (-0.0186347 0.0369697 -0.01759)
      PathPoint P2: lumbar1 (-0.044 -0.0160046 -0.0031)
    Thelen2003Muscle MF_m1t_2_l: max_isometric_force=16.56 optimal_fiber_length=0.09431214
        tendon_slack_length=0.0282798 pennation_angle_at_optimal=0
      PathPoint P1: sacrum (-0.121424 0.0839766 -0.021)
      PathPoint P2: lumbar1 (-0.044 -0.016 -0.0031)
    Thelen2003Muscle MF_m1t_3_l: max_isometric_force=27.66 optimal_fiber_length=0.103 tendon_slack_length=0.03088368
        pennation_angle_at_optimal=0
      PathPoint P1: pelvis (-0.132 0.054 -0.048)
      PathPoint P2: lumbar1 (-0.044 -0.016 -0.0031)
    Thelen2003Muscle MF_m2s_l: max_isometric_force=17.94 optimal_fiber_length=0.0453974 tendon_slack_length=0.01756569
        pennation_angle_at_optimal=0
      PathPoint P1: lumbar5 (-0.02 0.04 -0.01581)
      PathPoint P2: lumbar2 (-0.041 -0.012 -0.004)
    Thelen2003Muscle MF_m2t_1_l: max_isometric_force=17.94 optimal_fiber_length=0.0638826
        tendon_slack_length=0.01942145 pennation_angle_at_optimal=0
      PathPoint P1: sacrum (-0.120758 0.0852181 -0.022)
      PathPoint P2: lumbar2 (-0.045 -0.01839 -0.00364)
    Thelen2003Muscle MF_m2t_2_l: max_isometric_force=45.54 optimal_fiber_length=0.080875 tendon_slack_length=0.0245875
        pennation_angle_at_optimal=0
      PathPoint P1: pelvis (-0.134 0.049 -0.047)
      PathPoint P2: lumbar2 (-0.045 -0.01839 -0.00364)
    Thelen2003Muscle MF_m2t_3_l: max_isometric_force=45.54 optimal_fiber_length=0.091657 tendon_slack_length=0.0278654
        pennation_angle_at_optimal=0
      PathPoint P1: pelvis (-0.137 0.036 -0.045)
      PathPoint P2: lumbar2 (-0.044 -0.0187383 -0.00364)
    Thelen2003Muscle MF_m3s_l: max_isometric_force=24.84 optimal_fiber_length=0.039717 tendon_slack_length=0.01651236
        pennation_angle_at_optimal=0
      PathPoint P1: sacrum (-0.121511 0.0836358 -0.019)
      PathPoint P2: lumbar3 (-0.036 -0.006 -0.003)
    Thelen2003Muscle MF_m3t_1_l: max_isometric_force=24 optimal_fiber_length=0.102818 tendon_slack_length=0.03423556
        pennation_angle_at_optimal=0
      PathPoint P1: pelvis (-0.154 0.002 -0.016)
      PathPoint P2: lumbar3 (-0.048 -0.0102252 -0.00291)
    Thelen2003Muscle MF_m3t_2_l: max_isometric_force=24 optimal_fiber_length=0.08536116 tendon_slack_length=0.0284229
        pennation_angle_at_optimal=0
      PathPoint P1: pelvis (-0.147 0.021 -0.02185)
      PathPoint P2: lumbar3 (-0.048 -0.01023 -0.00266)
    Thelen2003Muscle MF_m3t_3_l: max_isometric_force=24 optimal_fiber_length=0.08536116 tendon_slack_length=0.0284229
        pennation_angle_at_optimal=0
      PathPoint P1: pelvis (-0.147 0.021 -0.02185)
      PathPoint P2: lumbar3 (-0.048 -0.01023 -0.00266)
    Thelen2003Muscle MF_m4s_l: max_isometric_force=24 optimal_fiber_length=0.037155 tendon_slack_length=0.02351
        pennation_angle_at_optimal=0
      PathPoint P1: sacrum (-0.143689 0.0547099 -0.018)
      PathPoint P2: lumbar4 (-0.036 -0.00021522 -0.002)
    Thelen2003Muscle MF_m4t_1_l: max_isometric_force=21.4 optimal_fiber_length=0.054815 tendon_slack_length=0.02221967
        pennation_angle_at_optimal=0
      PathPoint P1: sacrum (-0.152 0.042 -0.015)
      PathPoint P2: lumbar4 (-0.043 0 -0.003)
    Thelen2003Muscle MF_m4t_2_l: max_isometric_force=21.4 optimal_fiber_length=0.07336 tendon_slack_length=0.0297369
        pennation_angle_at_optimal=0
      PathPoint P1: pelvis (-0.151 0.008 -0.016)
      PathPoint P2: lumbar4 (-0.044 0.00017 -0.00288)
    Thelen2003Muscle MF_m4t_3_l: max_isometric_force=21.4 optimal_fiber_length=0.084787 tendon_slack_length=0.034369
        pennation_angle_at_optimal=0
      PathPoint P1: pelvis (-0.16 -0.004 -0.014)
      PathPoint P2: lumbar4 (-0.0441 0.00017 -0.003)
    Thelen2003Muscle MF_m5s_l: max_isometric_force=10.35 optimal_fiber_length=0.0145575 tendon_slack_length=0.00644247
        pennation_angle_at_optimal=0
      PathPoint P1: sacrum (-0.130455 0.0662703 -0.012)
      PathPoint P2: lumbar5 (-0.031 0.017 -0.004)
    Thelen2003Muscle MF_m5t_1_l: max_isometric_force=10.35 optimal_fiber_length=0.0759196 tendon_slack_length=0.0307746
        pennation_angle_at_optimal=0
      PathPoint P1: sacrum (-0.174067 0.00522922 -0.01003)
      PathPoint P2: lumbar5 (-0.03551 0.016863 -0.00293)
    Thelen2003Muscle MF_m5t_2_l: max_isometric_force=10.35 optimal_fiber_length=0.056763 tendon_slack_length=0.02301
        pennation_angle_at_optimal=0
      PathPoint P1: sacrum (-0.163116 0.0256618 -0.01171)
      PathPoint P2: lumbar5 (-0.0345516 0.0159287 -0.00293)
    Thelen2003Muscle MF_m5t_3_l: max_isometric_force=10.35 optimal_fiber_length=0.0403 tendon_slack_length=0.0070892
        pennation_angle_at_optimal=0
      PathPoint P1: sacrum (-0.152276 0.0425844 -0.0116)
      PathPoint P2: lumbar5 (-0.0328228 0.015247 -0.00277)
    Thelen2003Muscle MF_m1_laminar_l: max_isometric_force=8.85 optimal_fiber_length=0.03129
        tendon_slack_length=0.0118819 pennation_angle_at_optimal=0
      PathPoint P1: lumbar3 (-0.04 0.02527 -0.018)
      PathPoint P2: lumbar1 (-0.035 -0.00560525 -0.008)
    Thelen2003Muscle MF_m2_laminar_l: max_isometric_force=10.2 optimal_fiber_length=0.02692174
        tendon_slack_length=0.01022244 pennation_angle_at_optimal=0
      PathPoint P1: lumbar4 (-0.033 0.0335037 -0.01694)
      PathPoint P2: lumbar2 (-0.036 -0.006 -0.007)
    Thelen2003Muscle MF_m3_laminar_l: max_isometric_force=10.615 optimal_fiber_length=0.02616
        tendon_slack_length=0.009933 pennation_angle_at_optimal=0
      PathPoint P1: lumbar5 (-0.022 0.039 -0.01617)
      PathPoint P2: lumbar3 (-0.038 0.001 -0.006)
    Thelen2003Muscle MF_m4_laminar_l: max_isometric_force=7.7 optimal_fiber_length=0.028602 tendon_slack_length=0.01086
        pennation_angle_at_optimal=0
      PathPoint P1: sacrum (-0.128 0.0774879 -0.018)
      PathPoint P2: lumbar4 (-0.034 0.00581344 -0.00694)
    Thelen2003Muscle MF_m5_laminar_l: max_isometric_force=16.6 optimal_fiber_length=0.02565
        tendon_slack_length=0.009739 pennation_angle_at_optimal=0
      PathPoint P1: pelvis (-0.138 0.045 -0.01238)
      PathPoint P2: lumbar5 (-0.029 0.018 -0.00564)
    Thelen2003Muscle IL_L1_r: max_isometric_force=97.275 optimal_fiber_length=0.05149358 tendon_slack_length=0.1089064
        pennation_angle_at_optimal=0.2408554
      PathPoint P1: pelvis (-0.143993 0.0390001 0.0503121)
      PathPoint P2: lumbar1 (-0.031 0.017 0.029)
      PathWrap: wrap_object=Cylinder2 method=hybrid
    Thelen2003Muscle IL_L2_r: max_isometric_force=138.1305 optimal_fiber_length=0.03726 tendon_slack_length=0.078918
        pennation_angle_at_optimal=0.2408554
      PathPoint P1: pelvis (-0.136 0.056 0.055)
      PathPoint P2: lumbar2 (-0.03245 0.012913 0.031)
      PathWrap: wrap_object=Cylinder method=hybrid
    Thelen2003Muscle IL_L3_r: max_isometric_force=163.422 optimal_fiber_length=0.025162 tendon_slack_length=0.053294
        pennation_angle_at_optimal=0.2408554
      PathPoint P1: pelvis (-0.122 0.068 0.06)
      PathPoint P2: lumbar3 (-0.0316877 0.0219341 0.0311389)
      PathWrap: wrap_object=Cylinder method=hybrid
    Thelen2003Muscle IL_L4_r: max_isometric_force=169.2585 optimal_fiber_length=0.01671 tendon_slack_length=0.035393
        pennation_angle_at_optimal=0.2408554
      PathPoint P1: pelvis (-0.117 0.065 0.056)
      PathPoint P2: lumbar4 (-0.0237666 0.0275638 0.031)
      PathWrap: wrap_object=Cylinder method=hybrid
    Thelen2003Muscle IL_L1_l: max_isometric_force=97.275 optimal_fiber_length=0.05149358 tendon_slack_length=0.1089064
        pennation_angle_at_optimal=0.2408554
      PathPoint P1: pelvis (-0.144 0.039 -0.05)
      PathPoint P2: lumbar1 (-0.031 0.017 -0.029)
      PathWrap: wrap_object=Cylinder2 method=hybrid
    Thelen2003Muscle IL_L2_l: max_isometric_force=138.1305 optimal_fiber_length=0.03726 tendon_slack_length=0.078918
        pennation_angle_at_optimal=0.2408554
      PathPoint P1: pelvis (-0.136 0.056 -0.055)
      PathPoint P2: lumbar2 (-0.032 0.013 -0.031)
      PathWrap: wrap_object=Cylinder method=hybrid
    Thelen2003Muscle IL_L3_l: max_isometric_force=163.422 optimal_fiber_length=0.025162 tendon_slack_length=0.053294
        pennation_angle_at_optimal=0.2408554
      PathPoint P1: pelvis (-0.122 0.068 -0.06)
      PathPoint P2: lumbar3 (-0.032 0.022 -0.0305391)
      PathWrap: wrap_object=Cylinder method=hybrid
    Thelen2003Muscle IL_L4_l: max_isometric_force=169.2585 optimal_fiber_length=0.01671 tendon_slack_length=0.035393
        pennation_angle_at_optimal=0.2408554
      PathPoint P1: pelvis (-0.117 0.065 -0.056)
      PathPoint P2: lumbar4 (-0.024 0.028 -0.031)
      PathWrap: wrap_object=Cylinder method=hybrid
    Thelen2003Muscle IL_R5_r: max_isometric_force=21.4005 optimal_fiber_length=0.15464 tendon_slack_length=0.216471
        pennation_angle_at_optimal=0.2408554
      PathPoint IL_r5_R-P1: pelvis (-0.136 0.044 0.049)
      PathPoint IL_r5_R-P2: lumbar2 (-0.0496298 0.002 0.056)
      PathPoint IL_r5_R-P2: torso (-0.079 0.172 0.057)
      PathPoint IL_r5_R-P3: torso (-0.08 0.2 0.057)
      PathPoint IL_r5_R-P4: torso (-0.081 0.237 0.058)
      PathPoint IL_r5_R-P5: torso (-0.079 0.265 0.059)
      PathPoint IL_r5_R-P6: torso (-0.076 0.287 0.059)
      PathPoint IL_r5_R-P7: torso (-0.07 0.308 0.06)
      PathWrap: wrap_object=Cylinder2 method=hybrid
    Thelen2003Muscle IL_R6_r: max_isometric_force=27.237 optimal_fiber_length=0.14826 tendon_slack_length=0.17931
        pennation_angle_at_optimal=0.2408554
      PathPoint IL_r6_R-P1: pelvis (-0.129 0.059 0.053)
      PathPoint IL_r6_R-P2: lumbar2 (-0.0492143 0.00236612 0.058)
      PathPoint IL_r6_R-P2: torso (-0.079 0.171 0.06)
      PathPoint IL_r6_R-P3: torso (-0.08 0.202 0.06)
      PathPoint IL_r6_R-P4: torso (-0.081 0.24 0.061)
      PathPoint IL_r6_R-P5: torso (-0.077 0.268 0.062)
      PathPoint IL_r6_R-P6: torso (-0.071 0.282 0.063)
      PathWrap: wrap_object=Cylinder2 method=hybrid
    Thelen2003Muscle IL_R7_r: max_isometric_force=35.019 optimal_fiber_length=0.155 tendon_slack_length=0.15356
        pennation_angle_at_optimal=0.2408554
      PathPoint IL_r7_R-P1: pelvis (-0.119 0.069 0.058)
      PathPoint IL_r7_R-P2: lumbar2 (-0.0486649 0.00237387 0.061)
      PathPoint IL_r7_R-P2: torso (-0.08 0.172 0.063)
      PathPoint IL_r7_R-P3: torso (-0.08 0.201 0.063)
      PathPoint IL_r7_R-P4: torso (-0.081 0.239 0.064)
      PathPoint IL_r7_R-P5: torso (-0.075 0.261 0.065)
    Thelen2003Muscle IL_R8_r: max_isometric_force=31.128 optimal_fiber_length=0.1391 tendon_slack_length=0.13081
        pennation_angle_at_optimal=0.2408554
      PathPoint IL_r8_R-P1: pelvis (-0.121 0.071 0.06)
      PathPoint IL_r8_R-P2: lumbar2 (-0.048 0.003 0.064)
      PathPoint IL_r8_R-P2: torso (-0.079 0.167 0.065)
      PathPoint IL_r8_R-P3: torso (-0.0811061 0.201 0.065)
      PathPoint IL_r8_R-P4: torso (-0.079 0.229 0.066)
    Thelen2003Muscle IL_R9_r: max_isometric_force=44.7465 optimal_fiber_length=0.1554 tendon_slack_length=0.08383
        pennation_angle_at_optimal=0.2408554
      PathPoint IL_r9_R-P1: pelvis (-0.119 0.075 0.06)
      PathPoint IL_r9_R-P2: lumbar2 (-0.048 0.003 0.066)
      PathPoint IL_r9_R-P2: torso (-0.08 0.169 0.068)
      PathPoint IL_r9_R-P3: torso (-0.076 0.193 0.068)
    Thelen2003Muscle IL_R10_r: max_isometric_force=89.493 optimal_fiber_length=0.1309 tendon_slack_length=0.06917
        pennation_angle_at_optimal=0.2408554
      PathPoint IL_r10_R-P1: pelvis (-0.117 0.072 0.062)
      PathPoint IL_r10_R-P2: lumbar2 (-0.0480883 0.00262684 0.069)
      PathPoint IL_r10_R-P2: torso (-0.075 0.155 0.07)
    Thelen2003Muscle IL_R11_r: max_isometric_force=110.8935 optimal_fiber_length=0.1161 tendon_slack_length=0.05062
        pennation_angle_at_optimal=0.2408554
      PathPoint IL_r11_R-P1: pelvis (-0.113 0.079 0.064)
      PathPoint IL_r11_R-P2: lumbar2 (-0.0479471 0.00270337 0.072)
      PathPoint IL_r11_R-P2: torso (-0.062 0.125 0.074)
    Thelen2003Muscle IL_R12_r: max_isometric_force=132.294 optimal_fiber_length=0.089 tendon_slack_length=0.03657
        pennation_angle_at_optimal=0.2408554
      PathPoint IL_r12_R-P1: pelvis (-0.111 0.082 0.067)
      PathPoint IL_r12_R-P2: torso (-0.032 0.095 0.067)
    Thelen2003Muscle IL_R5_l: max_isometric_force=21.4005 optimal_fiber_length=0.15464 tendon_slack_length=0.216471
        pennation_angle_at_optimal=0.2408554
      PathPoint IL_r5_R-P1: pelvis (-0.135908 0.0438379 -0.0489845)
      PathPoint IL_r5_R-P2: lumbar2 (-0.0496298 0.00211134 -0.056)
      PathPoint IL_r5_R-P2: torso (-0.078 0.172 -0.057)
      PathPoint IL_r5_R-P3: torso (-0.08 0.2 -0.057)
      PathPoint IL_r5_R-P4: torso (-0.081 0.237 -0.058)
      PathPoint IL_r5_R-P5: torso (-0.079 0.265 -0.059)
      PathPoint IL_r5_R-P6: torso (-0.076 0.287 -0.059)
      PathPoint IL_r5_R-P7: torso (-0.07 0.308 -0.06)
      PathWrap: wrap_object=Cylinder2 method=hybrid
    Thelen2003Muscle IL_R6_l: max_isometric_force=27.237 optimal_fiber_length=0.14826 tendon_slack_length=0.17931
        pennation_angle_at_optimal=0.2408554
      PathPoint IL_r6_R-P1: pelvis (-0.128722 0.0586615 -0.0529753)
      PathPoint IL_r6_R-P2: lumbar2 (-0.0492143 0.002 -0.058)
      PathPoint IL_r6_R-P2: torso (-0.079 0.1719 -0.06)
      PathPoint IL_r6_R-P3: torso (-0.079 0.202 -0.06)
      PathPoint IL_r6_R-P4: torso (-0.08 0.24 -0.061)
      PathPoint IL_r6_R-P5: torso (-0.077 0.268 -0.062)
      PathPoint IL_r6_R-P6: torso (-0.071 0.282 -0.063)
      PathWrap: wrap_object=Cylinder2 method=hybrid
    Thelen2003Muscle IL_R7_l: max_isometric_force=35.019 optimal_fiber_length=0.155 tendon_slack_length=0.15356
        pennation_angle_at_optimal=0.2408554
      PathPoint IL_r7_R-P1: pelvis (-0.11891 0.0692658 -0.0580751)
      PathPoint IL_r7_R-P2: lumbar2 (-0.0486649 0.00237387 -0.061)
      PathPoint IL_r7_R-P2: torso (-0.08 0.172 -0.063)
      PathPoint IL_r7_R-P3: torso (-0.08 0.201 -0.063)
      PathPoint IL_r7_R-P4: torso (-0.081 0.239 -0.064)
      PathPoint IL_r7_R-P5: torso (-0.075 0.261 -0.065)
    Thelen2003Muscle IL_R8_l: max_isometric_force=31.128 optimal_fiber_length=0.1391 tendon_slack_length=0.13081
        pennation_angle_at_optimal=0.2408554
      PathPoint IL_r8_R-P1: pelvis (-0.121 0.071 -0.06)
      PathPoint IL_r8_R-P2: lumbar2 (-0.048 0.00285524 -0.064)
      PathPoint IL_r8_R-P2: torso (-0.079 0.167 -0.065)
      PathPoint IL_r8_R-P3: torso (-0.081 0.201 -0.065)
      PathPoint IL_r8_R-P4: torso (-0.079 0.229 -0.066)
    Thelen2003Muscle IL_R9_l: max_isometric_force=44.7465 optimal_fiber_length=0.1554 tendon_slack_length=0.08383
        pennation_angle_at_optimal=0.2408554
      PathPoint IL_r9_R-P1: pelvis (-0.119 0.075 -0.06)
      PathPoint IL_r9_R-P2: lumbar2 (-0.0483524 0.00265461 -0.066)
      PathPoint IL_r9_R-P2: torso (-0.078 0.164 -0.068)
      PathPoint IL_r9_R-P3: torso (-0.076 0.193 -0.068)
    Thelen2003Muscle IL_R10_l: max_isometric_force=89.493 optimal_fiber_length=0.1309 tendon_slack_length=0.06917
        pennation_angle_at_optimal=0.2408554
      PathPoint IL_r10_R-P1: pelvis (-0.116 0.076 -0.062)
      PathPoint IL_r10_R-P2: lumbar2 (-0.0480883 0.00262684 -0.069)
      PathPoint IL_r10_R-P2: torso (-0.0749575 0.155 -0.07)
    Thelen2003Muscle IL_R11_l: max_isometric_force=110.8935 optimal_fiber_length=0.1161 tendon_slack_length=0.05062
        pennation_angle_at_optimal=0.2408554
      PathPoint IL_r11_R-P1: pelvis (-0.113 0.079 -0.064)
      PathPoint IL_r11_R-P2: lumbar2 (-0.0479471 0.00270337 -0.072)
      PathPoint IL_r11_R-P2: torso (-0.0624397 0.125 -0.074)
    Thelen2003Muscle IL_R12_l: max_isometric_force=132.294 optimal_fiber_length=0.089 tendon_slack_length=0.03657
        pennation_angle_at_optimal=0.2408554
      PathPoint IL_r12_R-P1: pelvis (-0.111 0.0819447 -0.0665628)
      PathPoint IL_r12_R-P2: torso (-0.0320122 0.0953599 -0.067)
    Thelen2003Muscle LTpT_T1_r: max_isometric_force=25.2915 optimal_fiber_length=0.102785 tendon_slack_length=0.24305
        pennation_angle_at_optimal=0.2199115
      PathPoint LTpT_t1_R-P1: lumbar1 (-0.048 -0.013 0.00321)
      PathPoint LTpT_t1_R-P2: torso (-0.05 0.405 0.02615)
      PathWrap: wrap_object=Chest_r method=hybrid
    Thelen2003Muscle LTpT_T2_r: max_isometric_force=50.583 optimal_fiber_length=0.10611 tendon_slack_length=0.2555
        pennation_angle_at_optimal=0.2199115
      PathPoint LTpT_t2_R-P1: lumbar2 (-0.047 -0.015 0.00383)
      PathPoint LTpT_t2_R-P2: torso (-0.055 0.386 0.02654)
      PathWrap: wrap_object=Chest_r method=hybrid
    Thelen2003Muscle LTpT_T3_r: max_isometric_force=50.583 optimal_fiber_length=0.10673 tendon_slack_length=0.25648
        pennation_angle_at_optimal=0.2199115
      PathPoint LTpT_t3_R-P1: lumbar3 (-0.05 -0.004 0.004)
      PathPoint LTpT_t3_R-P2: lumbar1 (-0.03711 -0.01402 0.005)
      PathPoint LTpT_t3_R-P2: torso (-0.0614225 0.365086 0.0255244)
      PathWrap: wrap_object=Chest_r method=hybrid
    Thelen2003Muscle LTpT_T4_r: max_isometric_force=19.455 optimal_fiber_length=0.10676 tendon_slack_length=0.2566
        pennation_angle_at_optimal=0.2199115
      PathPoint LTpT_t4_R-P1: lumbar4 (-0.049 0.007 0.00282)
      PathPoint LTpT_t4_R-P2: lumbar1 (-0.0371129 -0.014 0.00612)
      PathPoint LTpT_t4_R-P2: torso (-0.07 0.343 0.02615)
      PathWrap: wrap_object=Chest_r method=hybrid
    Thelen2003Muscle LTpT_T5_r: max_isometric_force=19.455 optimal_fiber_length=0.10076 tendon_slack_length=0.24214
        pennation_angle_at_optimal=0.2199115
      PathPoint LTpT_t5_R-P1: lumbar4 (-0.049 0.004 -0.000432746)
      PathPoint LTpT_t5_R-P2: lumbar2 (-0.044 0.0044 0.0064)
      PathPoint LTpT_t5_R-P2: torso (-0.0739587 0.32 0.028)
      PathWrap: wrap_object=Chest_r method=hybrid
    Thelen2003Muscle LTpT_T6_r: max_isometric_force=29.1825 optimal_fiber_length=0.10311 tendon_slack_length=0.23597
        pennation_angle_at_optimal=0.2199115
      PathPoint LTpT_t6_R-P1: lumbar5 (-0.038 0.018 0.00021356)
      PathPoint LTpT_t6_R-P2: lumbar2 (-0.044 0.0044 0.009)
      PathPoint LTpT_t6_R-P3: torso (-0.0729686 0.190038 0.0152527)
      PathPoint LTpT_t6_R-P2: torso (-0.08 0.294 0.02766)
    Thelen2003Muscle LTpT_T7_r: max_isometric_force=35.019 optimal_fiber_length=0.11827 tendon_slack_length=0.22357
        pennation_angle_at_optimal=0.2199115
      PathPoint LTpT_t7_R-P1: sacrum (-0.131317 0.0605127 0.00027686)
      PathPoint LTpT_t7_R-P2: lumbar2 (-0.04399 0.0044 0.011)
      PathPoint LTpT_t7_R-P3: torso (-0.0726628 0.190681 0.019448)
      PathPoint LTpT_t7_R-P2: torso (-0.08 0.267 0.02647)
    Thelen2003Muscle LTpT_T8_r: max_isometric_force=56.4195 optimal_fiber_length=0.12614 tendon_slack_length=0.19968
        pennation_angle_at_optimal=0.2199115
      PathPoint LTpT_t8_R-P1: sacrum (-0.142901 0.0502456 0.00037451)
      PathPoint LTpT_t8_R-P2: lumbar4 (-0.0469739 0.0180443 0.00565735)
      PathPoint LTpT_t8_R-P3: lumbar3 (-0.0467498 0.0135459 0.00831636)
      PathPoint LTpT_t8_R-P2: lumbar2 (-0.0453159 0.00310151 0.01094)
      PathPoint LTpT_t8_R-P2: torso (-0.079 0.241 0.0255)
    Thelen2003Muscle LTpT_T9_r: max_isometric_force=66.147 optimal_fiber_length=0.12436 tendon_slack_length=0.21077
        pennation_angle_at_optimal=0.2199115
      PathPoint LTpT_t9_R-P1: sacrum (-0.165822 0.0268352 0)
      PathPoint LTpT_t9_R-P2: lumbar4 (-0.04672 0.01796 0.00748)
      PathPoint LTpT_t9_R-P3: lumbar3 (-0.0464295 0.0138534 0.00968998)
      PathPoint LTpT_t9_R-P3: lumbar2 (-0.0447163 0.00347304 0.0115)
      PathPoint LTpT_t9_R-P2: torso (-0.075 0.222 0.0241501)
    Thelen2003Muscle LTpT_T10_r: max_isometric_force=71.9835 optimal_fiber_length=0.1123 tendon_slack_length=0.171608
        pennation_angle_at_optimal=0.2199115
      PathPoint LTpT_t10_R-P1: sacrum (-0.164463 0.0245611 0.01072)
      PathPoint LTpT_t10_R-P2: lumbar4 (-0.04672 0.01796 0.01256)
      PathPoint LTpT_t10_R-P2: lumbar3 (-0.0461 0.01403 0.01441)
      PathPoint LTpT_t10_R-P3: lumbar2 (-0.044 0.00338 0.01525)
      PathPoint LTpT_t10_R-P2: torso (-0.068 0.193 0.0181)
    Thelen2003Muscle LTpT_T11_r: max_isometric_force=73.929 optimal_fiber_length=0.098023 tendon_slack_length=0.149396
        pennation_angle_at_optimal=0.2199115
      PathPoint LTpT_t11_R-P1: sacrum (-0.157649 0.0307094 0.02404)
      PathPoint LTpT_t11_R-P2: lumbar4 (-0.04672 0.017 0.02194)
      PathPoint LTpT_t11_R-P3: lumbar3 (-0.0501482 0.0134888 0.020885)
      PathPoint LTpT_t11_R-P2: lumbar2 (-0.046 0.00338 0.01983)
      PathPoint LTpT_t11_R-P2: torso (-0.059 0.161718 0.01762)
    Thelen2003Muscle LTpT_T12_r: max_isometric_force=62.256 optimal_fiber_length=0.077981 tendon_slack_length=0.11885
        pennation_angle_at_optimal=0.2199115
      PathPoint LTpT_t12_R-P1: sacrum (-0.14476 0.0488 0.02793)
      PathPoint LTpT_t12_R-P2: lumbar4 (-0.04672 0.017 0.02524)
      PathPoint LTpT_t12_R-P3: lumbar3 (-0.0493674 0.0140564 0.0238974)
      PathPoint LTpT_t12_R-P2: lumbar2 (-0.0458028 0.00398333 0.0225543)
      PathPoint LTpT_t12_R-P2: torso (-0.051 0.133 0.0178539)
    Thelen2003Muscle LTpT_R4_r: max_isometric_force=19.455 optimal_fiber_length=0.135533 tendon_slack_length=0.206564
        pennation_angle_at_optimal=0.2199115
      PathPoint LTpT_r4_R-P1: lumbar4 (-0.05 0.00705986 0.00282013)
      PathPoint LTpT_r4_R-P2: lumbar2 (-0.05 0.00545622 0.0114779)
      PathPoint LTpT_r4_R-P2: torso (-0.073 0.19 0.0259954)
      PathPoint LTpT_r4_R-P3: torso (-0.074 0.215 0.0285848)
      PathPoint LTpT_r4_R-P4: torso (-0.074 0.243 0.0311206)
      PathPoint LTpT_r4_R-P5: torso (-0.073 0.273 0.0335195)
      PathPoint LTpT_r4_R-P6: torso (-0.065 0.342 0.038393)
    Thelen2003Muscle LTpT_R5_r: max_isometric_force=19.455 optimal_fiber_length=0.1270107 tendon_slack_length=0.193575
        pennation_angle_at_optimal=0.2199115
      PathPoint LTpT_r5_R-P1: lumbar4 (-0.049 0.004 8e-5)
      PathPoint LTpT_r5_R-P2: lumbar2 (-0.049 0.00463268 0.0141962)
      PathPoint LTpT_r5_R-P2: torso (-0.076 0.188 0.0299068)
      PathPoint LTpT_r5_R-P3: torso (-0.075 0.214 0.0319682)
      PathPoint LTpT_r5_R-P4: torso (-0.076 0.243 0.0346445)
      PathPoint LTpT_r5_R-P5: torso (-0.074 0.271 0.037)
      PathPoint LTpT_r5_R-P6: torso (-0.065 0.313 0.0391932)
    Thelen2003Muscle LTpT_R6_r: max_isometric_force=29.1825 optimal_fiber_length=0.135678 tendon_slack_length=0.184737
        pennation_angle_at_optimal=0.2199115
      PathPoint LTpT_r6_R-P1: lumbar5 (-0.038 0.02 0.00021)
      PathPoint LTpT_r6_R-P2: lumbar3 (-0.05 0.0147336 0.010844)
      PathPoint LTpT_r6_R-P2: lumbar2 (-0.046 0.0044 0.014)
      PathPoint LTpT_r6_R-P2: torso (-0.076 0.187 0.0310073)
      PathPoint LTpT_r6_R-P3: torso (-0.076 0.213 0.0346608)
      PathPoint LTpT_r6_R-P4: torso (-0.077 0.242 0.0373467)
      PathPoint LTpT_r6_R-P5: torso (-0.073 0.271 0.04)
      PathPoint LTpT_r6_R-P6: torso (-0.069 0.29 0.04)
    Thelen2003Muscle LTpT_R7_r: max_isometric_force=35.019 optimal_fiber_length=0.129543 tendon_slack_length=0.194195
        pennation_angle_at_optimal=0.2199115
      PathPoint LTpT_r7_R-P1: sacrum (-0.13132 0.06051 0.00028)
      PathPoint LTpT_r7_R-P2: lumbar4 (-0.0467202 0.0188294 0.00812957)
      PathPoint LTpT_r7_R-P2: lumbar3 (-0.0461005 0.0141694 0.0128553)
      PathPoint LTpT_r7_R-P2: lumbar2 (-0.04399 0.00431532 0.0172724)
      PathPoint LTpT_r7_R-P2: torso (-0.078 0.185 0.0354903)
      PathPoint LTpT_r7_R-P3: torso (-0.079 0.211 0.0395886)
      PathPoint LTpT_r7_R-P4: torso (-0.077 0.243 0.0422488)
      PathPoint LTpT_r7_R-P5: torso (-0.074 0.269 0.0433327)
    Thelen2003Muscle LTpT_R8_r: max_isometric_force=56.4195 optimal_fiber_length=0.106076 tendon_slack_length=0.198398
        pennation_angle_at_optimal=0.2199115
      PathPoint LTpT_r8_R-P1: sacrum (-0.1429 0.05025 0.00037)
      PathPoint LTpT_r8_R-P2: lumbar4 (-0.0465288 0.0181236 0.0113934)
      PathPoint LTpT_r8_R-P2: lumbar3 (-0.0459248 0.014 0.0160395)
      PathPoint LTpT_r8_R-P2: lumbar2 (-0.04399 0.00388 0.0205414)
      PathPoint LTpT_r8_R-P2: torso (-0.079 0.185 0.0407129)
      PathPoint LTpT_r8_R-P3: torso (-0.079 0.209 0.0437166)
      PathPoint LTpT_r8_R-P4: torso (-0.076 0.238 0.0463537)
    Thelen2003Muscle LTpT_R9_r: max_isometric_force=66.147 optimal_fiber_length=0.091522 tendon_slack_length=0.207985
        pennation_angle_at_optimal=0.2199115
      PathPoint LTpT_r9_R-P1: sacrum (-0.16582 0.02684 0)
      PathPoint LTpT_r9_R-P2: lumbar4 (-0.0467202 0.0176814 0.0148901)
      PathPoint LTpT_r9_R-P2: lumbar3 (-0.0461005 0.0130235 0.0195821)
      PathPoint LTpT_r9_R-P2: lumbar2 (-0.0439905 0.00393671 0.0241884)
      PathPoint LTpT_r9_R-P2: torso (-0.079 0.183 0.043359)
      PathPoint LTpT_r9_R-P3: torso (-0.077 0.203 0.0467599)
    Thelen2003Muscle LTpT_R10_r: max_isometric_force=71.9835 optimal_fiber_length=0.107241 tendon_slack_length=0.165678
        pennation_angle_at_optimal=0.2199115
      PathPoint LTpT_r10_R-P1: sacrum (-0.16446 0.02456 0.01072)
      PathPoint LTpT_r10_R-P2: lumbar4 (-0.0466654 0.0168641 0.0194391)
      PathPoint LTpT_r10_R-P2: lumbar3 (-0.0460454 0.012674 0.023454)
      PathPoint LTpT_r10_R-P2: lumbar2 (-0.0439356 0.00364643 0.027333)
      PathPoint LTpT_r10_R-P2: torso (-0.077 0.176 0.0468867)
    Thelen2003Muscle LTpT_R11_r: max_isometric_force=73.929 optimal_fiber_length=0.104511 tendon_slack_length=0.131312
        pennation_angle_at_optimal=0.2199115
      PathPoint LTpT_r11_R-P1: sacrum (-0.15765 0.03071 0.02404)
      PathPoint LTpT_r11_R-P2: lumbar4 (-0.0461 0.01796 0.0294188)
      PathPoint LTpT_r11_R-P3: lumbar3 (-0.0461 0.0139338 0.0325773)
      PathPoint LTpT_r11_R-P4: lumbar2 (-0.0440238 0.00448 0.0355734)
      PathPoint LTpT_r11_R-P2: torso (-0.0650216 0.147656 0.045555)
    Thelen2003Muscle LTpT_R12_r: max_isometric_force=62.256 optimal_fiber_length=0.0633 tendon_slack_length=0.123
        pennation_angle_at_optimal=0.2199115
      PathPoint LTpT_r12_R-P1: sacrum (-0.14476 0.0488 0.02793)
      PathPoint LTpT_r12_R-P2: lumbar4 (-0.04672 0.0175766 0.0335072)
      PathPoint LTpT_r12_R-P2: lumbar3 (-0.0461 0.0136439 0.0358736)
      PathPoint LTpT_r12_R-P2: lumbar2 (-0.044 0.0044 0.0388153)
      PathPoint LTpT_r12_R-P2: torso (-0.0450351 0.12 0.0466148)
      PathWrap: wrap_object=Cylinder2 method=hybrid
    Thelen2003Muscle LTpT_T1_l: max_isometric_force=25.2915 optimal_fiber_length=0.102785 tendon_slack_length=0.24305
        pennation_angle_at_optimal=0.2199115
      PathPoint LTpT_t1_R-P1: lumbar1 (-0.048 -0.013 -0.00321)
      PathPoint LTpT_t1_R-P2: torso (-0.05 0.405 -0.02615)
      PathWrap: wrap_object=Chest_l method=hybrid
    Thelen2003Muscle LTpT_T2_l: max_isometric_force=50.583 optimal_fiber_length=0.10611 tendon_slack_length=0.2555
        pennation_angle_at_optimal=0.2199115
      PathPoint LTpT_t2_R-P1: lumbar2 (-0.047 -0.014 -0.004)
      PathPoint LTpT_t2_R-P2: torso (-0.055 0.386 -0.02654)
      PathWrap: wrap_object=Chest_l method=hybrid
    Thelen2003Muscle LTpT_T3_l: max_isometric_force=50.583 optimal_fiber_length=0.10673 tendon_slack_length=0.25648
        pennation_angle_at_optimal=0.2199115
      PathPoint LTpT_t3_R-P1: lumbar3 (-0.049 -0.004 -0.00407)
      PathPoint LTpT_t3_R-P2: lumbar1 (-0.03711 -0.01402 -0.005)
      PathPoint LTpT_t3_R-P2: torso (-0.061 0.365 -0.02598)
      PathWrap: wrap_object=Chest_l method=hybrid
    Thelen2003Muscle LTpT_T4_l: max_isometric_force=19.455 optimal_fiber_length=0.10676 tendon_slack_length=0.2566
        pennation_angle_at_optimal=0.2199115
      PathPoint LTpT_t4_R-P1: lumbar4 (-0.049 0.00705986 -0.00282)
      PathPoint LTpT_t4_R-P2: lumbar1 (-0.0371129 -0.0140247 -0.00612)
      PathPoint LTpT_t4_R-P2: torso (-0.07 0.343 -0.02615)
      PathWrap: wrap_object=Chest_l method=hybrid
    Thelen2003Muscle LTpT_T5_l: max_isometric_force=19.455 optimal_fiber_length=0.10076 tendon_slack_length=0.24214
        pennation_angle_at_optimal=0.2199115
      PathPoint LTpT_t5_R-P1: lumbar4 (-0.0473001 0.00396965 -8e-5)
      PathPoint LTpT_t5_R-P2: lumbar2 (-0.044 0.0044 -0.0064)
      PathPoint LTpT_t5_R-P2: torso (-0.074 0.32 -0.02808)
      PathWrap: wrap_object=Chest_l method=hybrid
    Thelen2003Muscle LTpT_T6_l: max_isometric_force=29.1825 optimal_fiber_length=0.10311 tendon_slack_length=0.23597
        pennation_angle_at_optimal=0.2199115
      PathPoint LTpT_t6_R-P1: lumbar5 (-0.038 0.018 -0.00021)
      PathPoint LTpT_t6_R-P2: lumbar2 (-0.044 0.0044 -0.009)
      PathPoint LTpT_t6_R-P3: torso (-0.073 0.19 -0.01547)
      PathPoint LTpT_t6_R-P2: torso (-0.08 0.294 -0.02766)
    Thelen2003Muscle LTpT_T7_l: max_isometric_force=35.019 optimal_fiber_length=0.11827 tendon_slack_length=0.22357
        pennation_angle_at_optimal=0.2199115
      PathPoint LTpT_t7_R-P1: sacrum (-0.131317 0.0605127 -0.00028)
      PathPoint LTpT_t7_R-P2: lumbar2 (-0.04399 0.0044 -0.011)
      PathPoint LTpT_t7_R-P3: torso (-0.073 0.191 -0.019)
      PathPoint LTpT_t7_R-P2: torso (-0.08 0.267 -0.026)
    Thelen2003Muscle LTpT_T8_l: max_isometric_force=56.4195 optimal_fiber_length=0.12614 tendon_slack_length=0.19968
        pennation_angle_at_optimal=0.2199115
      PathPoint LTpT_t8_R-P1: sacrum (-0.142901 0.0502456 -0.00037)
      PathPoint LTpT_t8_R-P2: lumbar4 (-0.0469739 0.0180443 -0.00566)
      PathPoint LTpT_t8_R-P3: lumbar3 (-0.0467498 0.0135459 -0.00832)
      PathPoint LTpT_t8_R-P2: lumbar2 (-0.0453159 0.00310151 -0.01094)
      PathPoint LTpT_t8_R-P2: torso (-0.079 0.241 -0.0255)
    Thelen2003Muscle LTpT_T9_l: max_isometric_force=66.147 optimal_fiber_length=0.12436 tendon_slack_length=0.21077
        pennation_angle_at_optimal=0.2199115
      PathPoint LTpT_t9_R-P1: sacrum (-0.165822 0.0268352 0)
      PathPoint LTpT_t9_R-P2: lumbar4 (-0.04672 0.01796 -0.00748)
      PathPoint LTpT_t9_R-P3: lumbar3 (-0.0464295 0.0138534 -0.00969)
      PathPoint LTpT_t9_R-P3: lumbar2 (-0.0447163 0.00347304 -0.012)
      PathPoint LTpT_t9_R-P2: torso (-0.075 0.222 -0.024)
    Thelen2003Muscle LTpT_T10_l: max_isometric_force=71.9835 optimal_fiber_length=0.1123 tendon_slack_length=0.171608
        pennation_angle_at_optimal=0.2199115
      PathPoint LTpT_t10_R-P1: sacrum (-0.164463 0.0245611 -0.01072)
      PathPoint LTpT_t10_R-P2: lumbar4 (-0.04672 0.01796 -0.01256)
      PathPoint LTpT_t10_R-P2: lumbar3 (-0.0461 0.01403 -0.01441)
      PathPoint LTpT_t10_R-P3: lumbar2 (-0.044 0.00338 -0.01525)
      PathPoint LTpT_t10_R-P2: torso (-0.068 0.193 -0.018)
    Thelen2003Muscle LTpT_T11_l: max_isometric_force=73.929 optimal_fiber_length=0.098023 tendon_slack_length=0.149396
        pennation_angle_at_optimal=0.2199115
      PathPoint LTpT_t11_R-P1: sacrum (-0.157649 0.0307094 -0.02404)
      PathPoint LTpT_t11_R-P2: lumbar4 (-0.04672 0.017 -0.02194)
      PathPoint LTpT_t11_R-P3: lumbar3 (-0.0501482 0.0134888 -0.02088)
      PathPoint LTpT_t11_R-P2: lumbar2 (-0.046 0.00338 -0.01983)
      PathPoint LTpT_t11_R-P2: torso (-0.060879 0.161718 -0.01762)
    Thelen2003Muscle LTpT_T12_l: max_isometric_force=62.256 optimal_fiber_length=0.077981 tendon_slack_length=0.11885
        pennation_angle_at_optimal=0.2199115
      PathPoint LTpT_t12_R-P1: sacrum (-0.14476 0.0488 -0.028)
      PathPoint LTpT_t12_R-P2: lumbar4 (-0.04672 0.017 -0.025)
      PathPoint LTpT_t12_R-P3: lumbar3 (-0.0493674 0.0140564 -0.024)
      PathPoint LTpT_t12_R-P2: lumbar2 (-0.0458028 0.00398333 -0.023)
      PathPoint LTpT_t12_R-P2: torso (-0.051 0.133 -0.018)
    Thelen2003Muscle LTpT_R4_l: max_isometric_force=19.455 optimal_fiber_length=0.135533 tendon_slack_length=0.206564
        pennation_angle_at_optimal=0.2199115
      PathPoint LTpT_r4_R-P1: lumbar4 (-0.05 0.007 -0.00282)
      PathPoint LTpT_r4_R-P2: lumbar2 (-0.05 0.005 -0.01148)
      PathPoint LTpT_r4_R-P2: torso (-0.073 0.19 -0.026)
      PathPoint LTpT_r4_R-P3: torso (-0.074 0.215 -0.02858)
      PathPoint LTpT_r4_R-P4: torso (-0.074 0.243 -0.03112)
      PathPoint LTpT_r4_R-P5: torso (-0.073 0.273 -0.03352)
      PathPoint LTpT_r4_R-P6: torso (-0.065 0.342 -0.03839)
    Thelen2003Muscle LTpT_R5_l: max_isometric_force=19.455 optimal_fiber_length=0.1270107 tendon_slack_length=0.193575
        pennation_angle_at_optimal=0.2199115
      PathPoint LTpT_r5_R-P1: lumbar4 (-0.049 0.00396965 -8e-5)
      PathPoint LTpT_r5_R-P2: lumbar2 (-0.049 0.014 -0.0142)
      PathPoint LTpT_r5_R-P2: torso (-0.076 0.188 -0.02991)
      PathPoint LTpT_r5_R-P3: torso (-0.075 0.213 -0.03197)
      PathPoint LTpT_r5_R-P4: torso (-0.076 0.243 -0.03464)
      PathPoint LTpT_r5_R-P5: torso (-0.074 0.271 -0.03652)
      PathPoint LTpT_r5_R-P6: torso (-0.065 0.313 -0.03919)
    Thelen2003Muscle LTpT_R6_l: max_isometric_force=29.1825 optimal_fiber_length=0.135678 tendon_slack_length=0.184737
        pennation_angle_at_optimal=0.2199115
      PathPoint LTpT_r6_R-P1: lumbar5 (-0.038 0.02 -0.00021)
      PathPoint LTpT_r6_R-P2: lumbar3 (-0.05 0.0147336 -0.01084)
      PathPoint LTpT_r6_R-P2: lumbar2 (-0.046 0.0044 -0.014)
      PathPoint LTpT_r6_R-P2: torso (-0.076 0.187 -0.031)
      PathPoint LTpT_r6_R-P3: torso (-0.076 0.213 -0.03466)
      PathPoint LTpT_r6_R-P4: torso (-0.077 0.242 -0.03735)
      PathPoint LTpT_r6_R-P5: torso (-0.073 0.271 -0.03952)
      PathPoint LTpT_r6_R-P6: torso (-0.069 0.29 -0.0401)
    Thelen2003Muscle LTpT_R7_l: max_isometric_force=35.019 optimal_fiber_length=0.129543 tendon_slack_length=0.194195
        pennation_angle_at_optimal=0.2199115
      PathPoint LTpT_r7_R-P1: sacrum (-0.13132 0.061 -0.00028)
      PathPoint LTpT_r7_R-P2: lumbar4 (-0.0467202 0.019 -0.008)
      PathPoint LTpT_r7_R-P2: lumbar3 (-0.0461005 0.014 -0.01286)
      PathPoint LTpT_r7_R-P2: lumbar2 (-0.04399 0.004 -0.01727)
      PathPoint LTpT_r7_R-P2: torso (-0.078 0.185 -0.03549)
      PathPoint LTpT_r7_R-P3: torso (-0.079 0.211 -0.03959)
      PathPoint LTpT_r7_R-P4: torso (-0.077 0.243 -0.04225)
      PathPoint LTpT_r7_R-P5: torso (-0.074 0.269 -0.04333)
    Thelen2003Muscle LTpT_R8_l: max_isometric_force=56.4195 optimal_fiber_length=0.106076 tendon_slack_length=0.198398
        pennation_angle_at_optimal=0.2199115
      PathPoint LTpT_r8_R-P1: sacrum (-0.1429 0.05025 -0.00037)
      PathPoint LTpT_r8_R-P2: lumbar4 (-0.0465288 0.0181236 -0.01139)
      PathPoint LTpT_r8_R-P2: lumbar3 (-0.0459248 0.0135047 -0.01604)
      PathPoint LTpT_r8_R-P2: lumbar2 (-0.04399 0.00388 -0.02054)
      PathPoint LTpT_r8_R-P2: torso (-0.079 0.185 -0.04071)
      PathPoint LTpT_r8_R-P3: torso (-0.079 0.209 -0.04372)
      PathPoint LTpT_r8_R-P4: torso (-0.076 0.238 -0.04635)
    Thelen2003Muscle LTpT_R9_l: max_isometric_force=66.147 optimal_fiber_length=0.091522 tendon_slack_length=0.207985
        pennation_angle_at_optimal=0.2199115
      PathPoint LTpT_r9_R-P1: sacrum (-0.16582 0.02684 0)
      PathPoint LTpT_r9_R-P2: lumbar4 (-0.0467202 0.0176814 -0.01489)
      PathPoint LTpT_r9_R-P2: lumbar3 (-0.0461005 0.0130235 -0.01958)
      PathPoint LTpT_r9_R-P2: lumbar2 (-0.0439905 0.00393671 -0.02419)
      PathPoint LTpT_r9_R-P2: torso (-0.079 0.183 -0.04336)
      PathPoint LTpT_r9_R-P3: torso (-0.077 0.203 -0.047)
    Thelen2003Muscle LTpT_R10_l: max_isometric_force=71.9835 optimal_fiber_length=0.107241 tendon_slack_length=0.165678
        pennation_angle_at_optimal=0.2199115
      PathPoint LTpT_r10_R-P1: sacrum (-0.16446 0.02456 -0.01072)
      PathPoint LTpT_r10_R-P2: lumbar4 (-0.0466654 0.0168641 -0.01944)
      PathPoint LTpT_r10_R-P2: lumbar3 (-0.0460454 0.012674 -0.02345)
      PathPoint LTpT_r10_R-P2: lumbar2 (-0.0439356 0.00364643 -0.02733)
      PathPoint LTpT_r10_R-P2: torso (-0.077 0.176 -0.047)
    Thelen2003Muscle LTpT_R11_l: max_isometric_force=73.929 optimal_fiber_length=0.104511 tendon_slack_length=0.131312
        pennation_angle_at_optimal=0.2199115
      PathPoint LTpT_r11_R-P1: sacrum (-0.15765 0.03071 -0.02404)
      PathPoint LTpT_r11_R-P2: lumbar4 (-0.0461 0.01796 -0.02942)
      PathPoint LTpT_r11_R-P3: lumbar3 (-0.0461 0.0139338 -0.03258)
      PathPoint LTpT_r11_R-P4: lumbar2 (-0.0440238 0.00448 -0.03557)
      PathPoint LTpT_r11_R-P2: torso (-0.0650216 0.147656 -0.04556)
    Thelen2003Muscle LTpT_R12_l: max_isometric_force=62.256 optimal_fiber_length=0.0633 tendon_slack_length=0.123
        pennation_angle_at_optimal=0.2199115
      PathPoint LTpT_r12_R-P1: sacrum (-0.14476 0.049 -0.028)
      PathPoint LTpT_r12_R-P2: lumbar4 (-0.047 0.018 -0.034)
      PathPoint LTpT_r12_R-P2: lumbar3 (-0.0461 0.0136439 -0.03587)
      PathPoint LTpT_r12_R-P2: lumbar2 (-0.044 0.0044 -0.03882)
      PathPoint LTpT_r12_R-P2: torso (-0.0450351 0.12 -0.047)
      PathWrap: wrap_object=Cylinder2 method=hybrid
    Thelen2003Muscle LTpL_L5_r: max_isometric_force=103.1115 optimal_fiber_length=0.051468 tendon_slack_length=0.001
        pennation_angle_at_optimal=0.2199115
      PathPoint P1: sacrum (-0.138531 0.0631285 0.0455109)
      PathPoint P2: lumbar5 (-0.013153 0.028534 0.0258423)
    Thelen2003Muscle LTpL_L4_r: max_isometric_force=99.2205 optimal_fiber_length=0.039244 tendon_slack_length=0.042404
        pennation_angle_at_optimal=0.2199115
      PathPoint P1: pelvis (-0.133 0.041 0.048)
      PathPoint P2: lumbar4 (-0.023 0.027038 0.0254663)
    Thelen2003Muscle LTpL_L3_r: max_isometric_force=91.4385 optimal_fiber_length=0.054869 tendon_slack_length=0.0596
        pennation_angle_at_optimal=0.2199115
      PathPoint P1: pelvis (-0.14 0.041 0.051)
      PathPoint P2: lumbar3 (-0.0297706 0.0229639 0.0232018)
    Thelen2003Muscle LTpL_L2_r: max_isometric_force=81.711 optimal_fiber_length=0.067743 tendon_slack_length=0.0744
        pennation_angle_at_optimal=0.2199115
      PathPoint P1: pelvis (-0.142 0.037 0.053)
      PathPoint P2: lumbar2 (-0.0299692 0.0143552 0.0220597)
    Thelen2003Muscle LTpL_L1_r: max_isometric_force=70.038 optimal_fiber_length=0.08127 tendon_slack_length=0.0944
        pennation_angle_at_optimal=0.2199115
      PathPoint P1: pelvis (-0.144121 0.0335392 0.0535739)
      PathPoint P2: lumbar1 (-0.0316208 0.0166569 0.0228226)
      PathWrap: wrap_object=Cylinder2 method=hybrid
    Thelen2003Muscle LTpL_L5_l: max_isometric_force=103.1115 optimal_fiber_length=0.051468 tendon_slack_length=0.001
        pennation_angle_at_optimal=0.2199115
      PathPoint P1: sacrum (-0.139 0.063 -0.046)
      PathPoint P2: lumbar5 (-0.013 0.029 -0.026)
    Thelen2003Muscle LTpL_L4_l: max_isometric_force=99.2205 optimal_fiber_length=0.039244 tendon_slack_length=0.042404
        pennation_angle_at_optimal=0.2199115
      PathPoint P1: pelvis (-0.133 0.041 -0.048)
      PathPoint P2: lumbar4 (-0.023 0.027 -0.025)
    Thelen2003Muscle LTpL_L3_l: max_isometric_force=91.4385 optimal_fiber_length=0.054869 tendon_slack_length=0.0596
        pennation_angle_at_optimal=0.2199115
      PathPoint P1: pelvis (-0.14 0.041 -0.051)
      PathPoint P2: lumbar3 (-0.03 0.023 -0.023)
    Thelen2003Muscle LTpL_L2_l: max_isometric_force=81.711 optimal_fiber_length=0.067743 tendon_slack_length=0.0744
        pennation_angle_at_optimal=0.2199115
      PathPoint P1: pelvis (-0.142 0.037 -0.053)
      PathPoint P2: lumbar2 (-0.03 0.014 -0.022)
    Thelen2003Muscle LTpL_L1_l: max_isometric_force=70.038 optimal_fiber_length=0.08127 tendon_slack_length=0.0944
        pennation_angle_at_optimal=0.2199115
      PathPoint P1: pelvis (-0.144 0.034 -0.054)
      PathPoint P2: lumbar1 (-0.032 0.017 -0.023)
      PathWrap: wrap_object=Cylinder2 method=hybrid
    Thelen2003Muscle EO1_r: max_isometric_force=111.744 optimal_fiber_length=0.0358775 tendon_slack_length=0.0569831
        pennation_angle_at_optimal=0
      PathPoint P1: Abdomen (0.006 0.048 0.021)
      PathPoint P2: torso (0.093 0.174 0.093)
    Thelen2003Muscle EO2_r: max_isometric_force=132.3546 optimal_fiber_length=0.0379268 tendon_slack_length=0.055165
        pennation_angle_at_optimal=0
      PathPoint P1: torso (0.091 0.141 0.105)
      PathPoint P2: Abdomen (0.008 0.023 0.033)
    Thelen2003Muscle EO3_r: max_isometric_force=138.8978 optimal_fiber_length=0.038402 tendon_slack_length=0.046576
        pennation_angle_at_optimal=0
      PathPoint P1: torso (0.0785075 0.10052 0.113587)
      PathPoint P2: Abdomen (0.00677141 -0.008 0.033)
    Thelen2003Muscle EO4_r: max_isometric_force=134.0928 optimal_fiber_length=0.03929399 tendon_slack_length=0.044785
        pennation_angle_at_optimal=0
      PathPoint P1: torso (0.0697082 0.0831956 0.112156)
      PathPoint default: Abdomen (0.006 -0.024 0.031)
    Thelen2003Muscle EO5_r: max_isometric_force=155.945 optimal_fiber_length=0.0470542 tendon_slack_length=0.0515216
        pennation_angle_at_optimal=0
      PathPoint P1: torso (0.001 0.11 0.112)
      PathPoint P2: pelvis (-0.055 0.082 0.102)
    Thelen2003Muscle EO6_r: max_isometric_force=226.9645 optimal_fiber_length=0.05652438 tendon_slack_length=0.05713
        pennation_angle_at_optimal=0
      PathPoint P1: torso (-0.011 0.093 0.1)
      PathPoint P2: pelvis (-0.069 0.093 0.098)
    Thelen2003Muscle IO1_r: max_isometric_force=123.9794 optimal_fiber_length=0.04229777 tendon_slack_length=0.06399
        pennation_angle_at_optimal=0
      PathPoint P1: Abdomen (0.00306951 -0.047 0.044)
      PathPoint P2: pelvis (-0.009 0.025 0.126)
    Thelen2003Muscle IO2_r: max_isometric_force=150.0727 optimal_fiber_length=0.0435 tendon_slack_length=0.0659496
        pennation_angle_at_optimal=0
      PathPoint P1: Abdomen (0.003 -0.022 0.052)
      PathPoint P2: pelvis (-0.024 0.049 0.128)
    Thelen2003Muscle IO3_r: max_isometric_force=151.2072 optimal_fiber_length=0.0516783 tendon_slack_length=0.07835
        pennation_angle_at_optimal=0
      PathPoint P1: Abdomen (0.005 0.007 0.049)
      PathPoint P2: pelvis (-0.039 0.069 0.117)
    Thelen2003Muscle IO4_r: max_isometric_force=179.0459 optimal_fiber_length=0.06969329 tendon_slack_length=0.04696
        pennation_angle_at_optimal=0
      PathPoint P1: torso (0.066 0.108 0.121)
      PathPoint P2: pelvis (-0.053 0.082 0.1)
    Thelen2003Muscle IO5_r: max_isometric_force=157.0833 optimal_fiber_length=0.05683505 tendon_slack_length=0.038296
        pennation_angle_at_optimal=0
      PathPoint P1: torso (0.03 0.096 0.115)
      PathPoint P2: pelvis (-0.074 0.094 0.079)
    Thelen2003Muscle IO6_r: max_isometric_force=138.6115 optimal_fiber_length=0.05439 tendon_slack_length=0.03665
        pennation_angle_at_optimal=0
      PathPoint P1: torso (0 0.086 0.1)
      PathPoint P2: pelvis (-0.09 0.088 0.066)
    Thelen2003Muscle EO1_l: max_isometric_force=111.744 optimal_fiber_length=0.0358775 tendon_slack_length=0.0569831
        pennation_angle_at_optimal=0
      PathPoint P1: Abdomen (0.006 0.048 -0.021)
      PathPoint P2: torso (0.0895924 0.170642 -0.0991386)
    Thelen2003Muscle EO2_l: max_isometric_force=132.3546 optimal_fiber_length=0.0379268 tendon_slack_length=0.055165
        pennation_angle_at_optimal=0
      PathPoint P1: torso (0.091 0.141 -0.10478)
      PathPoint P2: Abdomen (0.008 0.023 -0.033)
    Thelen2003Muscle EO3_l: max_isometric_force=138.8978 optimal_fiber_length=0.038402 tendon_slack_length=0.046576
        pennation_angle_at_optimal=0
      PathPoint P1: torso (0.079 0.101 -0.114)
      PathPoint P2: Abdomen (0.00663296 -0.00763095 -0.0325901)
    Thelen2003Muscle EO4_l: max_isometric_force=134.0928 optimal_fiber_length=0.03929399 tendon_slack_length=0.044785
        pennation_angle_at_optimal=0
      PathPoint P1: torso (0.07 0.083 -0.112)
      PathPoint P2: Abdomen (0.0063871 -0.0235714 -0.0306404)
    Thelen2003Muscle EO5_l: max_isometric_force=155.945 optimal_fiber_length=0.0470542 tendon_slack_length=0.0515216
        pennation_angle_at_optimal=0
      PathPoint P1: torso (0.000805328 0.110148 -0.111596)
      PathPoint P2: pelvis (-0.054703 0.0815326 -0.102158)
    Thelen2003Muscle EO6_l: max_isometric_force=226.9645 optimal_fiber_length=0.05652438 tendon_slack_length=0.05713
        pennation_angle_at_optimal=0
      PathPoint P1: torso (-0.011 0.093 -0.1)
      PathPoint P2: pelvis (-0.069 0.093 -0.089)
    Thelen2003Muscle IO1_l: max_isometric_force=123.9794 optimal_fiber_length=0.04229777 tendon_slack_length=0.06399
        pennation_angle_at_optimal=0
      PathPoint P1: Abdomen (0.003 -0.047 -0.044)
      PathPoint P2: pelvis (-0.00903731 0.0246453 -0.126019)
    Thelen2003Muscle IO2_l: max_isometric_force=150.0727 optimal_fiber_length=0.0435 tendon_slack_length=0.0659496
        pennation_angle_at_optimal=0
      PathPoint P1: Abdomen (0.003 -0.022 -0.052)
      PathPoint P2: pelvis (-0.0242023 0.0485047 -0.127423)
    Thelen2003Muscle IO3_l: max_isometric_force=151.2072 optimal_fiber_length=0.0516783 tendon_slack_length=0.07835
        pennation_angle_at_optimal=0
      PathPoint P1: Abdomen (0.005 0.007 -0.049)
      PathPoint P2: pelvis (-0.0385031 0.0687193 -0.116768)
    Thelen2003Muscle IO4_l: max_isometric_force=179.0459 optimal_fiber_length=0.06969329 tendon_slack_length=0.04696
        pennation_angle_at_optimal=0
      PathPoint P1: torso (0.0656579 0.107855 -0.121297)
      PathPoint P2: pelvis (-0.052598 0.0818011 -0.0996565)
    Thelen2003Muscle IO5_l: max_isometric_force=157.0833 optimal_fiber_length=0.05683505 tendon_slack_length=0.038296
        pennation_angle_at_optimal=0
      PathPoint P1: torso (0.0302908 0.0959854 -0.114995)
      PathPoint P2: pelvis (-0.0738758 0.0936339 -0.0790343)
    Thelen2003Muscle IO6_l: max_isometric_force=138.6115 optimal_fiber_length=0.05439 tendon_slack_length=0.03665
        pennation_angle_at_optimal=0
      PathPoint P1: torso (0 0.086 -0.1)
      PathPoint P2: pelvis (-0.09 0.088 -0.066)
    Thelen2003Muscle LD_L1_r: max_isometric_force=41.4 optimal_fiber_length=0.316063 tendon_slack_length=0.0692329
        pennation_angle_at_optimal=0
      PathPoint P1: lumbar1 (-0.045 -0.013 0.00433164)
      PathPoint P2: humerus_r (-0.00948737 -0.0152526 0.00268873)
      PathWrap: wrap_object=Chest_r method=hybrid
    Thelen2003Muscle LD_L2_r: max_isometric_force=41.4 optimal_fiber_length=0.338256 tendon_slack_length=0.0740942
        pennation_angle_at_optimal=0
      PathPoint P1: lumbar2 (-0.043 -0.0134148 0.00414584)
      PathPoint P2: humerus_r (-0.00949 -0.01525 0.00269)
      PathWrap: wrap_object=Chest_r method=hybrid
    Thelen2003Muscle LD_L3_r: max_isometric_force=50.6 optimal_fiber_length=0.3550696 tendon_slack_length=0.077777
        pennation_angle_at_optimal=0
      PathPoint P1: lumbar3 (-0.046 -0.004 0.00385971)
      PathPoint P2: humerus_r (-0.00949 -0.01525 0.00433)
      PathWrap: wrap_object=Chest_r method=hybrid
    Thelen2003Muscle LD_L4_r: max_isometric_force=50.6 optimal_fiber_length=0.3719192 tendon_slack_length=0.081468
        pennation_angle_at_optimal=0
      PathPoint P1: lumbar4 (-0.045 0.005 0.00462278)
      PathPoint P2: humerus_r (-0.00949 -0.01525 0.00269)
      PathWrap: wrap_object=Chest_r method=hybrid
    Thelen2003Muscle LD_L5_r: max_isometric_force=50.6 optimal_fiber_length=0.3902216 tendon_slack_length=0.080135
        pennation_angle_at_optimal=0
      PathPoint P1: lumbar5 (-0.036 0.021 0.00411073)
      PathPoint P2: humerus_r (-0.00949 -0.01525 0.00269)
      PathWrap: wrap_object=Chest_r method=hybrid
    Thelen2003Muscle LD_T12_r: max_isometric_force=23 optimal_fiber_length=0.3032209 tendon_slack_length=0.06226857
        pennation_angle_at_optimal=0
      PathPoint P1: humerus_r (-0.00949 -0.01525 0.00269)
      PathPoint P2: torso (-0.052 0.102 0.0043635)
      PathWrap: wrap_object=Chest_r method=hybrid range=(1 2)
    Thelen2003Muscle LD_T11_r: max_isometric_force=27.6 optimal_fiber_length=0.2848084 tendon_slack_length=0.058487
        pennation_angle_at_optimal=0
      PathPoint P1: humerus_r (-0.00949 -0.01525 0.00269)
      PathPoint P2: torso (-0.0631214 0.131 0.003)
      PathWrap: wrap_object=Chest_r method=hybrid
    Thelen2003Muscle LD_T10_r: max_isometric_force=27.6 optimal_fiber_length=0.279701 tendon_slack_length=0.0437628
        pennation_angle_at_optimal=0
      PathPoint P1: humerus_r (-0.00949 -0.01525 0.00269)
      PathPoint P2: torso (-0.069 0.158 0.00382991)
      PathWrap: wrap_object=Chest_r method=hybrid
    Thelen2003Muscle LD_T9_r: max_isometric_force=18.4 optimal_fiber_length=0.256967 tendon_slack_length=0.14
        pennation_angle_at_optimal=0
      PathPoint P1: humerus_r (-0.00949 -0.01525 0.00269)
      PathPoint P2: torso (-0.079 0.194 0.00407649)
      PathWrap: wrap_object=Chest_r method=hybrid
    Thelen2003Muscle LD_T8_r: max_isometric_force=18.4 optimal_fiber_length=0.232514 tendon_slack_length=0.0477484
        pennation_angle_at_optimal=0
      PathPoint P1: humerus_r (-0.00949 -0.01525 0.00269)
      PathPoint P2: torso (-0.081 0.215 0.00427544)
      PathWrap: wrap_object=Chest_r method=hybrid
    Thelen2003Muscle LD_T7_r: max_isometric_force=18.4 optimal_fiber_length=0.223761 tendon_slack_length=0.045951
        pennation_angle_at_optimal=0
      PathPoint P1: humerus_r (-0.00949 -0.01525 0.00269)
      PathPoint P2: torso (-0.09 0.235 0.00407354)
      PathWrap: wrap_object=Chest_r method=hybrid
    Thelen2003Muscle LD_R12_r: max_isometric_force=18.4 optimal_fiber_length=0.2444749 tendon_slack_length=0.0502047
        pennation_angle_at_optimal=0
      PathPoint P1: humerus_r (-0.00949 -0.01525 0.00269)
      PathPoint P2: torso (-0.045 0.121579 0.0442662)
    Thelen2003Muscle LD_R11_r: max_isometric_force=27.6 optimal_fiber_length=0.240735 tendon_slack_length=0.0494366
        pennation_angle_at_optimal=0
      PathPoint P1: humerus_r (-0.00949 -0.01525 0.00433)
      PathPoint P2: torso (-0.068 0.14 0.063)
      PathWrap: wrap_object=Chest_r method=hybrid
    Thelen2003Muscle LD_Il_r: max_isometric_force=32.2 optimal_fiber_length=0.432081 tendon_slack_length=0.0186802
        pennation_angle_at_optimal=0
      PathPoint P1: pelvis (-0.126226 0.055 0.048683)
      PathPoint P2: humerus_r (-0.00949 -0.01525 0.00269)
      PathWrap: wrap_object=Chest_r method=hybrid
    Thelen2003Muscle LD_L1_l: max_isometric_force=41.4 optimal_fiber_length=0.316063 tendon_slack_length=0.0692329
        pennation_angle_at_optimal=0
      PathPoint P1: lumbar1 (-0.045 -0.013 -0.00433)
      PathPoint P2: humerus_l (-0.00948737 -0.01525 -0.00269)
      PathWrap: wrap_object=Chest_l method=hybrid
    Thelen2003Muscle LD_L2_l: max_isometric_force=41.4 optimal_fiber_length=0.338256 tendon_slack_length=0.0740942
        pennation_angle_at_optimal=0
      PathPoint P1: lumbar2 (-0.043 -0.01341 -0.00415)
      PathPoint P2: humerus_l (-0.00949 -0.01525 -0.00269)
      PathWrap: wrap_object=Chest_l method=hybrid
    Thelen2003Muscle LD_L3_l: max_isometric_force=50.6 optimal_fiber_length=0.3550696 tendon_slack_length=0.077777
        pennation_angle_at_optimal=0
      PathPoint P1: lumbar3 (-0.046 -0.004 -0.00386)
      PathPoint P2: humerus_l (-0.00949 -0.01525 -0.00433)
      PathWrap: wrap_object=Chest_l method=hybrid
    Thelen2003Muscle LD_L4_l: max_isometric_force=50.6 optimal_fiber_length=0.3719192 tendon_slack_length=0.081468
        pennation_angle_at_optimal=0
      PathPoint P1: lumbar4 (-0.045 0.005 -0.00462)
      PathPoint P2: humerus_l (-0.00949 -0.01525 -0.00269)
      PathWrap: wrap_object=Chest_l method=hybrid
    Thelen2003Muscle LD_L5_l: max_isometric_force=50.6 optimal_fiber_length=0.3902216 tendon_slack_length=0.080135
        pennation_angle_at_optimal=0
      PathPoint P1: lumbar5 (-0.036 0.021 -0.00411)
      PathPoint P2: humerus_l (-0.00949 -0.01525 -0.00269)
      PathWrap: wrap_object=Chest_l method=hybrid
    Thelen2003Muscle LD_T12_l: max_isometric_force=23 optimal_fiber_length=0.3032209 tendon_slack_length=0.06226857
        pennation_angle_at_optimal=0
      PathPoint P1: humerus_l (-0.00949 -0.01525 -0.00269)
      PathPoint P2: torso (-0.052 0.102 -0.00436)
      PathWrap: wrap_object=Chest_l method=hybrid
    Thelen2003Muscle LD_T11_l: max_isometric_force=27.6 optimal_fiber_length=0.2848084 tendon_slack_length=0.058487
        pennation_angle_at_optimal=0
      PathPoint P1: humerus_l (-0.00949 -0.01525 -0.00269)
      PathPoint P2: torso (-0.0631214 0.131 -0.00346)
      PathWrap: wrap_object=Chest_l method=hybrid
    Thelen2003Muscle LD_T10_l: max_isometric_force=27.6 optimal_fiber_length=0.279701 tendon_slack_length=0.0437628
        pennation_angle_at_optimal=0
      PathPoint P1: humerus_l (-0.00949 -0.01525 -0.00269)
      PathPoint P2: torso (-0.069 0.158 -0.00383)
      PathWrap: wrap_object=Chest_l method=hybrid
    Thelen2003Muscle LD_T9_l: max_isometric_force=18.4 optimal_fiber_length=0.256967 tendon_slack_length=0.14
        pennation_angle_at_optimal=0
      PathPoint P1: humerus_l (-0.00949 -0.01525 -0.00269)
      PathPoint P2: torso (-0.079 0.194 -0.00408)
      PathWrap: wrap_object=Chest_l method=hybrid
    Thelen2003Muscle LD_T8_l: max_isometric_force=18.4 optimal_fiber_length=0.232514 tendon_slack_length=0.0477484
        pennation_angle_at_optimal=0
      PathPoint P1: humerus_l (-0.00949 -0.01525 -0.00269)
      PathPoint P2: torso (-0.081 0.215 -0.00428)
      PathWrap: wrap_object=Chest_l method=hybrid
    Thelen2003Muscle LD_T7_l: max_isometric_force=18.4 optimal_fiber_length=0.223761 tendon_slack_length=0.045951
        pennation_angle_at_optimal=0
      PathPoint P1: humerus_l (-0.00949 -0.01525 -0.00269)
      PathPoint P2: torso (-0.09 0.235 -0.00407)
      PathWrap: wrap_object=Chest_l method=hybrid
    Thelen2003Muscle LD_R12_l: max_isometric_force=18.4 optimal_fiber_length=0.2444749 tendon_slack_length=0.0502047
        pennation_angle_at_optimal=0
      PathPoint LD_l12_l-P1: humerus_l (-0.00949 -0.01525 -0.00269)
      PathPoint LD_l12_l-P2: torso (-0.045 0.121579 -0.04427)
      PathWrap: wrap_object=Chest_l method=hybrid
    Thelen2003Muscle LD_R11_l: max_isometric_force=27.6 optimal_fiber_length=0.240735 tendon_slack_length=0.0494366
        pennation_angle_at_optimal=0
      PathPoint LD_l11_l-P1: humerus_l (-0.00949 -0.01525 -0.00433)
      PathPoint LD_l11_l-P2: torso (-0.068 0.14 -0.063)
      PathWrap: wrap_object=Chest_l method=hybrid
    Thelen2003Muscle LD_Il_l: max_isometric_force=32.2 optimal_fiber_length=0.432081 tendon_slack_length=0.0186802
        pennation_angle_at_optimal=0
      PathPoint P1: pelvis (-0.113872 0.0741306 -0.0538193)
      PathPoint P2: humerus_l (-0.00949 -0.01525 -0.00269)
      PathWrap: wrap_object=Chest_l method=hybrid
    ObjectGroup R_hip_abd: members=(glut_max1_r glut_med1_r glut_med2_r glut_med3_r glut_min1_r glut_min2_r glut_min3_r peri_r sar_r tfl_r)
    ObjectGroup R_hip_flex: members=(add_brev_r add_long_r glut_med1_r glut_min1_r grac_r iliacus_r pect_r rect_fem_r sar_r tfl_r)
    ObjectGroup R_hip_inrot: members=(glut_med1_r glut_min1_r iliacus_r tfl_r)
    ObjectGroup R_hip_exrot: members=(gem_r glut_med3_r glut_min3_r peri_r quad_fem_r)
    ObjectGroup R_hip_ext: members=(add_long_r add_mag1_r add_mag2_r add_mag3_r bifemlh_r glut_max1_r glut_max2_r glut_max3_r glut_med3_r glut_min3_r semimem_r semiten_r)
    ObjectGroup R_hip_add: members=(add_brev_r add_long_r add_mag1_r add_mag2_r add_mag3_r bifemlh_r grac_r pect_r semimem_r semiten_r)
    ObjectGroup R_knee_bend: members=(bifemlh_r bifemsh_r grac_r lat_gas_r med_gas_r sar_r semimem_r semiten_r)
    ObjectGroup R_knee_ext: members=(rect_fem_r vas_int_r vas_lat_r vas_med_r)
    ObjectGroup R_ankle_pf: members=(flex_dig_r flex_hal_r lat_gas_r med_gas_r per_brev_r per_long_r soleus_r tib_post_r)
    ObjectGroup R_inverter: members=(ext_hal_r flex_dig_r flex_hal_r tib_ant_r tib_post_r)
    ObjectGroup R_ankle_df: members=(ext_dig_r ext_hal_r per_tert_r tib_ant_r)
    ObjectGroup R_everter: members=(ext_dig_r per_brev_r per_long_r per_tert_r)
    ObjectGroup L_hip_abd: members=(glut_max1_l glut_med1_l glut_med2_l glut_med3_l glut_min1_l glut_min2_l glut_min3_l peri_l sar_l tfl_l)
    ObjectGroup L_hip_flex: members=(add_brev_l add_long_l glut_med1_l glut_min1_l grac_l iliacus_l pect_l rect_fem_l sar_l tfl_l)
    ObjectGroup L_hip_inrot: members=(glut_med1_l glut_min1_l iliacus_l tfl_l)
    ObjectGroup L_hip_exrot: members=(gem_l glut_med3_l glut_min3_l peri_l quad_fem_l)
    ObjectGroup L_hip_ext: members=(add_long_l add_mag1_l add_mag2_l add_mag3_l bifemlh_l glut_max1_l glut_max2_l glut_max3_l glut_med3_l glut_min3_l semimem_l semiten_l)
    ObjectGroup L_hip_add: members=(add_brev_l add_long_l add_mag1_l add_mag2_l add_mag3_l bifemlh_l grac_l pect_l semimem_l semiten_l)
    ObjectGroup L_knee_bend: members=(bifemlh_l bifemsh_l grac_l lat_gas_l med_gas_l sar_l semimem_l semiten_l)
    ObjectGroup L_knee_ext: members=(rect_fem_l vas_int_l vas_lat_l vas_med_l)
    ObjectGroup L_ankle_pf: members=(flex_dig_l flex_hal_l lat_gas_l med_gas_l per_brev_l per_long_l soleus_l tib_post_l)
    ObjectGroup L_inverter: members=(ext_hal_l flex_dig_l flex_hal_l tib_ant_l tib_post_l)
    ObjectGroup L_ankle_df: members=(ext_dig_l ext_hal_l per_tert_l tib_ant_l)
    ObjectGroup L_everter: members=(ext_dig_l per_brev_l per_long_l per_tert_l)
    ObjectGroup back_ext
    ObjectGroup back_rlb: members=(EO1_r EO2_r EO3_r EO4_r EO5_r EO6_r IO1_r IO2_r IO3_r IO4_r IO5_r IO6_r)
    ObjectGroup back_introt: members=(EO1_l EO2_l EO3_l EO4_l EO5_l EO6_l IO1_r IO2_r IO3_r IO4_r IO5_r IO6_r)
    ObjectGroup back_llb: members=(EO1_l EO2_l EO3_l EO4_l EO5_l EO6_l IO1_l IO2_l IO3_l IO4_l IO5_l IO6_l)
    ObjectGroup back_extrot: members=(EO1_r EO2_r EO3_r EO4_r EO5_r EO6_r IO1_l IO2_l IO3_l IO4_l IO5_l IO6_l)
    ObjectGroup back_flex: members=(EO1_l EO2_l EO3_l EO4_l EO5_l EO6_l EO1_r EO2_r EO3_r EO4_r EO5_r EO6_r IO1_l IO2_l IO3_l IO4_l IO5_l IO6_l IO1_r IO2_r IO3_r IO4_r IO5_r IO6_r)
    ObjectGroup quadratus_lumborum: members=(QL_post_I_1-L3_r QL_post_I_2-L4_r QL_post_I_2-L3_r QL_post_I_2-L2_r QL_post_I_3-L1_r QL_post_I_3-L2_r QL_post_I_3-L3_r QL_mid_L3-12_3_r QL_mid_L3-12_2_r QL_mid_L3-12_1_r QL_mid_L2-12_1_r QL_mid_L4-12_3_r QL_ant_I_2-T12_r QL_ant_I_3-T12_r QL_ant_I_2-12_1_r QL_ant_I_3-12_1_r QL_ant_I_3-12_2_r QL_ant_I_3-12_3_r QL_post_I_1-L3_l QL_post_I_2-L4_l QL_post_I_2-L3_l QL_post_I_2-L2_l QL_post_I_3-L1_l QL_post_I_3-L2_l QL_post_I_3-L3_l QL_mid_L3-12_3_l QL_mid_L3-12_2_l QL_mid_L3-12_1_l QL_mid_L2-12_1_l QL_mid_L4-12_3_l QL_ant_I_2-T12_l QL_ant_I_3-T12_l QL_ant_I_2-12_1_l QL_ant_I_3-12_1_l QL_ant_I_3-12_2_l QL_ant_I_3-12_3_l)
    ObjectGroup Psoas_major: members=(Ps_L1_L2_IVD_r Ps_L2_L3_IVD_r Ps_L3_L4_IVD_r Ps_L4_L5_IVD_r Ps_L1_L2_IVD_l Ps_L2_L3_IVD_l Ps_L3_L4_IVD_l Ps_L4_L5_IVD_l Ps_L1_TP_r Ps_L2_TP_r Ps_L3_TP_r Ps_L4_TP_r Ps_L5_TP_r Ps_L1_TP_l Ps_L2_TP_l Ps_L3_TP_l Ps_L4_TP_l Ps_L5_TP_l Ps_L1_VB_r Ps_L1_VB_l Ps_L5_VB_r Ps_L5_VB_l)
    ObjectGroup Ext_Oblique: members=(EO1_l EO2_l EO3_l EO4_l EO5_l EO6_l EO1_r EO2_r EO3_r EO4_r EO5_r EO6_r)
    ObjectGroup Int_Oblique: members=(IO1_l IO2_l IO3_l IO4_l IO5_l IO6_l IO1_r IO2_r IO3_r IO4_r IO5_r IO6_r)
    ObjectGroup Rectus_Abdominis: members=(rect_abd_r rect_abd_l)
    ObjectGroup Multifidus_spinous_process: members=(MF_m1t_1_r MF_m1t_2_r MF_m1t_3_r MF_m2t_1_r MF_m2t_2_r MF_m2t_3_r MF_m3t_1_r MF_m3t_2_r MF_m3t_3_r MF_m4t_1_r MF_m4t_2_r MF_m4t_3_r MF_m5t_1_r MF_m5t_2_r MF_m5t_3_r MF_m1t_1_l MF_m1t_2_l MF_m1t_3_l MF_m2t_1_l MF_m2t_2_l MF_m2t_3_l MF_m3t_1_l MF_m3t_2_l MF_m3t_3_l MF_m4t_1_l MF_m4t_2_l MF_m4t_3_l MF_m5t_1_l MF_m5t_2_l MF_m5t_3_l MF_m1s_r MF_m2s_r MF_m3s_r MF_m4s_r MF_m5s_r MF_m1s_l MF_m2s_l MF_m3s_l MF_m4s_l MF_m5s_l)
    ObjectGroup Multifidus_entry_level: members=(MF_m1_laminar_r MF_m2_laminar_r MF_m3_laminar_r MF_m4_laminar_r MF_m5_laminar_r MF_m1_laminar_l MF_m2_laminar_l MF_m3_laminar_l MF_m4_laminar_l MF_m5_laminar_l)
    ObjectGroup iliocostalis_lumborum_pars_lumborum: members=(IL_L4_l IL_L4_r IL_L3_l IL_L3_r IL_L2_l IL_L2_r IL_L1_l IL_L1_r)
    ObjectGroup iliocostalis_lumborum_pars_thoracis_left: members=(IL_R12_l IL_R11_l IL_R10_l IL_R9_l IL_R8_l IL_R7_l IL_R6_l IL_R5_l)
    ObjectGroup iliocostalis_lumborum_pars_thoracis_right: members=(IL_R12_r IL_R11_r IL_R10_r IL_R9_r IL_R8_r IL_R7_r IL_R6_r IL_R5_r)
    ObjectGroup longissimus_thoracis_pars_thoracis_left: members=(LTpT_R12_l LTpT_R11_l LTpT_R10_l LTpT_R9_l LTpT_R8_l LTpT_R7_l LTpT_R6_l LTpT_R5_l LTpT_R4_l LTpT_T12_l LTpT_T11_l LTpT_T10_l LTpT_T9_l LTpT_T8_l LTpT_T7_l LTpT_T6_l LTpT_T5_l LTpT_T4_l LTpT_T3_l LTpT_T2_l LTpT_T1_l)
    ObjectGroup longissimus_thoracis_pars_thoracis_right: members=(LTpT_R12_r LTpT_R11_r LTpT_R10_r LTpT_R9_r LTpT_R8_r LTpT_R7_r LTpT_R6_r LTpT_R5_r LTpT_R4_r LTpT_T12_r LTpT_T11_r LTpT_T10_r LTpT_T9_r LTpT_T8_r LTpT_T7_r LTpT_T6_r LTpT_T5_r LTpT_T4_r LTpT_T3_r LTpT_T2_r LTpT_T1_r)
    ObjectGroup longissimus_thoracis_pars_lumborum: members=(LTpL_L5_r LTpL_L4_r LTpL_L3_r LTpL_L2_r LTpL_L1_r LTpL_L5_l LTpL_L4_l LTpL_L3_l LTpL_L2_l LTpL_L1_l)
    ObjectGroup Latissimus Dorsi: members=(LD_Il_l LD_Il_r LD_T7_l LD_T8_l LD_T9_l LD_T10_l LD_T11_l LD_T12_l LD_R11_l LD_R12_l LD_L1_l LD_L2_l LD_L3_l LD_L4_l LD_L5_l LD_T7_r LD_T8_r LD_T9_r LD_T10_r LD_T11_r LD_T12_r LD_R11_r LD_R12_r LD_L1_r LD_L2_r LD_L3_r LD_L4_r LD_L5_r)
  MarkerSet:
    Marker LFHD: torso (0.06 0.6 -0.06)
    Marker RFHD: torso (0.06 0.6 0.06)
    Marker RBHD: torso (-0.06 0.6 0.06)
    Marker LBHD: torso (-0.06 0.6 -0.06)
    Marker C7: torso (-0.076 0.42 0)
    Marker LSHO: torso (0.0104336 0.429191 -0.139243)
    Marker RSHO: torso (0.0104336 0.429191 0.139243)
    Marker CLAV: torso (0.04 0.38 0)
    Marker STRN: torso (0.14821 0.155452 0)
    Marker RBAK: torso (-0.107606 0.304523 0.0639499)
    Marker T10: torso (-0.0701565 0.122 0)
    Marker RUPA: humerus_r (-0.0244734 -0.185858 -0.000294775)
    Marker LUPA: humerus_l (0.0292358 -0.100445 -0.0485513)
    Marker RELB: humerus_r (-0.0121811 -0.277276 0.0153499)
    Marker LELB: humerus_l (-0.0121811 -0.277276 -0.0153499)
    Marker LFRA: ulna_l (-0.0138829 -0.187279 -0.0762662)
    Marker RFRA: ulna_r (-0.0493043 -0.0665916 0.0266366)
    Marker RWRB: radius_r (-0.01531 -0.23272 -0.01839)
    Marker RWRA: radius_r (-0.00316 -0.22312 0.04988)
    Marker RFIN: hand_r (-0.0145825 -0.0909839 0.0131376)
    Marker LWRB: radius_l (-0.01531 -0.23272 0.01839)
    Marker LWRA: radius_l (-0.00316 -0.22312 -0.04988)
    Marker LFIN: hand_l (-0.0145825 -0.0909839 -0.0131376)
    Marker RGTR: femur_r (-0.0184789 -0.0239877 0.0980029)
    Marker LGTR: femur_l (-0.0184789 -0.0239877 -0.0981293)
    Marker RASI: pelvis (0.0114978 0.0197974 0.128)
    Marker LASI: pelvis (0.0114978 0.0197974 -0.128)
    Marker RPSI: pelvis (-0.156069 0.0394098 0.0553998)
    Marker LPSI: pelvis (-0.156069 0.039541 -0.0553998)
    Marker RANK: tibia_r (-0.005 -0.41 0.053)
    Marker LANK: tibia_l (-0.005 -0.41 -0.053)
    Marker LMMA: tibia_l (0.006 -0.3888 0.038)
    Marker LHEE: calcn_l (-0.0226731 0.0281286 0.00680222)
    Marker LTOE: calcn_l (0.186453 0.031901 -0.00286075)
    Marker RMMA: tibia_r (0.006 -0.3888 -0.038)
    Marker RHEE: calcn_r (-0.0226731 0.0281286 -0.00680222)
    Marker RTOE: calcn_r (0.186453 0.031901 0.00286075)
    Marker RMT5: calcn_r (0.137511 0.00714725 0.0600217)
    Marker LMT5: calcn_l (0.137511 0.00714725 -0.0600217)
    Marker RKNE: femur_r (0.0157499 -0.404039 0.0498872)
    Marker LKNE: femur_l (0.0157499 -0.404039 -0.0498872)
    Marker LMFC: femur_l (0.00464751 -0.405541 0.0487303)
    Marker RMFC: femur_r (0.00464751 -0.405541 -0.0487303)
    Marker RMTP: tibia_r (0.0118607 -0.0474418 -0.0489832)
    Marker LMTP: tibia_l (0.0118607 -0.0474418 0.0489832)
    Marker RLTP: tibia_r (0.0129558 -0.0454298 0.0440089)
    Marker LLTP: tibia_l (0.0129558 -0.0454298 -0.0440089)
    Marker RFP1: femur_r (0.00922578 -0.121377 0.089915)
    Marker RFP2: femur_r (0.0327205 -0.220854 0.082814)
    Marker RFP3: femur_r (0.0275439 -0.314501 0.0744594)
    Marker RFM1: femur_r (0.0651213 -0.0777241 0.0531782)
    Marker RFM2: femur_r (0.0726932 -0.162156 0.0491651)
    Marker RFM3: femur_r (0.0766183 -0.263629 0.0383825)
    Marker RFA1: femur_r (0.0950528 -0.124355 -0.0025311)
    Marker RFA2: femur_r (0.0955761 -0.215921 -0.00976613)
    Marker RFA3: femur_r (0.0907802 -0.317889 -0.00988659)
    Marker LFP1: femur_l (0.00922578 -0.121377 -0.089915)
    Marker LFP2: femur_l (0.0327205 -0.220854 -0.082814)
    Marker LFP3: femur_l (0.0275439 -0.314501 -0.0744594)
    Marker LFM1: femur_l (0.0651213 -0.0777241 -0.0531782)
    Marker LFM2: femur_l (0.0726932 -0.162156 -0.0491651)
    Marker LFM3: femur_l (0.0766183 -0.263629 -0.0383825)
    Marker LFA1: femur_l (0.0955284 -0.124355 0.0025311)
    Marker LFA2: femur_l (0.0955761 -0.215921 0.00976613)
    Marker LFA3: femur_l (0.0907802 -0.317889 0.00988659)
    Marker RTP1: tibia_r (0.0213102 -0.138827 0.0486124)
    Marker RTP2: tibia_r (0.0186602 -0.21186 0.0445987)
    Marker RTP3: tibia_r (0.0148782 -0.305718 0.0382921)
    Marker RTA1: tibia_r (0.0509128 -0.0899375 -0.00770593)
    Marker RTA2: tibia_r (0.0405929 -0.168595 -0.00619357)
    Marker RTA3: tibia_r (0.0358136 -0.258899 -0.00721498)
    Marker LTP1: tibia_l (0.0213102 -0.138827 -0.0486124)
    Marker LTP2: tibia_l (0.0186602 -0.21186 -0.0445987)
    Marker LTP3: tibia_l (0.0148782 -0.305718 -0.0382921)
    Marker LTA1: tibia_l (0.0509128 -0.0899375 0.00770593)
    Marker LTA2: tibia_l (0.0405929 -0.168595 0.00619357)
    Marker LTA3: tibia_l (0.0358136 -0.258899 0.00721498)
