# OpenSim document version 40000
InverseKinematicsTool TODO-subject-name:
  model_file: rescaled.osim
  marker_file: JA1Gait35.trc
  output_motion_file: JA1Gait35_ik_by_opensim.mot
  accuracy: 1e-5
  report_errors: true
  IKTaskSet IK_tasks:
    IKMarkerTask C7: weight=1 apply=true
    IKMarkerTask LAJC: weight=1 apply=true
    IKMarkerTask LARM: weight=1 apply=true
    IKMarkerTask LASI: weight=1 apply=true
    IKMarkerTask LELB: weight=1 apply=true
    IKMarkerTask LFOREARM: weight=1 apply=true
    IKMarkerTask LHEEL: weight=1 apply=true
    IKMarkerTask LHJC: weight=1 apply=true
    IKMarkerTask LKJC: weight=1 apply=true
    IKMarkerTask LLEPI: weight=1 apply=true
    IKMarkerTask LLMAL: weight=1 apply=true
    IKMarkerTask LMEPI: weight=1 apply=true
    IKMarkerTask LMFL: weight=1 apply=true
    IKMarkerTask LMFS: weight=1 apply=true
    IKMarkerTask LMMAL: weight=1 apply=true
    IKMarkerTask LP1MT: weight=1 apply=true
    IKMarkerTask LP5MT: weight=1 apply=true
    IKMarkerTask LSH: weight=1 apply=true
    IKMarkerTask LTHAD: weight=1 apply=true
    IKMarkerTask LTHAP: weight=1 apply=true
    IKMarkerTask LTHLD: weight=1 apply=true
    IKMarkerTask LTHLP: weight=1 apply=true
    IKMarkerTask LTIAD: weight=1 apply=true
    IKMarkerTask LTIAP: weight=1 apply=true
    IKMarkerTask LTILAT: weight=1 apply=true
    IKMarkerTask LTOE: weight=1 apply=true
    IKMarkerTask LWR: weight=1 apply=true
    IKMarkerTask MAN: weight=1 apply=true
    IKMarkerTask RAJC: weight=1 apply=true
    IKMarkerTask RARM: weight=1 apply=true
    IKMarkerTask RASI: weight=1 apply=true
    IKMarkerTask RELB: weight=1 apply=true
    IKMarkerTask RFOREARM: weight=1 apply=true
    IKMarkerTask RHEEL: weight=1 apply=true
    IKMarkerTask RHJC: weight=1 apply=true
    IKMarkerTask RHJC_pelvisX_projection: weight=1 apply=true
    IKMarkerTask RHJC_pelvisY_projection: weight=1 apply=true
    IKMarkerTask RHJC_pelvisZ_projection: weight=1 apply=true
    IKMarkerTask RKJC: weight=1 apply=true
    IKMarkerTask RLEPI: weight=1 apply=true
    IKMarkerTask RLMAL: weight=1 apply=true
    IKMarkerTask RMEPI: weight=1 apply=true
    IKMarkerTask RMFL: weight=1 apply=true
    IKMarkerTask RMFS: weight=1 apply=true
    IKMarkerTask RMMAL: weight=1 apply=true
    IKMarkerTask RP1MT: weight=1 apply=true
    IKMarkerTask RP5MT: weight=1 apply=true
    IKMarkerTask RSH: weight=1 apply=true
    IKMarkerTask RTHAD: weight=1 apply=true
    IKMarkerTask RTHAP: weight=1 apply=true
    IKMarkerTask RTHLD: weight=1 apply=true
    IKMarkerTask RTHLP: weight=1 apply=true
    IKMarkerTask RTIAD: weight=1 apply=true
    IKMarkerTask RTIAP: weight=1 apply=true
    IKMarkerTask RTILAT: weight=1 apply=true
    IKMarkerTask RTOE: weight=1 apply=true
    IKMarkerTask RWR: weight=1 apply=true
    IKMarkerTask SACR: weight=1 apply=true
    IKMarkerTask T7: weight=1 apply=true
    IKMarkerTask hara_LHJC: weight=1 apply=true
    IKMarkerTask hara_RHJC: weight=1 apply=true
    IKMarkerTask hara_RHJC_pelvisX_projection: weight=1 apply=true
    IKMarkerTask hara_RHJC_pelvisY_projection: weight=1 apply=true
    IKMarkerTask hara_RHJC_pelvisZ_projection: weight=1 apply=true
    IKMarkerTask mid_ASIS: weight=1 apply=true
    IKMarkerTask mid_HJC: weight=1 apply=true
    IKMarkerTask mid_LEPI: weight=1 apply=true
    IKMarkerTask mid_LEPI_femurX_projection: weight=1 apply=true
    IKMarkerTask mid_LEPI_femurY_projection: weight=1 apply=true
    IKMarkerTask mid_LEPI_femurZ_projection: weight=1 apply=true
    IKMarkerTask mid_LMAL: weight=1 apply=true
    IKMarkerTask mid_REPI: weight=1 apply=true
    IKMarkerTask mid_REPI_femurX_projection: weight=1 apply=true
    IKMarkerTask mid_REPI_femurY_projection: weight=1 apply=true
    IKMarkerTask mid_REPI_femurZ_projection: weight=1 apply=true
    IKMarkerTask mid_RMAL: weight=1 apply=true
    IKMarkerTask mid_SH: weight=1 apply=true
