# OpenSim document version 40000
InverseKinematicsTool:
  results_directory: ./
  model_file: D:\Dropbox (GaTech)\PAPERS\AmbulationBiomechanics\PAPER\SubmissionJBiom\Review\CODE\DATA\SPLIT\AB06\osimxml\AB06.osim
  constraint_weight: Inf
  accuracy: 1e-5
  report_errors: false
  report_marker_locations: false
  IKTaskSet:
    IKMarkerTask R_ASIS: apply=true weight=300
    IKMarkerTask L_ASIS: apply=true weight=300
    IKMarkerTask L_PSIS: apply=true weight=300
    IKMarkerTask R_Thigh_Upper: apply=true weight=1
    IKMarkerTask R_Thigh_Front: apply=true weight=1
    IKMarkerTask R_Thigh_Rear: apply=true weight=1
    IKMarkerTask R_Knee_Lat: apply=true weight=300
    IKMarkerTask R_Knee_Med: apply=false weight=300
    IKMarkerTask R_Shank_Upper: apply=true weight=1
    IKMarkerTask R_Shank_Front: apply=true weight=1
    IKMarkerTask R_Shank_Rear: apply=true weight=1
    IKMarkerTask R_Ankle_Lat: apply=true weight=300
    IKMarkerTask R_Ankle_Med: apply=false weight=300
    IKMarkerTask R_Heel: apply=true weight=300
    IKMarkerTask R_Toe_Lat: apply=true weight=100
    IKMarkerTask R_Toe_Med: apply=true weight=100
    IKMarkerTask R_Toe_Tip: apply=true weight=300
    IKMarkerTask L_Thigh_Upper: apply=true weight=1
    IKMarkerTask L_Thigh_Front: apply=true weight=1
    IKMarkerTask L_Thigh_Rear: apply=true weight=1
    IKMarkerTask L_Knee_Lat: apply=true weight=300
    IKMarkerTask L_Knee_Med: apply=false weight=300
    IKMarkerTask L_Shank_Upper: apply=true weight=1
    IKMarkerTask L_Shank_Front: apply=true weight=1
    IKMarkerTask L_Shank_Rear: apply=true weight=1
    IKMarkerTask L_Ankle_Lat: apply=true weight=300
    IKMarkerTask L_Ankle_Med: apply=false weight=300
    IKMarkerTask L_Heel: apply=true weight=300
    IKMarkerTask L_Toe_Lat: apply=true weight=100
    IKMarkerTask L_Toe_Med: apply=true weight=100
    IKMarkerTask L_Toe_Tip: apply=true weight=300
    IKMarkerTask R_PSIS: apply=true weight=50
