# OpenSim document version 40000
Model optimized_scale_and_markers:
  gravity: 0 -9.81 0
  length_units: meters
  force_units: N
  Ground
  BodySet:
    Body pelvis: mass=17.95 [kg] mass_center=(-0.0705 -0.0242 0) inertia=(0.1758 0.2233 0.1617 0 0 0)
        meshes=(r_pelvis.vtp l_pelvis.vtp sacrum.vtp)
      WrapCylinder Gmax1_at_pelvis_r: xyz_body_rotation=(-0.6 0.45 0) translation=(-0.089566 -0.08958905 0.07102065)
          quadrant=-x radius=0.04288783 length=0.1654318
      WrapCylinder Gmax2_at_pelvis_r: xyz_body_rotation=(-0.75 0.39 0) translation=(-0.09305559 -0.07511001 0.07917056)
          quadrant=all radius=0.04362632 length=0.1068587
      WrapCylinder Gmax3_at_pelvis_r: xyz_body_rotation=(-0.1 0 0) translation=(-0.09654517 -0.07963471 0.07917056)
          quadrant=all radius=0.0414217 length=0.1161974
      WrapCylinder Gmax1_at_pelvis_l: xyz_body_rotation=(0.6 -0.45 0) translation=(-0.089566 -0.08958905 -0.07102065)
          quadrant=-x radius=0.04288783 length=0.1654318
      WrapCylinder Gmax2_at_pelvis_l: xyz_body_rotation=(0.75 -0.39 0)
          translation=(-0.09305559 -0.07511001 -0.07917056) quadrant=all radius=0.04362632 length=0.1068587
      WrapCylinder Gmax3_at_pelvis_l: xyz_body_rotation=(0.1 0 0) translation=(-0.09654517 -0.07963471 -0.07917056)
          quadrant=all radius=0.0414217 length=0.1161974
      WrapCylinder PS_at_brim_r: xyz_body_rotation=(-0.25 -0.27 0.1) translation=(-0.08607642 -0.05429639 0.07637631)
          quadrant=-y radius=0.05216146 length=0.1151019
      WrapCylinder PS_at_brim_l: xyz_body_rotation=(0.25 0.27 0.1) translation=(-0.08607642 -0.05429639 -0.07637631)
          quadrant=-y radius=0.05216146 length=0.1151019
      WrapCylinder IL_at_brim_r: xyz_body_rotation=(-0.32 -0.24 0.9) translation=(-0.08258683 -0.05882109 0.08801904)
          quadrant=-y radius=0.05782006 length=0.1142493
      WrapCylinder IL_at_brim_l: xyz_body_rotation=(0.32 0.24 0.9) translation=(-0.08258683 -0.05882109 -0.08801904)
          quadrant=-y radius=0.05782006 length=0.1142493
    Body femur_l: mass=5.45 mass_center=(-0.0088 -0.1933 0.0122) inertia=(0.0529 0.016 0.0529 0 0 0) meshes=l_femur.vtp
      WrapCylinder GasLat_at_condyles_l: translation=(0.00582442 -0.3950354 0) quadrant=all radius=0.02766901
          length=0.1383916
      WrapCylinder GasMed_at_condyles_l: translation=(0.00582442 -0.3950354 0) quadrant=all radius=0.02660481
          length=0.1383916
      WrapCylinder KnExt_at_fem_l: xyz_body_rotation=(0.0623366 -0.0507601 0)
          translation=(0.00417993 -0.3880327 -0.002893921) quadrant=all radius=0.02663729 length=0.1382015
      WrapCylinder KnExtVL_at_fem_l: xyz_body_rotation=(0.0623366 -0.0507601 0)
          translation=(0.002199627 -0.3880327 -0.002893921) quadrant=all radius=0.02663729 length=0.1382015
      WrapCylinder AB_at_femshaft_l: xyz_body_rotation=(-1.66157 -0.186644 0)
          translation=(0.01705786 -0.1084854 -0.0323352) quadrant=all radius=0.02095199 length=0.06826071
      WrapCylinder AL_at_femshaft_l: xyz_body_rotation=(-1.77711 -0.136489 0)
          translation=(0.03580003 -0.2234446 -0.02091609) quadrant=all radius=0.02543328 length=0.09883914
      WrapCylinder AMprox_at_femshaft_l: xyz_body_rotation=(-1.61126 -0.18656 0)
          translation=(0.006037582 -0.07023422 -0.03515562) quadrant=all radius=0.02681698 length=0.06803479
      WrapCylinder AMmid_at_femshaft_l: xyz_body_rotation=(-1.61139 -0.13656 0)
          translation=(0.02680689 -0.1548452 -0.02848681) quadrant=all radius=0.02722948 length=0.1162126
      WrapCylinder AMdist_at_femshaft_l: xyz_body_rotation=(-1.71188 -0.186636 0)
          translation=(0.03681791 -0.2512194 -0.01295982) quadrant=all radius=0.02763881 length=0.1961564
      WrapCylinder AMisch_at_condyles_l: xyz_body_rotation=(-1.71115 0.463363 0)
          translation=(-0.02638591 -0.3630771 0.004365383) quadrant=all radius=0.05012324 length=0.2435043
    Body femur_r: mass=5.45 mass_center=(-0.0088 -0.1933 0.0122) inertia=(0.0529 0.016 0.0529 0 0 0) meshes=r_femur.vtp
      WrapCylinder GasLat_at_condyles_r: translation=(0.00582442 -0.3950354 0) quadrant=all radius=0.02766901
          length=0.1383916
      WrapCylinder GasMed_at_condyles_r: translation=(0.00582442 -0.3950354 0) quadrant=all radius=0.02660481
          length=0.1383916
      WrapCylinder KnExt_at_fem_r: xyz_body_rotation=(-0.0623366 0.0507601 0)
          translation=(0.00417993 -0.3880327 0.002893921) quadrant=all radius=0.02663729 length=0.1382015
      WrapCylinder KnExtVL_at_fem_r: xyz_body_rotation=(-0.0623366 0.0507601 0)
          translation=(0.002199627 -0.3880327 0.002893921) quadrant=all radius=0.02663729 length=0.1382015
      WrapCylinder AB_at_femshaft_r: xyz_body_rotation=(1.66157 0.186644 0)
          translation=(0.01705786 -0.1084854 0.0323352) quadrant=all radius=0.02095199 length=0.06826071
      WrapCylinder AL_at_femshaft_r: xyz_body_rotation=(1.77711 0.136489 0)
          translation=(0.03580003 -0.2234446 0.02091609) quadrant=all radius=0.02543328 length=0.09883914
      WrapCylinder AMprox_at_femshaft_r: xyz_body_rotation=(1.61126 0.18656 0)
          translation=(0.006037582 -0.07023422 0.03515562) quadrant=all radius=0.02681698 length=0.06803479
      WrapCylinder AMmid_at_femshaft_r: xyz_body_rotation=(1.61139 0.13656 0)
          translation=(0.02680689 -0.1548452 0.02848681) quadrant=all radius=0.02722948 length=0.1162126
      WrapCylinder AMdist_at_femshaft_r: xyz_body_rotation=(1.71188 0.186636 0)
          translation=(0.03681791 -0.2512194 0.01295982) quadrant=all radius=0.02763881 length=0.1961564
      WrapCylinder AMisch_at_condyles_r: xyz_body_rotation=(1.71115 -0.463363 0)
          translation=(-0.02638591 -0.3630771 -0.004365383) quadrant=all radius=0.05012324 length=0.2435043
    Body tibia_l: mass=4.09 mass_center=(-0.0048 -0.1819 0.0122) inertia=(0.0475 0.0044 0.0475 0 0 0)
        meshes=(l_tibia.vtp l_fibula.vtp)
      WrapCylinder GasLat_at_shank_l: xyz_body_rotation=(-2.96723 0.279725 -1.47812)
          translation=(-0.008817677 -0.07267992 0.00406025) quadrant=-y radius=0.06009618 length=0.1221229
      WrapCylinder GasMed_at_shank_l: xyz_body_rotation=(-2.96723 -0.0279725 -1.47812)
          translation=(-0.008817677 -0.07267992 0.00406025) quadrant=-y radius=0.06438138 length=0.1223619
      WrapCylinder GR_at_condyles_l: xyz_body_rotation=(0 0.4 0) translation=(-0.003574734 -0.01964322 0) quadrant=all
          radius=0.03923467 length=0.1224574
      WrapCylinder SM_at_condyles_l: xyz_body_rotation=(0 0.1 0) translation=(-0.001191578 -0.01964322 0) quadrant=all
          radius=0.03750378 length=0.1229998
      WrapCylinder ST_at_condyles_l: xyz_body_rotation=(0 0.2 0) translation=(-0.002383156 -0.0201343 0) quadrant=all
          radius=0.04622501 length=0.1228871
      WrapCylinder BF140_at_gastroc_l: translation=(-0.04647154 -0.05892967 0) quadrant=all radius=0.03151922
          length=0.1845568
    Body tibia_r: mass=4.09 mass_center=(-0.0048 -0.1819 0.0122) inertia=(0.0475 0.0044 0.0475 0 0 0)
        meshes=(r_tibia.vtp r_fibula.vtp)
      WrapCylinder GasLat_at_shank_r: xyz_body_rotation=(2.96723 -0.279725 -1.47812)
          translation=(-0.008817677 -0.07267992 -0.00406025) quadrant=-y radius=0.06009618 length=0.1221229
      WrapCylinder GasMed_at_shank_r: xyz_body_rotation=(2.96723 0.0279725 -1.47812)
          translation=(-0.008817677 -0.07267992 -0.00406025) quadrant=-y radius=0.06438138 length=0.1223619
      WrapCylinder GR_at_condyles_r: xyz_body_rotation=(0 -0.4 0) translation=(-0.003574734 -0.01964322 0) quadrant=all
          radius=0.03923467 length=0.1224574
      WrapCylinder SM_at_condyles_r: xyz_body_rotation=(0 -0.1 0) translation=(-0.001191578 -0.01964322 0) quadrant=all
          radius=0.03750378 length=0.1229998
      WrapCylinder ST_at_condyles_r: xyz_body_rotation=(0 -0.2 0) translation=(-0.002383156 -0.0201343 0) quadrant=all
          radius=0.04622501 length=0.1228871
      WrapCylinder BF140_at_gastroc_r: translation=(-0.04647154 -0.05892967 0) quadrant=y radius=0.03151922
          length=0.1845568
    Body patella_l: mass=0.06190015 mass_center=(0.0018 0.0264 0) inertia=(2.060945e-6 9.414281e-6 9.414281e-6 0 0 0)
        meshes=l_patella.vtp
    Body patella_r: mass=0.06190015 mass_center=(0.0018 0.0264 0) inertia=(2.060945e-6 9.414281e-6 9.414281e-6 0 0 0)
        meshes=r_patella.vtp
    Body talus_l: mass=0.1 mass_center=(0 0 0) inertia=(0.001 0.001 0.001 0 0 0) meshes=l_talus.vtp
    Body talus_r: mass=0.1 mass_center=(0 0 0) inertia=(0.001 0.001 0.001 0 0 0) meshes=r_talus.vtp
    Body calcn_l: mass=1.25 mass_center=(0.1 0.03 0) inertia=(0.0014 0.0039 0.0041 0 0 0) meshes=l_foot.vtp
    Body calcn_r: mass=1.25 mass_center=(0.1 0.03 0) inertia=(0.0014 0.0039 0.0041 0 0 0) meshes=r_foot.vtp
    Body toes_l: mass=0.2166 mass_center=(0.0346 0.006 0.0175) inertia=(0.0001 0.0002 0.001 0 0 0) meshes=l_bofoot.vtp
    Body toes_r: mass=0.2166 mass_center=(0.0346 0.006 0.0175) inertia=(0.0001 0.0002 0.001 0 0 0) meshes=r_bofoot.vtp
    Body torso: mass=25.23 mass_center=(0.0293 0.2016 0) inertia=(0.5277 0.2557 0.5047 0 0 0)
        meshes=(hat_spine.vtp hat_jaw.vtp hat_skull.vtp hat_ribs_scap.vtp)
      WrapEllipsoid upperribcage: xyz_body_rotation=(0 0 0.25) translation=(0 0.2012697 0) quadrant=+y
          dimensions=(0.1114831 0.2117765 0.1582255)
    Body humerus_r: mass=2.0325 mass_center=(0 -0.164502 0) inertia=(0.011946 0.004121 0.013409 0 0 0)
        meshes=humerus_rv.vtp
      WrapSphere shoulder_r: translation=(0 0 0) quadrant=all radius=0.01927954
      WrapCylinder elbow_ant_r: xyz_body_rotation=(0 0.35 0) translation=(0.004339668 -0.3097237 0) quadrant=+x
          radius=0.01980106 length=0.04560577
    Body ulna_r: mass=0.6075 mass_center=(0 -0.120525 0) inertia=(0.002962 0.000618 0.003213 0 0 0) meshes=ulna_rv.vtp
      WrapCylinder elbow_pos_r: xyz_body_rotation=(0 0 0.5) translation=(0 0 0) quadrant=+y radius=0.02726624
          length=0.04762992
    Body radius_r: mass=0.6075 mass_center=(0 -0.120525 0) inertia=(0.002962 0.000618 0.003213 0 0 0)
        meshes=radius_rv.vtp
    Body hand_r: mass=0.4575 mass_center=(0 -0.068095 0) inertia=(0.000892 0.000547 0.00134 0 0 0)
        meshes=(pisiform_rvs.vtp lunate_rvs.vtp scaphoid_rvs.vtp triquetrum_rvs.vtp hamate_rvs.vtp capitate_rvs.vtp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)
    Body humerus_l: mass=2.0325 mass_center=(0 -0.164502 0) inertia=(0.011946 0.004121 0.013409 0 0 0)
        meshes=humerus_lv.vtp
      WrapSphere shoulder_l: translation=(0 0 0) quadrant=all radius=0.01927954
      WrapCylinder elbow_ant_l: xyz_body_rotation=(0 -0.35 0) translation=(0.004339668 -0.3097237 0) quadrant=+x
          radius=0.01980106 length=0.04560577
    Body ulna_l: mass=0.6075 mass_center=(0 -0.120525 0) inertia=(0.002962 0.000618 0.003213 0 0 0) meshes=ulna_lv.vtp
      WrapCylinder elbow_pos_l: xyz_body_rotation=(0 0 0.5) translation=(0 0 0) quadrant=+y radius=0.02726624
          length=0.04762992
    Body radius_l: mass=0.6075 mass_center=(0 -0.120525 0) inertia=(0.002962 0.000618 0.003213 0 0 0)
        meshes=radius_lv.vtp
    Body hand_l: mass=0.4575 mass_center=(0 -0.068095 0) inertia=(0.000892 0.000547 0.00134 0 0 0)
        meshes=(pisiform_lvs.vtp lunate_lvs.vtp scaphoid_lvs.vtp triquetrum_lvs.vtp hamate_lvs.vtp capitate_lvs.vtp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)
  JointSet:
    CustomJoint groundPelvis: socket_parent_frame=ground_offset socket_child_frame=pelvis_offset
      Coordinate pelvis_tilt: range=(-3.141593 3.141593)
      Coordinate pelvis_list: range=(-3.141593 3.141593)
      Coordinate pelvis_rotation: range=(-3.141593 3.141593)
      Coordinate pelvis_tx: range=(-5 5)
      Coordinate pelvis_ty: default_value=0.94 range=(-3 3)
      Coordinate pelvis_tz: default_value=0 range=(-3 3)
      PhysicalOffsetFrame ground_offset: socket_parent=/ground translation=(0 0 0) [meters]
      PhysicalOffsetFrame pelvis_offset: socket_parent=/bodyset/pelvis translation=(0 0 0)
      SpatialTransform:
        TransformAxis rotation1: coordinates=pelvis_tilt axis=(0 0 1) LinearFunction(coefficients=1 0)
        TransformAxis rotation2: coordinates=pelvis_list axis=(1 0 0) LinearFunction(coefficients=1 0)
        TransformAxis rotation3: coordinates=pelvis_rotation axis=(0 1 0) LinearFunction(coefficients=1 0)
        TransformAxis translation1: coordinates=pelvis_tx axis=(1 0 0) LinearFunction(coefficients=1 0)
        TransformAxis translation2: coordinates=pelvis_ty axis=(0 1 0) LinearFunction(coefficients=1 0)
        TransformAxis translation3: coordinates=pelvis_tz axis=(0 0 1) LinearFunction(coefficients=1 0)
    CustomJoint hip_l: socket_parent_frame=pelvis_offset socket_child_frame=femur_l_offset
      Coordinate hip_flexion_l: default_value=0 range=(-0.5235988 2.094395)
      Coordinate hip_adduction_l: range=(-0.8726646 0.5235988)
      Coordinate hip_rotation_l: range=(-0.6981317 0.6981317)
      PhysicalOffsetFrame pelvis_offset: socket_parent=/bodyset/pelvis
          translation=(-0.06545995 -0.07102873 -0.08995173)
      PhysicalOffsetFrame femur_l_offset: socket_parent=/bodyset/femur_l translation=(0 0 0)
      SpatialTransform: axes_held_at_zero=(translation1 translation2 translation3)
        TransformAxis rotation1: coordinates=hip_flexion_l axis=(0 0 1) LinearFunction(coefficients=1 0)
        TransformAxis rotation2: coordinates=hip_adduction_l axis=(1 0 0) LinearFunction(coefficients=-1 0)
        TransformAxis rotation3: coordinates=hip_rotation_l axis=(0 1 0) LinearFunction(coefficients=-1 0)
    CustomJoint hip_r: socket_parent_frame=pelvis_offset socket_child_frame=femur_r_offset
      Coordinate hip_flexion_r: default_value=0 range=(-0.5235988 2.094395)
      Coordinate hip_adduction_r: range=(-0.8726646 0.5235988)
      Coordinate hip_rotation_r: range=(-0.6981317 0.6981317)
      PhysicalOffsetFrame pelvis_offset: socket_parent=/bodyset/pelvis translation=(-0.06545995 -0.07102873 0.08995173)
      PhysicalOffsetFrame femur_r_offset: socket_parent=/bodyset/femur_r translation=(0 0 0)
      SpatialTransform: axes_held_at_zero=(translation1 translation2 translation3)
        TransformAxis rotation1: coordinates=hip_flexion_r axis=(0 0 1) LinearFunction(coefficients=1 0)
        TransformAxis rotation2: coordinates=hip_adduction_r axis=(1 0 0) LinearFunction(coefficients=1 0)
        TransformAxis rotation3: coordinates=hip_rotation_r axis=(0 1 0) LinearFunction(coefficients=1 0)
    CustomJoint patellofemoral_l: socket_parent_frame=tibia_l_offset socket_child_frame=patella_l_offset
      Coordinate knee_angle_l_beta
      PhysicalOffsetFrame tibia_l_offset: socket_parent=/bodyset/femur_l
          translation=(-0.009423912 -0.3930699 0.003805769)
      PhysicalOffsetFrame patella_l_offset: socket_parent=/bodyset/patella_l translation=(0 0 0)
      SpatialTransform: axes_held_at_zero=(rotation2 rotation3)
        TransformAxis rotation1: coordinates=knee_angle_l_beta axis=(0 0 1)
          SimmSpline: x=(0 0.174533 0.349066 0.523599 0.698132 0.872665 1.0472 1.22173 1.39626 1.5708 1.74533 1.91986 2.0944)
              y=(0.00113686 -0.00629212 -0.105582 -0.253683 -0.414245 -0.579047 -0.747244 -0.91799 -1.09044 -1.26379 -1.43763 -1.61186 -1.78634)
        TransformAxis translation1: coordinates=knee_angle_l_beta axis=(1 0 0)
          MultiplierFunction: scale=1.164884
            SimmSpline: x=(0 0.174533 0.349066 0.523599 0.698132 0.872665 1.0472 1.22173 1.39626 1.5708 1.74533 1.91986 2.0944)
                y=(0.0524 0.0488 0.0437 0.0371 0.0296 0.0216 0.0136 0.0057 -0.0019 -0.0088 -0.0148 -0.0196 -0.0227)
        TransformAxis translation2: coordinates=knee_angle_l_beta axis=(0 1 0)
          MultiplierFunction: scale=0.963501
            SimmSpline: x=(0 0.174533 0.349066 0.523599 0.698132 0.872665 1.0472 1.22173 1.39626 1.5708 1.74533 1.91986 2.0944)
                y=(-0.0108 -0.019 -0.0263 -0.0322 -0.0367 -0.0395 -0.0408 -0.0404 -0.0384 -0.0349 -0.0301 -0.0245 -0.0187)
        TransformAxis translation3: axis=(0 0 1) MultiplierFunction(scale=1.383916, Constant(value=-0.00275))
    CustomJoint patellofemoral_r: socket_parent_frame=tibia_r_offset socket_child_frame=patella_r_offset
      Coordinate knee_angle_r_beta
      PhysicalOffsetFrame tibia_r_offset: socket_parent=/bodyset/femur_r
          translation=(-0.009423912 -0.3930699 -0.003805769)
      PhysicalOffsetFrame patella_r_offset: socket_parent=/bodyset/patella_r translation=(0 0 0)
      SpatialTransform: axes_held_at_zero=(rotation2 rotation3)
        TransformAxis rotation1: coordinates=knee_angle_r_beta axis=(0 0 1)
          SimmSpline: x=(0 0.174533 0.349066 0.523599 0.698132 0.872665 1.0472 1.22173 1.39626 1.5708 1.74533 1.91986 2.0944)
              y=(0.00113686 -0.00629212 -0.105582 -0.253683 -0.414245 -0.579047 -0.747244 -0.91799 -1.09044 -1.26379 -1.43763 -1.61186 -1.78634)
        TransformAxis translation1: coordinates=knee_angle_r_beta axis=(1 0 0)
          MultiplierFunction: scale=1.164884
            SimmSpline: x=(0 0.174533 0.349066 0.523599 0.698132 0.872665 1.0472 1.22173 1.39626 1.5708 1.74533 1.91986 2.0944)
                y=(0.0524 0.0488 0.0437 0.0371 0.0296 0.0216 0.0136 0.0057 -0.0019 -0.0088 -0.0148 -0.0196 -0.0227)
        TransformAxis translation2: coordinates=knee_angle_r_beta axis=(0 1 0)
          MultiplierFunction: scale=0.963501
            SimmSpline: x=(0 0.174533 0.349066 0.523599 0.698132 0.872665 1.0472 1.22173 1.39626 1.5708 1.74533 1.91986 2.0944)
                y=(-0.0108 -0.019 -0.0263 -0.0322 -0.0367 -0.0395 -0.0408 -0.0404 -0.0384 -0.0349 -0.0301 -0.0245 -0.0187)
        TransformAxis translation3: axis=(0 0 1) MultiplierFunction(scale=1.383916, Constant(value=0.00275))
    CustomJoint knee_l: socket_parent_frame=femur_l_offset socket_child_frame=tibia_l_offset
      Coordinate knee_angle_l: default_value=0 range=(-2.094395 0)
      Coordinate knee_adduction_l: range=(-0.5235988 0.5235988)
      Coordinate knee_rotation_l: range=(-0.5235988 0.5235988)
      SpatialTransform: axes_held_at_zero=(translation1 translation2 translation3)
        TransformAxis rotation1: coordinates=knee_angle_l axis=(0 0 1) LinearFunction(coefficients=1 0)
        TransformAxis rotation2: coordinates=knee_adduction_l axis=(1 0 0) LinearFunction(coefficients=1 0)
        TransformAxis rotation3: coordinates=knee_rotation_l axis=(0 1 0) LinearFunction(coefficients=1 0)
      PhysicalOffsetFrame femur_l_offset: socket_parent=/bodyset/femur_l translation=(0 -0.3930699 -0.003805769)
      PhysicalOffsetFrame tibia_l_offset: socket_parent=/bodyset/tibia_l translation=(0 0 0)
    CustomJoint knee_r: socket_parent_frame=femur_r_offset socket_child_frame=tibia_r_offset
      Coordinate knee_angle_r: default_value=0 range=(-2.094395 0)
      Coordinate knee_adduction_r: range=(-0.5235988 0.5235988)
      Coordinate knee_rotation_r: range=(-0.5235988 0.5235988)
      SpatialTransform: axes_held_at_zero=(translation1 translation2 translation3)
        TransformAxis rotation1: coordinates=knee_angle_r axis=(0 0 1) LinearFunction(coefficients=1 0)
        TransformAxis rotation2: coordinates=knee_adduction_r axis=(1 0 0) LinearFunction(coefficients=1 0)
        TransformAxis rotation3: coordinates=knee_rotation_r axis=(0 1 0) LinearFunction(coefficients=1 0)
      PhysicalOffsetFrame femur_r_offset: socket_parent=/bodyset/femur_r translation=(0 -0.3930699 -0.003805769)
      PhysicalOffsetFrame tibia_r_offset: socket_parent=/bodyset/tibia_r translation=(0 0 0)
    PinJoint ankle_l: socket_parent_frame=tibia_l_offset socket_child_frame=talus_l_offset
      Coordinate ankle_angle_l: range=(-0.6981317 0.5235988)
      PhysicalOffsetFrame tibia_l_offset: socket_parent=/bodyset/tibia_l translation=(-0.01191578 -0.3928644 0)
          orientation=(-0.1758952 0.105208 0.01866219) [radians]
      PhysicalOffsetFrame talus_l_offset: socket_parent=/bodyset/talus_l translation=(0 0 0)
          orientation=(-0.1758952 0.105208 0.01866219)
    PinJoint ankle_r: socket_parent_frame=tibia_r_offset socket_child_frame=talus_r_offset
      Coordinate ankle_angle_r: range=(-0.6981317 0.5235988)
      PhysicalOffsetFrame tibia_r_offset: socket_parent=/bodyset/tibia_r translation=(-0.01191578 -0.3928644 0)
          orientation=(0.1758952 -0.105208 0.01866219)
      PhysicalOffsetFrame talus_r_offset: socket_parent=/bodyset/talus_r translation=(0 0 0)
          orientation=(0.1758952 -0.105208 0.01866219)
    PinJoint subtalar_l: socket_parent_frame=talus_l_offset socket_child_frame=calcn_l_offset
      Coordinate subtalar_angle_l: range=(-0.3490659 0.3490659)
      PhysicalOffsetFrame talus_l_offset: socket_parent=/bodyset/talus_l
          translation=(-0.04193555 -0.0314625 -0.007165688) orientation=(1.768191 -0.906223 1.819602)
      PhysicalOffsetFrame calcn_l_offset: socket_parent=/bodyset/calcn_l translation=(0 0 0)
          orientation=(1.768191 -0.906223 1.819602)
    PinJoint subtalar_r: socket_parent_frame=talus_r_offset socket_child_frame=calcn_r_offset
      Coordinate subtalar_angle_r: range=(-0.3490659 0.3490659)
      PhysicalOffsetFrame talus_r_offset: socket_parent=/bodyset/talus_r
          translation=(-0.04193555 -0.0314625 0.007165688) orientation=(-1.768191 0.906223 1.819602)
      PhysicalOffsetFrame calcn_r_offset: socket_parent=/bodyset/calcn_r translation=(0 0 0)
          orientation=(-1.768191 0.906223 1.819602)
    PinJoint mtp_l: socket_parent_frame=calcn_l_offset socket_child_frame=toes_l_offset
      Coordinate mtp_angle_l: range=(-1.0472 1.0472)
      PhysicalOffsetFrame calcn_l_offset: socket_parent=/bodyset/calcn_l
          translation=(0.1851227 -0.001500007 -0.001197863) orientation=(0 0.6199005 0)
      PhysicalOffsetFrame toes_l_offset: socket_parent=/bodyset/toes_l translation=(0 0 0) orientation=(0 0.6199005 0)
    PinJoint mtp_r: socket_parent_frame=calcn_r_offset socket_child_frame=toes_r_offset
      Coordinate mtp_angle_r: range=(-1.0472 1.0472)
      PhysicalOffsetFrame calcn_r_offset: socket_parent=/bodyset/calcn_r
          translation=(0.1851227 -0.001500007 0.001197863) orientation=(0 -0.6199005 0)
      PhysicalOffsetFrame toes_r_offset: socket_parent=/bodyset/toes_r translation=(0 0 0) orientation=(0 -0.6199005 0)
    CustomJoint lumbar: socket_parent_frame=pelvis_offset socket_child_frame=torso_offset
      Coordinate lumbar_ext: range=(-1.570796 1.570796)
      Coordinate lumbar_bend: range=(-1.570796 1.570796)
      Coordinate lumbar_rota: range=(-1.570796 1.570796)
      PhysicalOffsetFrame pelvis_offset: socket_parent=/bodyset/pelvis translation=(-0.1171337 0.0737526 0)
      PhysicalOffsetFrame torso_offset: socket_parent=/bodyset/torso translation=(0 0 0)
      SpatialTransform: axes_held_at_zero=(translation1 translation2 translation3)
        TransformAxis rotation1: coordinates=lumbar_ext axis=(0 0 1) LinearFunction(coefficients=1 0)
        TransformAxis rotation2: coordinates=lumbar_bend axis=(1 0 0) LinearFunction(coefficients=1 0)
        TransformAxis rotation3: coordinates=lumbar_rota axis=(0 1 0) LinearFunction(coefficients=1 0)
    CustomJoint shoulder_r: socket_parent_frame=torso_offset socket_child_frame=humerus_r_offset
      Coordinate shoulder_flexion_r: range=(-1.0472 3.1416)
      Coordinate shoulder_adduction_r: range=(-0.5236 0.1745)
      Coordinate shoulder_rotation_r: range=(-0.5236 0.5236)
      PhysicalOffsetFrame torso_offset: socket_parent=/bodyset/torso translation=(0.00375906 0.3738585 0.1829819)
      PhysicalOffsetFrame humerus_r_offset: socket_parent=/bodyset/humerus_r translation=(0 0 0)
      SpatialTransform: axes_held_at_zero=(translation1 translation2 translation3)
        TransformAxis rotation1: coordinates=shoulder_flexion_r axis=(0 0 1) LinearFunction(coefficients=1 0)
        TransformAxis rotation2: coordinates=shoulder_adduction_r axis=(1 0 0) LinearFunction(coefficients=1 0)
        TransformAxis rotation3: coordinates=shoulder_rotation_r axis=(0 1 0) LinearFunction(coefficients=1 0)
    PinJoint elbow_r: socket_parent_frame=humerus_r_offset socket_child_frame=ulna_r_offset
      Coordinate elbow_flexion_r: range=(0 2.618)
      PhysicalOffsetFrame humerus_r_offset: socket_parent=/bodyset/humerus_r
          translation=(0.01140812 -0.3166626 -0.008806694) orientation=(-0.02286271 0.2280177 0.005168901)
      PhysicalOffsetFrame ulna_r_offset: socket_parent=/bodyset/ulna_r translation=(0 0 0)
          orientation=(-0.02286271 0.2280177 0.005168901)
    WeldJoint radioulnar_r: socket_parent_frame=ulna_r_offset socket_child_frame=radius_r_offset
      PhysicalOffsetFrame ulna_r_offset: socket_parent=/bodyset/ulna_r
          translation=(-0.006717189 -0.01056725 0.02484663) orientation=(-1.568841 0.05642797 1.536144)
      PhysicalOffsetFrame radius_r_offset: socket_parent=/bodyset/radius_r translation=(0 0 0)
          orientation=(-1.568841 0.05642797 -0.0346525)
    WeldJoint wrist_r: socket_parent_frame=radius_r_offset socket_child_frame=hand_r_offset
      PhysicalOffsetFrame radius_r_offset: socket_parent=/bodyset/radius_r
          translation=(-0.00878417 -0.1916038 0.01296486)
      PhysicalOffsetFrame hand_r_offset: socket_parent=/bodyset/hand_r translation=(0 0 0)
    CustomJoint shoulder_l: socket_parent_frame=torso_offset socket_child_frame=humerus_l_offset
      Coordinate shoulder_flexion_l: range=(-1.0472 3.1416)
      Coordinate shoulder_adduction_l: range=(-0.5236 0.1745)
      Coordinate shoulder_rotation_l: range=(-0.5236 0.5236)
      PhysicalOffsetFrame torso_offset: socket_parent=/bodyset/torso translation=(0.00375906 0.3738585 -0.1829819)
      PhysicalOffsetFrame humerus_l_offset: socket_parent=/bodyset/humerus_l translation=(0 0 0)
      SpatialTransform: axes_held_at_zero=(translation1 translation2 translation3)
        TransformAxis rotation1: coordinates=shoulder_flexion_l axis=(0 0 1) LinearFunction(coefficients=1 0)
        TransformAxis rotation2: coordinates=shoulder_adduction_l axis=(1 0 0) LinearFunction(coefficients=-1 0)
        TransformAxis rotation3: coordinates=shoulder_rotation_l axis=(0 1 0) LinearFunction(coefficients=-1 0)
    PinJoint elbow_l: socket_parent_frame=humerus_l_offset socket_child_frame=ulna_l_offset
      Coordinate elbow_flexion_l: range=(0 2.618)
      PhysicalOffsetFrame humerus_l_offset: socket_parent=/bodyset/humerus_l
          translation=(0.01140812 -0.3166626 0.008806694) orientation=(0.02286271 -0.2280177 0.005168901)
      PhysicalOffsetFrame ulna_l_offset: socket_parent=/bodyset/ulna_l translation=(0 0 0)
          orientation=(0.02286271 -0.2280177 0.005168901)
    WeldJoint radioulnar_l: socket_parent_frame=ulna_l_offset socket_child_frame=radius_l_offset
      PhysicalOffsetFrame ulna_l_offset: socket_parent=/bodyset/ulna_l
          translation=(-0.006717189 -0.01056725 -0.02484663) orientation=(1.568841 -0.05642797 1.536144)
      PhysicalOffsetFrame radius_l_offset: socket_parent=/bodyset/radius_l translation=(0 0 0)
          orientation=(1.568841 -0.05642797 -0.0346525)
    WeldJoint wrist_l: socket_parent_frame=radius_l_offset socket_child_frame=hand_l_offset
      PhysicalOffsetFrame radius_l_offset: socket_parent=/bodyset/radius_l
          translation=(-0.00878417 -0.1916038 -0.01296486)
      PhysicalOffsetFrame hand_l_offset: socket_parent=/bodyset/hand_l translation=(0 0 0)
  ConstraintSet:
    CoordinateCouplerConstraint patellofemoral_knee_angle_r_con: independent_coordinate_names=knee_angle_r
        dependent_coordinate_name=knee_angle_r_beta scale_factor=1
        coupled_coordinates_function=LinearFunction(coefficients=-1 0)
    CoordinateCouplerConstraint patellofemoral_knee_angle_l_con: independent_coordinate_names=knee_angle_l
        dependent_coordinate_name=knee_angle_l_beta scale_factor=1
        coupled_coordinates_function=LinearFunction(coefficients=-1 0)
  ForceSet:
    ExpressionBasedCoordinateForce PassiveToeMoment_r: coordinate=mtp_angle_r
        expression=-0.05-0.9*exp(14.87*(q-0.21))+0.18*exp(-70.08*(q+0.02))-0.1*qdot
    ExpressionBasedCoordinateForce PassiveToeMoment_l: coordinate=mtp_angle_l
        expression=-0.05-0.9*exp(14.87*(q-0.21))+0.18*exp(-70.08*(q+0.02))-0.1*qdot
    ExpressionBasedCoordinateForce PassiveHipDampingX_r: coordinate=hip_flexion_r
        expression=-2.44*exp(5.05*(q-1.81))+1.51*exp(-21.88*(q+0.47))-0.1*qdot
    ExpressionBasedCoordinateForce PassiveHipDampingY_r: coordinate=hip_adduction_r
        expression=-0.03*exp(14.94*(q-0.50))+0.03*exp(-14.94*(q+0.50))-0.1*qdot
    ExpressionBasedCoordinateForce PassiveHipDampingZ_r: coordinate=hip_rotation_r
        expression=-0.03*exp(14.94*(q-0.92))+0.03*exp(-14.94*(q+0.92))-0.1*qdot
    ExpressionBasedCoordinateForce PassiveHipDampingX_l: coordinate=hip_flexion_l
        expression=-2.44*exp(5.05*(q-1.81))+1.51*exp(-21.88*(q+0.47))-0.1*qdot
    ExpressionBasedCoordinateForce PassiveHipDampingY_l: coordinate=hip_adduction_l
        expression=-0.03*exp(14.94*(q-0.50))+0.03*exp(-14.94*(q+0.50))-0.1*qdot
    ExpressionBasedCoordinateForce PassiveHipDampingZ_l: coordinate=hip_rotation_l
        expression=-0.03*exp(14.94*(q-0.92))+0.03*exp(-14.94*(q+0.92))-0.1*qdot
    ExpressionBasedCoordinateForce PassiveKneeDamping_r: coordinate=knee_angle_r
        expression=-6.09*exp(33.94*(q-0.13))+11.03*exp(-11.33*(q+2.40))-0.1*qdot
    ExpressionBasedCoordinateForce PassiveKneeDamping_l: coordinate=knee_angle_l
        expression=-6.09*exp(33.94*(q-0.13))+11.03*exp(-11.33*(q+2.40))-0.1*qdot
    ExpressionBasedCoordinateForce PassiveAnkleDamping_r: coordinate=ankle_angle_r
        expression=-2.03*exp(38.11*(q-0.52))+0.18*exp(-42.12*(q+0.74))-0.1*qdot
    ExpressionBasedCoordinateForce PassiveAnkleDamping_l: coordinate=ankle_angle_l
        expression=-2.03*exp(38.11*(q-0.52))+0.18*exp(-42.12*(q+0.74))-0.1*qdot
    ExpressionBasedCoordinateForce PassiveSubtalarDamping_r: coordinate=subtalar_angle_r
        expression=-60.21*exp(16.32*(q-0.65))+60.21*exp(-16.32*(q+0.65))-0.1*qdot
    ExpressionBasedCoordinateForce PassiveSubtalarDamping_l: coordinate=subtalar_angle_l
        expression=-60.21*exp(16.32*(q-0.65))+60.21*exp(-16.32*(q+0.65))-0.1*qdot
    ExpressionBasedCoordinateForce PassiveLumbarDampingX: coordinate=lumbar_ext
        expression=-0.35*exp(30.72*(q-0.17))+0.25*exp(-20.36*(q+0.35))-0.1*qdot
    ExpressionBasedCoordinateForce PassiveLumbarDampingY: coordinate=lumbar_bend
        expression=-0.25*exp(20.36*(q-0.17))+0.25*exp(-20.36*(q+0.17))-0.1*qdot
    ExpressionBasedCoordinateForce PassiveLumbarDampingZ: coordinate=lumbar_rota
        expression=-0.25*exp(20.36*(q-0.17))+0.25*exp(-20.36*(q+0.17))-0.1*qdot
    ExpressionBasedCoordinateForce PassiveShoulderDampingX_r: coordinate=shoulder_flexion_r
        expression=-2.44*exp(5.05*(q-1.81))+1.51*exp(-11.88*(q+0.50))-1.0*qdot
    ExpressionBasedCoordinateForce PassiveShoulderDampingY_r: coordinate=shoulder_adduction_r
        expression=-15.03*exp(20.94*(q-0.05))+5.03*exp(-14.93*(q+1.57))-1.0*qdot
    ExpressionBasedCoordinateForce PassiveShoulderDampingZ_r: coordinate=shoulder_rotation_r
        expression=-0.43*exp(14.94*(q-0.15))+0.43*exp(-14.93*(q+0.15))-1.0*qdot
    ExpressionBasedCoordinateForce PassiveElbowDamping_r: coordinate=elbow_flexion_r
        expression=2.09*exp(-6.94*(q-0.30))-11.03*exp(11.33*(q-2.40))-1.0*qdot
    ExpressionBasedCoordinateForce PassiveShoulderDampingX_l: coordinate=shoulder_flexion_l
        expression=-2.44*exp(5.05*(q-1.81))+1.51*exp(-11.88*(q+0.50))-1.0*qdot
    ExpressionBasedCoordinateForce PassiveShoulderDampingY_l: coordinate=shoulder_adduction_l
        expression=-15.03*exp(20.94*(q-0.05))+5.03*exp(-14.93*(q+1.57))-1.0*qdot
    ExpressionBasedCoordinateForce PassiveShoulderDampingZ_l: coordinate=shoulder_rotation_l
        expression=-0.43*exp(14.94*(q-0.15))+0.43*exp(-14.93*(q+0.15))-1.0*qdot
    ExpressionBasedCoordinateForce PassiveElbowDamping_l: coordinate=elbow_flexion_l
        expression=2.09*exp(-6.94*(q-0.30))-11.03*exp(11.33*(q-2.40))-1.0*qdot
    DeGrooteFregly2016Muscle [values shared by the 120 below unless stated]: min_control=0.001 max_control=1
        max_contraction_velocity=12 default_activation=0.01 active_force_width_scale=1 fiber_damping=0.01
        passive_fiber_strain_at_one_norm_force=0.7 tendon_strain_at_one_norm_force=0.049
        ignore_passive_fiber_force=false
    DeGrooteFregly2016Muscle addbrev_r: max_isometric_force=626 optimal_fiber_length=0.1123409
        tendon_slack_length=0.0386819 pennation_angle_at_optimal=0.1148 [radians] activation_time_constant=0.016
        deactivation_time_constant=0.0575
      PathPoint P1: pelvis (-0.02221702 -0.08506435 0.0179298)
      PathPoint P2: femur_r (-0.002329768 -0.1136931 0.03445951)
      PathWrap: wrap_object=AB_at_femshaft_r method=hybrid
    DeGrooteFregly2016Muscle addlong_r: max_isometric_force=917 optimal_fiber_length=0.1076061
        tendon_slack_length=0.1310766 pennation_angle_at_optimal=0.1378 activation_time_constant=0.0183
        deactivation_time_constant=0.0634
      PathPoint P1: pelvis (-0.008817017 -0.08044915 0.02198147)
      PathPoint P2: femur_r (0.01311659 -0.2306332 0.02190739)
      PathWrap: wrap_object=AL_at_femshaft_r method=hybrid
    DeGrooteFregly2016Muscle addmagDist_r: max_isometric_force=597 optimal_fiber_length=0.1769318
        tendon_slack_length=0.08724842 pennation_angle_at_optimal=0.194705 activation_time_constant=0.0199
        deactivation_time_constant=0.0673
      PathPoint P1: pelvis (-0.08612294 -0.1155337 0.04636135)
      PathPoint P2: femur_r (0.01310495 -0.252919 0.02670958)
      PathWrap: wrap_object=AMdist_at_femshaft_r method=hybrid
    DeGrooteFregly2016Muscle addmagIsch_r: max_isometric_force=597 optimal_fiber_length=0.1522245
        tendon_slack_length=0.2108368 pennation_angle_at_optimal=0.1680443 activation_time_constant=0.0182
        deactivation_time_constant=0.0629
      PathPoint P1: pelvis (-0.1042455 -0.117425 0.04856183)
      PathPoint P2: femur_r (0.005603092 -0.3738095 -0.04529557)
      PathWrap: wrap_object=AMisch_at_condyles_r method=hybrid
    DeGrooteFregly2016Muscle addmagMid_r: max_isometric_force=597 optimal_fiber_length=0.14681
        tendon_slack_length=0.04968296 pennation_angle_at_optimal=0.2073 activation_time_constant=0.0166
        deactivation_time_constant=0.059
      PathPoint P1: pelvis (-0.06125384 -0.1092715 0.03322835)
      PathPoint P2: femur_r (0.002819019 -0.1564726 0.04043803)
      PathWrap: wrap_object=AMmid_at_femshaft_r method=hybrid
    DeGrooteFregly2016Muscle addmagProx_r: max_isometric_force=597 optimal_fiber_length=0.1241603
        tendon_slack_length=0.04741149 pennation_angle_at_optimal=0.3114833 activation_time_constant=0.0139
        deactivation_time_constant=0.0522
      PathPoint P1: pelvis (-0.03603578 -0.09732628 0.01589233)
      PathPoint P2: femur_r (-0.01778778 -0.07598169 0.04431299)
      PathWrap: wrap_object=AMprox_at_femshaft_r method=hybrid
    DeGrooteFregly2016Muscle bflh_r: max_isometric_force=1313 optimal_fiber_length=0.09540738
        tendon_slack_length=0.3250303 pennation_angle_at_optimal=0.1759182 activation_time_constant=0.0217
        deactivation_time_constant=0.0717 active_force_width_scale=1.5
      PathPoint P1: pelvis (-0.1209723 -0.1077783 0.0682264)
      PathPoint P2: tibia_r (-0.04094262 -0.03582924 0.0445151)
      PathPoint P3: tibia_r (-0.03222027 -0.04918663 0.04276797)
    DeGrooteFregly2016Muscle bfsh_r: max_isometric_force=557 optimal_fiber_length=0.1071157
        tendon_slack_length=0.1027457 pennation_angle_at_optimal=0.2642 activation_time_constant=0.0115
        deactivation_time_constant=0.0462
      PathPoint P1: femur_r (0.00582442 -0.2033951 0.03238364)
      PathPoint P2: tibia_r (-0.03415062 -0.03225417 0.03942134)
      PathWrap: wrap_object=BF140_at_gastroc_r method=hybrid
    DeGrooteFregly2016Muscle edl_r: max_isometric_force=603 optimal_fiber_length=0.06915211
        tendon_slack_length=0.3681128 pennation_angle_at_optimal=0.2183 activation_time_constant=0.0094
        deactivation_time_constant=0.0411 active_force_width_scale=1.5
      PathPoint P1: tibia_r (-0.01906525 -0.113636 0.02522277)
      PathPoint P2: tibia_r (0.01954188 -0.3692926 0.01378024)
      PathPoint P3: calcn_r (0.09514978 0.02700013 0.0008873057)
      PathPoint P4: calcn_r (0.1673145 0.00412502 0.01441872)
      PathPoint P5: toes_r (0.0003100314 0.003833262 0.01386898)
      PathPoint P6: toes_r (0.0457813 -0.0003262351 0.02266173)
    DeGrooteFregly2016Muscle ehl_r: max_isometric_force=286 optimal_fiber_length=0.07543529
        tendon_slack_length=0.3295756 pennation_angle_at_optimal=0.1972681 activation_time_constant=0.0102
        deactivation_time_constant=0.043 active_force_width_scale=1.5
      PathPoint P1: tibia_r (-0.01668209 -0.152235 0.02325416)
      PathPoint P2: tibia_r (0.008460203 -0.2857107 0.02017821)
      PathPoint P3: tibia_r (0.02383156 -0.3627121 -0.003445061)
      PathPoint P4: calcn_r (0.1004301 0.02917514 -0.02340269)
      PathPoint P5: calcn_r (0.1338723 0.02317511 -0.0285047)
      PathPoint P6: calcn_r (0.1795318 0.01042505 -0.0310557)
      PathPoint P7: toes_r (0.03079645 0.00334391 -0.02220849)
      PathPoint P8: toes_r (0.05818256 0.002772998 -0.01686033)
    DeGrooteFregly2016Muscle ercspn_r: max_isometric_force=2500 optimal_fiber_length=0.1423212
        tendon_slack_length=0.02969148 pennation_angle_at_optimal=0 activation_time_constant=0.053
        deactivation_time_constant=0.1501
      PathPoint P1: pelvis (-0.1628473 0.03972686 0.0507623)
      PathPoint P2: torso (-0.06553036 0.1106984 0.02594037)
    DeGrooteFregly2016Muscle extobl_r: max_isometric_force=900 optimal_fiber_length=0.1158361
        tendon_slack_length=0.1351422 pennation_angle_at_optimal=0 activation_time_constant=0.0145
        deactivation_time_constant=0.0538
      PathPoint P1: pelvis (-0.03489584 -0.05755417 0.01164273)
      PathPoint P2: torso (0.07744497 0.1106984 0.1184)
    DeGrooteFregly2016Muscle fdl_r: max_isometric_force=423 optimal_fiber_length=0.04456249
        tendon_slack_length=0.3784814 pennation_angle_at_optimal=0.2248 activation_time_constant=0.007
        deactivation_time_constant=0.035 active_force_width_scale=1.5
      PathPoint P1: tibia_r (-0.002740629 -0.1799319 -0.002214682)
      PathPoint P2: tibia_r (-0.02097177 -0.3579977 -0.0152567)
      PathPoint P3: calcn_r (0.04514179 0.02362511 -0.0310557)
      PathPoint P4: calcn_r (0.07330364 0.01320006 -0.02917017)
      PathPoint P5: calcn_r (0.171663 -0.006075029 0.01286593)
      PathPoint P6: toes_r (-0.001963532 -0.006361584 0.0133251)
      PathPoint P7: toes_r (0.02945298 -0.005790673 0.01948909)
      PathPoint P8: toes_r (0.04557462 -0.004893527 0.02193655)
    DeGrooteFregly2016Muscle fhl_r: max_isometric_force=908 optimal_fiber_length=0.05304456
        tendon_slack_length=0.3566165 pennation_angle_at_optimal=0.258 activation_time_constant=0.01
        deactivation_time_constant=0.0425 active_force_width_scale=1.5
      PathPoint P1: tibia_r (-0.03693892 -0.2124414 0.02460758)
      PathPoint P2: tibia_r (-0.02883619 -0.3605513 -0.009350879)
      PathPoint P3: calcn_r (0.03872254 0.0207001 -0.02673008)
      PathPoint P4: calcn_r (0.1074706 0.005100024 -0.02839378)
      PathPoint P5: calcn_r (0.1787035 -0.003975019 -0.02983565)
      PathPoint P6: toes_r (0.01601829 -0.005219762 -0.02402143)
      PathPoint P7: toes_r (0.05807921 -0.008318995 -0.01640709)
    DeGrooteFregly2016Muscle gaslat_r: max_isometric_force=1575 optimal_fiber_length=0.06788867
        tendon_slack_length=0.3679763 pennation_angle_at_optimal=0.2102 activation_time_constant=0.017
        deactivation_time_constant=0.06 active_force_width_scale=1.5
      PathPoint P1: femur_r (0.002329768 -0.3670939 0.02849483)
      PathPoint P2: calcn_r (0.004555593 0.02325011 -0.0058784)
      PathWrap gaslat1: wrap_object=GasLat_at_shank_r method=hybrid
      PathWrap gaslat2: wrap_object=GasLat_at_condyles_r method=hybrid
    DeGrooteFregly2016Muscle gasmed_r: max_isometric_force=3116 optimal_fiber_length=0.05922023
        tendon_slack_length=0.3884446 pennation_angle_at_optimal=0.1656816 activation_time_constant=0.0253
        deactivation_time_constant=0.0807 active_force_width_scale=1.5
      PathPoint P1: femur_r (0.006989304 -0.3709479 -0.03044615)
      PathPoint P2: calcn_r (0.004555593 0.02325011 -0.0058784)
      PathWrap gasmed1: wrap_object=GasMed_at_shank_r method=hybrid
      PathWrap gasmed2: wrap_object=GasMed_at_condyles_r method=hybrid
    DeGrooteFregly2016Muscle gem_r: max_isometric_force=286 optimal_fiber_length=0.0307063
        tendon_slack_length=0.04989773 pennation_angle_at_optimal=0 activation_time_constant=0.0056
        deactivation_time_constant=0.0316 active_force_width_scale=1.5
      PathPoint P1: pelvis (-0.13179 -0.07420507 0.08312909)
      PathPoint P2: femur_r (-0.01654135 -0.003179553 0.06130748)
    DeGrooteFregly2016Muscle glmax1_r: max_isometric_force=984 optimal_fiber_length=0.1473595
        tendon_slack_length=0.09122254 pennation_angle_at_optimal=0.3540118 activation_time_constant=0.0258
        deactivation_time_constant=0.082
      PathPoint P1: pelvis (-0.1431893 0.03122042 0.06554857)
      PathPoint P2: pelvis (-0.1462136 -0.02189954 0.09069687)
      PathPoint P3: femur_r (-0.05172085 -0.03141013 0.04179427)
      PathPoint P4: femur_r (-0.03226729 -0.05453416 0.06504406)
      PathWrap: wrap_object=Gmax1_at_pelvis_r method=hybrid
    DeGrooteFregly2016Muscle glmax2_r: max_isometric_force=1406 optimal_fiber_length=0.158841
        tendon_slack_length=0.1173602 pennation_angle_at_optimal=0.3673821 activation_time_constant=0.0367
        deactivation_time_constant=0.1093
      PathPoint P1: pelvis (-0.1531928 0.007872977 0.05378941)
      PathPoint P2: pelvis (-0.1563334 -0.05511084 0.09465539)
      PathPoint P3: femur_r (-0.05241978 -0.05626846 0.03487469)
      PathPoint P4: femur_r (-0.01817219 -0.09789171 0.05798608)
      PathWrap: wrap_object=Gmax2_at_pelvis_r method=hybrid
    DeGrooteFregly2016Muscle glmax3_r: max_isometric_force=948 optimal_fiber_length=0.1781564
        tendon_slack_length=0.1344174 pennation_angle_at_optimal=0.3824161 activation_time_constant=0.0278
        deactivation_time_constant=0.0869
      PathPoint P1: pelvis (-0.1512153 -0.04750934 0.01047846)
      PathPoint P2: pelvis (-0.1480747 -0.1142939 0.05064588)
      PathPoint P3: femur_r (-0.03273324 -0.1083939 0.01300881)
      PathPoint P4: femur_r (-0.006989304 -0.1367208 0.05687895)
      PathWrap: wrap_object=Gmax3_at_pelvis_r method=hybrid
    DeGrooteFregly2016Muscle glmed1_r: max_isometric_force=1093 optimal_fiber_length=0.07001869
        tendon_slack_length=0.05353728 pennation_angle_at_optimal=0.3165559 activation_time_constant=0.0258
        deactivation_time_constant=0.0821
      PathPoint P1: pelvis (-0.05176217 0.02217103 0.1364528)
      PathPoint P2: femur_r (-0.02539447 -0.01127296 0.07680734)
    DeGrooteFregly2016Muscle glmed2_r: max_isometric_force=765 optimal_fiber_length=0.07476068
        tendon_slack_length=0.06677255 pennation_angle_at_optimal=0.3165559 activation_time_constant=0.0196
        deactivation_time_constant=0.0665
      PathPoint P1: pelvis (-0.09887156 0.0285961 0.07858843)
      PathPoint P2: femur_r (-0.03005401 -0.005588306 0.07293238)
    DeGrooteFregly2016Muscle glmed3_r: max_isometric_force=871 optimal_fiber_length=0.08267591
        tendon_slack_length=0.05122831 pennation_angle_at_optimal=0.3165559 activation_time_constant=0.0216
        deactivation_time_constant=0.0715
      PathPoint P1: pelvis (-0.134 -0.006606061 0.06124076)
      PathPoint P2: femur_r (-0.03599492 -0.004528455 0.07168685)
    DeGrooteFregly2016Muscle glmin1_r: max_isometric_force=374 optimal_fiber_length=0.0704148
        tendon_slack_length=0.01671086 pennation_angle_at_optimal=0.1745329 activation_time_constant=0.0087
        deactivation_time_constant=0.0391
      PathPoint P1: pelvis (-0.05397224 -0.0134836 0.1213172)
      PathPoint P2: femur_r (-0.008387165 -0.01002041 0.0774993)
    DeGrooteFregly2016Muscle glmin2_r: max_isometric_force=395 optimal_fiber_length=0.05888972
        tendon_slack_length=0.02744682 pennation_angle_at_optimal=0 activation_time_constant=0.0082
        deactivation_time_constant=0.038
      PathPoint P1: pelvis (-0.0716528 -0.01285015 0.1130509)
      PathPoint P2: femur_r (-0.01118289 -0.01002041 0.0774993)
    DeGrooteFregly2016Muscle glmin3_r: max_isometric_force=447 optimal_fiber_length=0.04203693
        tendon_slack_length=0.05627694 pennation_angle_at_optimal=0.01745329 activation_time_constant=0.0074
        deactivation_time_constant=0.0361
      PathPoint P1: pelvis (-0.09177607 -0.01402657 0.09290899)
      PathPoint P2: femur_r (-0.01572593 -0.007997059 0.07611538)
    DeGrooteFregly2016Muscle grac_r: max_isometric_force=281 optimal_fiber_length=0.2238383
        tendon_slack_length=0.1690087 pennation_angle_at_optimal=0.172 activation_time_constant=0.0147
        deactivation_time_constant=0.0543
      PathPoint P1: pelvis (-0.05508891 -0.1170268 0.02859454)
      PathPoint P2: tibia_r (-0.02194887 -0.04670176 -0.03643152)
      PathPoint P3: tibia_r (0.002121009 -0.06837805 -0.01935386)
      PathWrap: wrap_object=GR_at_condyles_r method=hybrid
    DeGrooteFregly2016Muscle iliacus_r: max_isometric_force=1021 optimal_fiber_length=0.1062377
        tendon_slack_length=0.09577342 pennation_angle_at_optimal=0.2799 activation_time_constant=0.0202
        deactivation_time_constant=0.068
      PathPoint P1: pelvis (-0.07037329 0.02796264 0.09814821)
      PathPoint P2: pelvis (-0.01570313 -0.05040515 0.08801904)
      PathPoint P3: femur_r (-0.002679233 -0.05443781 0.01923643)
      PathPoint P4: femur_r (-0.01421159 -0.06137502 0.02712476)
      PathWrap: wrap_object=IL_at_brim_r method=hybrid range=(2 3)
    DeGrooteFregly2016Muscle intobl_r: max_isometric_force=900 optimal_fiber_length=0.1048845
        tendon_slack_length=0.1048845 pennation_angle_at_optimal=0 activation_time_constant=0.0129
        deactivation_time_constant=0.0499
      PathPoint P1: pelvis (-0.04652779 0.06334579 0.1347064)
      PathPoint P2: torso (0.08340228 0.1610158 0.01614546)
    DeGrooteFregly2016Muscle pect_r: max_isometric_force=464 optimal_fiber_length=0.0858209
        tendon_slack_length=0.03540112 pennation_angle_at_optimal=0 activation_time_constant=0.008
        deactivation_time_constant=0.0375
      PathPoint P1: pelvis (-0.0501337 -0.06949938 0.05250871)
      PathPoint P2: femur_r (-0.01421159 -0.07919979 0.03501308)
    DeGrooteFregly2016Muscle perbrev_r: max_isometric_force=521 optimal_fiber_length=0.04700464
        tendon_slack_length=0.1527133 pennation_angle_at_optimal=0.2052 activation_time_constant=0.0083
        deactivation_time_constant=0.0382
      PathPoint P1: tibia_r (-0.02895534 -0.2486832 0.03088251)
      PathPoint P2: tibia_r (-0.04039449 -0.3823553 0.03063643)
      PathPoint P3: tibia_r (-0.03395997 -0.3932573 0.03137466)
      PathPoint P4: calcn_r (0.04876555 0.0202501 0.02584278)
      PathPoint P5: calcn_r (0.07009401 0.01642508 0.03804323)
    DeGrooteFregly2016Muscle perlong_r: max_isometric_force=1115 optimal_fiber_length=0.05148388
        tendon_slack_length=0.3366721 pennation_angle_at_optimal=0.248 activation_time_constant=0.0128
        deactivation_time_constant=0.0495
      PathPoint P1: tibia_r (-0.02383156 -0.1348507 0.03469668)
      PathPoint P2: tibia_r (-0.03777302 -0.3830428 0.02915998)
      PathPoint P3: tibia_r (-0.03241092 -0.3942395 0.02952909)
      PathPoint P4: calcn_r (0.04534886 0.01725008 0.02451182)
      PathPoint P5: calcn_r (0.07050816 0.007950038 0.03149935)
      PathPoint P6: calcn_r (0.08821285 0.005175025 0.01308776)
      PathPoint P7: calcn_r (0.1245541 0.00637503 -0.02040803)
    DeGrooteFregly2016Muscle pertert_r: max_isometric_force=314 optimal_fiber_length=0.06793769
        tendon_slack_length=0.07665748 pennation_angle_at_optimal=0.2269 activation_time_constant=0.0068
        deactivation_time_constant=0.0344
      PathPoint P1: tibia_r (0.001191578 -0.275398 0.02842175)
      PathPoint P2: tibia_r (0.02728713 -0.3849089 0.03186681)
      PathPoint P3: calcn_r (0.08873053 0.01710008 0.03316305)
    DeGrooteFregly2016Muscle piri_r: max_isometric_force=1030 optimal_fiber_length=0.0298148
        tendon_slack_length=0.1317585 pennation_angle_at_optimal=0.1745 activation_time_constant=0.0117
        deactivation_time_constant=0.0468
      PathPoint P1: pelvis (-0.1184249 -0.005909257 0.01572933)
      PathPoint P2: pelvis (-0.1186691 -0.02774546 0.07092751)
      PathPoint P3: femur_r (-0.01724028 -0.003468604 0.06047713)
    DeGrooteFregly2016Muscle psoas_r: max_isometric_force=1427 optimal_fiber_length=0.1154694
        tendon_slack_length=0.09828233 pennation_angle_at_optimal=0.2155251 activation_time_constant=0.0252
        deactivation_time_constant=0.0804
      PathPoint P1: pelvis (-0.07048961 0.05610627 0.04540665)
      PathPoint P2: pelvis (-0.02384549 -0.05918307 0.07637631)
      PathPoint P3: femur_r (-0.01537647 -0.0449955 0.006366014)
      PathPoint P4: femur_r (-0.02737478 -0.05048745 0.01217846)
      PathWrap: wrap_object=PS_at_brim_r method=hybrid range=(2 3)
    DeGrooteFregly2016Muscle quadfem_r: max_isometric_force=665 optimal_fiber_length=0.06924565
        tendon_slack_length=0.03077584 pennation_angle_at_optimal=0 activation_time_constant=0.0112
        deactivation_time_constant=0.0455
      PathPoint P1: pelvis (-0.1329532 -0.1041586 0.0605422)
      PathPoint P2: femur_r (-0.04438208 -0.03458969 0.05065133)
    DeGrooteFregly2016Muscle recabd_r: max_isometric_force=658 optimal_fiber_length=0.3462164
        tendon_slack_length=0.01642668 pennation_angle_at_optimal=0 activation_time_constant=0.0302
        deactivation_time_constant=0.093
      PathPoint rectabd_r-P1: pelvis (-0.03024307 -0.06334579 0.012807)
      PathPoint rectabd_r-P2: torso (0.1096144 0.2233913 0.03336729)
    DeGrooteFregly2016Muscle recfem_r: max_isometric_force=2192 optimal_fiber_length=0.07309051
        tendon_slack_length=0.4337282 pennation_angle_at_optimal=0.217 activation_time_constant=0.0161
        deactivation_time_constant=0.0577 active_force_width_scale=1.5
      PathPoint P1: pelvis (-0.02791668 -0.03511167 0.1086267)
      PathPoint P2: patella_r (0.01 0.049 0.0007)
      PathPoint P3: patella_r (0.0121 0.0437 -0.001)
      PathPoint P4: patella_r (0.005 0.00247 3e-5)
      PathPoint P5: tibia_r (0.03884544 -0.06199401 -0.000578278)
      PathWrap: wrap_object=KnExt_at_fem_r method=hybrid
    DeGrooteFregly2016Muscle sart_r: max_isometric_force=249 optimal_fiber_length=0.3985837
        tendon_slack_length=0.1226411 pennation_angle_at_optimal=0.0261 activation_time_constant=0.0171
        deactivation_time_constant=0.0603
      PathPoint P1: pelvis (-0.0226823 -0.01411706 0.1229472)
      PathPoint P2: femur_r (-0.003494652 -0.3437772 -0.05826287)
      PathPoint P3: tibia_r (-0.02990861 -0.03938466 -0.04490883)
      PathPoint P4: tibia_r (-0.01894609 -0.05883145 -0.032482)
      PathPoint P5: tibia_r (0.01620546 -0.07955505 -0.003198985)
    DeGrooteFregly2016Muscle semimem_r: max_isometric_force=2201 optimal_fiber_length=0.08332845
        tendon_slack_length=0.3245934 pennation_angle_at_optimal=0.2546 activation_time_constant=0.0323
        deactivation_time_constant=0.0983 active_force_width_scale=1.5
      PathPoint P1: pelvis (-0.1148073 -0.1031631 0.07148636)
      PathPoint P2: tibia_r (-0.0321726 -0.0402686 -0.02411542)
      PathWrap: wrap_object=SM_at_condyles_r method=hybrid
    DeGrooteFregly2016Muscle semiten_r: max_isometric_force=591 optimal_fiber_length=0.1901603
        tendon_slack_length=0.2435629 pennation_angle_at_optimal=0.2413 activation_time_constant=0.0157
        deactivation_time_constant=0.0567 active_force_width_scale=1.5
      PathPoint P1: pelvis (-0.1207396 -0.113389 0.05996006)
      PathPoint P2: tibia_r (-0.03717723 -0.04989378 -0.02817567)
      PathPoint P3: tibia_r (0.002263998 -0.07592105 -0.01439543)
      PathWrap: wrap_object=ST_at_condyles_r method=hybrid
    DeGrooteFregly2016Muscle soleus_r: max_isometric_force=6195 optimal_fiber_length=0.04278029
        tendon_slack_length=0.2735994 pennation_angle_at_optimal=0.3814289 activation_time_constant=0.0618
        deactivation_time_constant=0.172
      PathPoint P1: tibia_r (-0.009055992 -0.08996596 0.01205771)
      PathPoint P2: calcn_r (0.004555593 0.02325011 -0.0058784)
    DeGrooteFregly2016Muscle tfl_r: max_isometric_force=411 optimal_fiber_length=0.09128431
        tendon_slack_length=0.4319189 pennation_angle_at_optimal=0.0524 activation_time_constant=0.0104
        deactivation_time_constant=0.0436
      PathPoint P1: pelvis (-0.03617536 0.01936571 0.1444863)
      PathPoint P2: femur_r (0.03424759 -0.09586835 0.08261979)
      PathPoint P3: femur_r (0.01246426 -0.3902179 0.04483888)
      PathPoint P4: tibia_r (0.01286904 -0.0402686 0.04257111)
    DeGrooteFregly2016Muscle tibant_r: max_isometric_force=1227 optimal_fiber_length=0.06706398
        tendon_slack_length=0.2361477 pennation_angle_at_optimal=0.1951828 activation_time_constant=0.0231
        deactivation_time_constant=0.0753
      PathPoint P1: tibia_r (0.0183503 -0.1288595 0.01993214)
      PathPoint P2: tibia_r (0.02990861 -0.1871999 0.01574885)
      PathPoint P3: tibia_r (0.02776377 -0.3593727 -0.016241)
      PathPoint P4: calcn_r (0.1207232 0.01335006 -0.03382853)
    DeGrooteFregly2016Muscle tibpost_r: max_isometric_force=1730 optimal_fiber_length=0.03714722
        tendon_slack_length=0.2759508 pennation_angle_at_optimal=0.2265 activation_time_constant=0.0198
        deactivation_time_constant=0.067
      PathPoint P1: tibia_r (-0.00488547 -0.1280738 0.0126729)
      PathPoint P2: tibia_r (-0.01954188 -0.3589799 -0.02153163)
      PathPoint P3: calcn_r (0.0431746 0.02505012 -0.03172118)
      PathPoint P4: calcn_r (0.07992995 0.01192506 -0.03116661)
    DeGrooteFregly2016Muscle vasint_r: max_isometric_force=1697 optimal_fiber_length=0.1147692
        tendon_slack_length=0.2010913 pennation_angle_at_optimal=0.06309973 activation_time_constant=0.0261
        deactivation_time_constant=0.0827
      PathPoint P1: femur_r (0.03378164 -0.1853776 0.0429014)
      PathPoint P2: femur_r (0.03902362 -0.2007936 0.03944161)
      PathPoint P3: patella_r (0.0058 0.048 -0.0006)
      PathPoint P4: patella_r (0.005 0.00247 -0.00039)
      PathPoint P5: tibia_r (0.03880969 -0.06207258 0.0005290629)
      PathWrap: wrap_object=KnExt_at_fem_r method=hybrid
    DeGrooteFregly2016Muscle vaslat_r: max_isometric_force=5149 optimal_fiber_length=0.1162594
        tendon_slack_length=0.2196011 pennation_angle_at_optimal=0.2529 activation_time_constant=0.0485
        deactivation_time_constant=0.1387
      PathPoint P1: femur_r (0.005591443 -0.1786331 0.04829867)
      PathPoint P2: femur_r (0.03133538 -0.2496431 0.05660217)
      PathPoint P3: patella_r (0.0103 0.0423 0.0141)
      PathPoint P4: patella_r (0.005 0.00247 0.00733)
      PathPoint P5: tibia_r (0.03877395 -0.06224937 0.006287236)
      PathWrap: wrap_object=KnExtVL_at_fem_r method=hybrid
    DeGrooteFregly2016Muscle vasmed_r: max_isometric_force=2748 optimal_fiber_length=0.1083895
        tendon_slack_length=0.2049547 pennation_angle_at_optimal=0.4222 activation_time_constant=0.0339
        deactivation_time_constant=0.1022
      PathPoint P1: femur_r (0.01630838 -0.2022389 0.02601762)
      PathPoint P2: femur_r (0.04146987 -0.2667934 0.001245524)
      PathPoint P3: patella_r (0.0063 0.0445 -0.017)
      PathPoint P4: patella_r (0.005 0.00247 -0.0085)
      PathPoint P5: tibia_r (0.03801134 -0.06243598 -0.008341968)
      PathWrap: wrap_object=KnExt_at_fem_r method=hybrid
    DeGrooteFregly2016Muscle biceps_r: max_isometric_force=1064 optimal_fiber_length=0.1228949
        tendon_slack_length=0.2277794 pennation_angle_at_optimal=0 activation_time_constant=0.0128
        deactivation_time_constant=0.0495 passive_fiber_strain_at_one_norm_force=1
      PathPoint P1: torso (0.01787192 0.4025395 0.1560728)
      PathPoint P2: humerus_r (0.01883416 0.0001106156 -0.001009626)
      PathPoint P3: radius_r (-0.002815887 -0.02932053 0.01021186)
      PathWrap: wrap_object=elbow_ant_r method=hybrid
    DeGrooteFregly2016Muscle brachialis_r: max_isometric_force=987 optimal_fiber_length=0.09291444
        tendon_slack_length=0.05293962 pennation_angle_at_optimal=0 activation_time_constant=0.0097
        deactivation_time_constant=0.0419
      PathPoint P2: humerus_r (0.013019 -0.1659234 -0.001009626)
      PathPoint P3: ulna_r (0 -0.01218642 -0.004762992)
      PathWrap: wrap_object=elbow_ant_r method=hybrid
    DeGrooteFregly2016Muscle tricepslong_r: max_isometric_force=798 optimal_fiber_length=0.1432215
        tendon_slack_length=0.227658 pennation_angle_at_optimal=0.209 activation_time_constant=0.009
        deactivation_time_constant=0.04
      PathPoint P1: torso (-0.01191461 0.3471903 0.1614546)
      PathPoint P2: ulna_r (-0.02995625 -0.03922402 0.005648909)
      PathWrap: wrap_object=elbow_pos_r method=hybrid
    DeGrooteFregly2016Muscle tricepsshort_r: max_isometric_force=1249 optimal_fiber_length=0.1204255
        tendon_slack_length=0.2197236 pennation_angle_at_optimal=0.157 activation_time_constant=0.0375
        deactivation_time_constant=0.1113
      PathPoint P1: humerus_r (-0.004339668 -0.0553078 0)
      PathPoint P2: ulna_r (-0.02995625 -0.03922402 0.005648909)
      PathWrap: wrap_object=elbow_pos_r method=hybrid
    DeGrooteFregly2016Muscle pectoralis_r: max_isometric_force=1274 optimal_fiber_length=0.157687
        tendon_slack_length=0.01423563 pennation_angle_at_optimal=0.297 activation_time_constant=0.0166
        deactivation_time_constant=0.059
      PathPoint P1: torso (0.04765844 0.352222 0.02152728)
      PathPoint P2: humerus_r (0.013019 -0.06636937 -0.00458921)
      PathWrap: wrap_object=upperribcage method=hybrid
    DeGrooteFregly2016Muscle deltant_r: max_isometric_force=1143 optimal_fiber_length=0.1083314
        tendon_slack_length=0.08865489 pennation_angle_at_optimal=0.384 activation_time_constant=0.0162
        deactivation_time_constant=0.0581
      PathPoint P1: torso (0.01787192 0.4015331 0.1399273)
      PathPoint P2: torso (0.04527552 0.3733554 0.1829819)
      PathPoint P3: humerus_r (0.013019 -0.1327387 0)
    DeGrooteFregly2016Muscle deltmid_r: max_isometric_force=1143 optimal_fiber_length=0.1178105
        tendon_slack_length=0.06097784 pennation_angle_at_optimal=0.262 activation_time_constant=0.0174
        deactivation_time_constant=0.061
      PathPoint P1: torso (0 0.4015331 0.1808292)
      PathPoint P2: torso (0 0.3824125 0.209891)
      PathPoint P3: humerus_r (0.004339668 -0.1327387 0.00917842)
    DeGrooteFregly2016Muscle deltpost_r: max_isometric_force=520 optimal_fiber_length=0.1517985
        tendon_slack_length=0.03767262 pennation_angle_at_optimal=0.314 activation_time_constant=0.0121
        deactivation_time_constant=0.0479
      PathPoint P1: torso (-0.03574383 0.3824125 0.1614546)
      PathPoint P2: torso (-0.02502068 0.3622855 0.1829819)
      PathPoint P3: humerus_r (-0.004339668 -0.1327387 0)
    DeGrooteFregly2016Muscle lats_r: max_isometric_force=1064 optimal_fiber_length=0.266666
        tendon_slack_length=0.09238822 pennation_angle_at_optimal=0.332 activation_time_constant=0.0293
        deactivation_time_constant=0.0909
      PathPoint P1: torso (-0.06553036 0.1157301 0.02152728)
      PathPoint P2: torso (-0.09531689 0.1831555 0.07534548)
      PathPoint P3: torso (-0.08340228 0.2515872 0.1291637)
      PathPoint P4: humerus_r (-0.003471735 -0.02212312 0.00458921)
      PathWrap: wrap_object=upperribcage method=hybrid
    DeGrooteFregly2016Muscle supraspinatus_r: max_isometric_force=488 optimal_fiber_length=0.07321678
        tendon_slack_length=0.06029617 pennation_angle_at_optimal=0.122 activation_time_constant=0.0091
        deactivation_time_constant=0.0403
      PathPoint P1: torso (-0.07148766 0.372349 0.1076364)
      PathPoint P2: torso (0 0.3975077 0.1808292)
      PathPoint P3: humerus_r (0.008679337 0.00553078 0.01835684)
      PathWrap: wrap_object=shoulder_r method=hybrid
    DeGrooteFregly2016Muscle infraspinatus_r: max_isometric_force=1211 optimal_fiber_length=0.08522743
        tendon_slack_length=0.03969804 pennation_angle_at_optimal=0.3316 activation_time_constant=0.0117
        deactivation_time_constant=0.0467
      PathPoint P1: torso (-0.08935958 0.3069364 0.1130182)
      PathPoint P2: humerus_r (-0.0104152 0 -0.00458921)
      PathWrap: wrap_object=shoulder_r method=hybrid
    DeGrooteFregly2016Muscle subscapularis_r: max_isometric_force=1378 optimal_fiber_length=0.09482091
        tendon_slack_length=0.05013519 pennation_angle_at_optimal=0.3491 activation_time_constant=0.0156
        deactivation_time_constant=0.0565
      PathPoint P1: torso (-0.06910474 0.3069364 0.1130182)
      PathPoint P2: torso (0.01787192 0.3552411 0.150691)
      PathPoint P3: humerus_r (0.02603801 0 -0.00458921)
    DeGrooteFregly2016Muscle addbrev_l: max_isometric_force=626 optimal_fiber_length=0.1123409
        tendon_slack_length=0.0386819 pennation_angle_at_optimal=0.1148 activation_time_constant=0.016
        deactivation_time_constant=0.0575
      PathPoint P1: pelvis (-0.02221702 -0.08506435 -0.0179298)
      PathPoint P2: femur_l (-0.002329768 -0.1136931 -0.03445951)
      PathWrap: wrap_object=AB_at_femshaft_l method=hybrid
    DeGrooteFregly2016Muscle addlong_l: max_isometric_force=917 optimal_fiber_length=0.1076061
        tendon_slack_length=0.1310766 pennation_angle_at_optimal=0.1378 activation_time_constant=0.0183
        deactivation_time_constant=0.0634
      PathPoint P1: pelvis (-0.008817017 -0.08044915 -0.02198147)
      PathPoint P2: femur_l (0.01311659 -0.2306332 -0.02190739)
      PathWrap: wrap_object=AL_at_femshaft_l method=hybrid
    DeGrooteFregly2016Muscle addmagDist_l: max_isometric_force=597 optimal_fiber_length=0.1769318
        tendon_slack_length=0.08724842 pennation_angle_at_optimal=0.194705 activation_time_constant=0.0199
        deactivation_time_constant=0.0673
      PathPoint P1: pelvis (-0.08612294 -0.1155337 -0.04636135)
      PathPoint P2: femur_l (0.01310495 -0.252919 -0.02670958)
      PathWrap: wrap_object=AMdist_at_femshaft_l method=hybrid
    DeGrooteFregly2016Muscle addmagIsch_l: max_isometric_force=597 optimal_fiber_length=0.1522245
        tendon_slack_length=0.2108368 pennation_angle_at_optimal=0.1680443 activation_time_constant=0.0182
        deactivation_time_constant=0.0629
      PathPoint P1: pelvis (-0.1042455 -0.117425 -0.04856183)
      PathPoint P2: femur_l (0.005603092 -0.3738095 0.04529557)
      PathWrap: wrap_object=AMisch_at_condyles_l method=hybrid
    DeGrooteFregly2016Muscle addmagMid_l: max_isometric_force=597 optimal_fiber_length=0.14681
        tendon_slack_length=0.04968296 pennation_angle_at_optimal=0.2073 activation_time_constant=0.0166
        deactivation_time_constant=0.059
      PathPoint P1: pelvis (-0.06125384 -0.1092715 -0.03322835)
      PathPoint P2: femur_l (0.002819019 -0.1564726 -0.04043803)
      PathWrap: wrap_object=AMmid_at_femshaft_l method=hybrid
    DeGrooteFregly2016Muscle addmagProx_l: max_isometric_force=597 optimal_fiber_length=0.1241603
        tendon_slack_length=0.04741149 pennation_angle_at_optimal=0.3114833 activation_time_constant=0.0139
        deactivation_time_constant=0.0522
      PathPoint P1: pelvis (-0.03603578 -0.09732628 -0.01589233)
      PathPoint P2: femur_l (-0.01778778 -0.07598169 -0.04431299)
      PathWrap: wrap_object=AMprox_at_femshaft_l method=hybrid
    DeGrooteFregly2016Muscle bflh_l: max_isometric_force=1313 optimal_fiber_length=0.09540738
        tendon_slack_length=0.3250303 pennation_angle_at_optimal=0.1759182 activation_time_constant=0.0217
        deactivation_time_constant=0.0717 active_force_width_scale=1.5
      PathPoint P1: pelvis (-0.1209723 -0.1077783 -0.0682264)
      PathPoint P2: tibia_l (-0.04094262 -0.03582924 -0.0445151)
      PathPoint P3: tibia_l (-0.03222027 -0.04918663 -0.04276797)
    DeGrooteFregly2016Muscle bfsh_l: max_isometric_force=557 optimal_fiber_length=0.1071157
        tendon_slack_length=0.1027457 pennation_angle_at_optimal=0.2642 activation_time_constant=0.0115
        deactivation_time_constant=0.0462
      PathPoint P1: femur_l (0.00582442 -0.2033951 -0.03238364)
      PathPoint P2: tibia_l (-0.03415062 -0.03225417 -0.03942134)
      PathWrap: wrap_object=BF140_at_gastroc_l method=hybrid
    DeGrooteFregly2016Muscle edl_l: max_isometric_force=603 optimal_fiber_length=0.06915211
        tendon_slack_length=0.3681128 pennation_angle_at_optimal=0.2183 activation_time_constant=0.0094
        deactivation_time_constant=0.0411 active_force_width_scale=1.5
      PathPoint P1: tibia_l (-0.01906525 -0.113636 -0.02522277)
      PathPoint P2: tibia_l (0.01954188 -0.3692926 -0.01378024)
      PathPoint P3: calcn_l (0.09514978 0.02700013 -0.0008873057)
      PathPoint P4: calcn_l (0.1673145 0.00412502 -0.01441872)
      PathPoint P5: toes_l (0.0003100314 0.003833262 -0.01386898)
      PathPoint P6: toes_l (0.0457813 -0.0003262351 -0.02266173)
    DeGrooteFregly2016Muscle ehl_l: max_isometric_force=286 optimal_fiber_length=0.07543529
        tendon_slack_length=0.3295756 pennation_angle_at_optimal=0.1972681 activation_time_constant=0.0102
        deactivation_time_constant=0.043 active_force_width_scale=1.5
      PathPoint P1: tibia_l (-0.01668209 -0.152235 -0.02325416)
      PathPoint P2: tibia_l (0.008460203 -0.2857107 -0.02017821)
      PathPoint P3: tibia_l (0.02383156 -0.3627121 0.003445061)
      PathPoint P4: calcn_l (0.1004301 0.02917514 0.02340269)
      PathPoint P5: calcn_l (0.1338723 0.02317511 0.0285047)
      PathPoint P6: calcn_l (0.1795318 0.01042505 0.0310557)
      PathPoint P7: toes_l (0.03079645 0.00334391 0.02220849)
      PathPoint P8: toes_l (0.05818256 0.002772998 0.01686033)
    DeGrooteFregly2016Muscle ercspn_l: max_isometric_force=2500 optimal_fiber_length=0.1423212
        tendon_slack_length=0.02969148 pennation_angle_at_optimal=0 activation_time_constant=0.053
        deactivation_time_constant=0.1501
      PathPoint P1: pelvis (-0.1628473 0.03972686 -0.0507623)
      PathPoint P2: torso (-0.06553036 0.1106984 -0.02594037)
    DeGrooteFregly2016Muscle extobl_l: max_isometric_force=900 optimal_fiber_length=0.1158361
        tendon_slack_length=0.1351422 pennation_angle_at_optimal=0 activation_time_constant=0.0145
        deactivation_time_constant=0.0538
      PathPoint P1: pelvis (-0.03489584 -0.05755417 -0.01164273)
      PathPoint P2: torso (0.07744497 0.1106984 -0.1184)
    DeGrooteFregly2016Muscle fdl_l: max_isometric_force=423 optimal_fiber_length=0.04456249
        tendon_slack_length=0.3784814 pennation_angle_at_optimal=0.2248 activation_time_constant=0.007
        deactivation_time_constant=0.035 active_force_width_scale=1.5
      PathPoint P1: tibia_l (-0.002740629 -0.1799319 0.002214682)
      PathPoint P2: tibia_l (-0.02097177 -0.3579977 0.0152567)
      PathPoint P3: calcn_l (0.04514179 0.02362511 0.0310557)
      PathPoint P4: calcn_l (0.07330364 0.01320006 0.02917017)
      PathPoint P5: calcn_l (0.171663 -0.006075029 -0.01286593)
      PathPoint P6: toes_l (-0.001963532 -0.006361584 -0.0133251)
      PathPoint P7: toes_l (0.02945298 -0.005790673 -0.01948909)
      PathPoint P8: toes_l (0.04557462 -0.004893527 -0.02193655)
    DeGrooteFregly2016Muscle fhl_l: max_isometric_force=908 optimal_fiber_length=0.05304456
        tendon_slack_length=0.3566165 pennation_angle_at_optimal=0.258 activation_time_constant=0.01
        deactivation_time_constant=0.0425 active_force_width_scale=1.5
      PathPoint P1: tibia_l (-0.03693892 -0.2124414 -0.02460758)
      PathPoint P2: tibia_l (-0.02883619 -0.3605513 0.009350879)
      PathPoint P3: calcn_l (0.03872254 0.0207001 0.02673008)
      PathPoint P4: calcn_l (0.1074706 0.005100024 0.02839378)
      PathPoint P5: calcn_l (0.1787035 -0.003975019 0.02983565)
      PathPoint P6: toes_l (0.01601829 -0.005219762 0.02402143)
      PathPoint P7: toes_l (0.05807921 -0.008318995 0.01640709)
    DeGrooteFregly2016Muscle gaslat_l: max_isometric_force=1575 optimal_fiber_length=0.06788867
        tendon_slack_length=0.3679763 pennation_angle_at_optimal=0.2102 activation_time_constant=0.017
        deactivation_time_constant=0.06 active_force_width_scale=1.5
      PathPoint P1: femur_l (0.002329768 -0.3670939 -0.02849483)
      PathPoint P2: calcn_l (0.004555593 0.02325011 0.0058784)
      PathWrap gaslat1: wrap_object=GasLat_at_shank_l method=hybrid
      PathWrap gaslat2: wrap_object=GasLat_at_condyles_l method=hybrid
    DeGrooteFregly2016Muscle gasmed_l: max_isometric_force=3116 optimal_fiber_length=0.05922023
        tendon_slack_length=0.3884446 pennation_angle_at_optimal=0.1656816 activation_time_constant=0.0253
        deactivation_time_constant=0.0807 active_force_width_scale=1.5
      PathPoint P1: femur_l (0.006989304 -0.3709479 0.03044615)
      PathPoint P2: calcn_l (0.004555593 0.02325011 0.0058784)
      PathWrap gasmed1: wrap_object=GasMed_at_shank_l method=hybrid
      PathWrap gasmed2: wrap_object=GasMed_at_condyles_l method=hybrid
    DeGrooteFregly2016Muscle gem_l: max_isometric_force=286 optimal_fiber_length=0.0307063
        tendon_slack_length=0.04989773 pennation_angle_at_optimal=0 activation_time_constant=0.0056
        deactivation_time_constant=0.0316 active_force_width_scale=1.5
      PathPoint P1: pelvis (-0.13179 -0.07420507 -0.08312909)
      PathPoint P2: femur_l (-0.01654135 -0.003179553 -0.06130748)
    DeGrooteFregly2016Muscle glmax1_l: max_isometric_force=984 optimal_fiber_length=0.1473595
        tendon_slack_length=0.09122254 pennation_angle_at_optimal=0.3540118 activation_time_constant=0.0258
        deactivation_time_constant=0.082
      PathPoint P1: pelvis (-0.1431893 0.03122042 -0.06554857)
      PathPoint P2: pelvis (-0.1462136 -0.02189954 -0.09069687)
      PathPoint P3: femur_l (-0.05172085 -0.03141013 -0.04179427)
      PathPoint P4: femur_l (-0.03226729 -0.05453416 -0.06504406)
      PathWrap: wrap_object=Gmax1_at_pelvis_l method=hybrid
    DeGrooteFregly2016Muscle glmax2_l: max_isometric_force=1406 optimal_fiber_length=0.158841
        tendon_slack_length=0.1173602 pennation_angle_at_optimal=0.3673821 activation_time_constant=0.0367
        deactivation_time_constant=0.1093
      PathPoint P1: pelvis (-0.1531928 0.007872977 -0.05378941)
      PathPoint P2: pelvis (-0.1563334 -0.05511084 -0.09465539)
      PathPoint P3: femur_l (-0.05241978 -0.05626846 -0.03487469)
      PathPoint P4: femur_l (-0.01817219 -0.09789171 -0.05798608)
      PathWrap: wrap_object=Gmax2_at_pelvis_l method=hybrid
    DeGrooteFregly2016Muscle glmax3_l: max_isometric_force=948 optimal_fiber_length=0.1781564
        tendon_slack_length=0.1344174 pennation_angle_at_optimal=0.3824161 activation_time_constant=0.0278
        deactivation_time_constant=0.0869
      PathPoint P1: pelvis (-0.1512153 -0.04750934 -0.01047846)
      PathPoint P2: pelvis (-0.1480747 -0.1142939 -0.05064588)
      PathPoint P3: femur_l (-0.03273324 -0.1083939 -0.01300881)
      PathPoint P4: femur_l (-0.006989304 -0.1367208 -0.05687895)
      PathWrap: wrap_object=Gmax3_at_pelvis_l method=hybrid
    DeGrooteFregly2016Muscle glmed1_l: max_isometric_force=1093 optimal_fiber_length=0.07001869
        tendon_slack_length=0.05353728 pennation_angle_at_optimal=0.3165559 activation_time_constant=0.0258
        deactivation_time_constant=0.0821
      PathPoint P1: pelvis (-0.05176217 0.02217103 -0.1364528)
      PathPoint P2: femur_l (-0.02539447 -0.01127296 -0.07680734)
    DeGrooteFregly2016Muscle glmed2_l: max_isometric_force=765 optimal_fiber_length=0.07476068
        tendon_slack_length=0.06677255 pennation_angle_at_optimal=0.3165559 activation_time_constant=0.0196
        deactivation_time_constant=0.0665
      PathPoint P1: pelvis (-0.09887156 0.0285961 -0.07858843)
      PathPoint P2: femur_l (-0.03005401 -0.005588306 -0.07293238)
    DeGrooteFregly2016Muscle glmed3_l: max_isometric_force=871 optimal_fiber_length=0.08267591
        tendon_slack_length=0.05122831 pennation_angle_at_optimal=0.3165559 activation_time_constant=0.0216
        deactivation_time_constant=0.0715
      PathPoint P1: pelvis (-0.134 -0.006606061 -0.06124076)
      PathPoint P2: femur_l (-0.03599492 -0.004528455 -0.07168685)
    DeGrooteFregly2016Muscle glmin1_l: max_isometric_force=374 optimal_fiber_length=0.0704148
        tendon_slack_length=0.01671086 pennation_angle_at_optimal=0.1745329 activation_time_constant=0.0087
        deactivation_time_constant=0.0391
      PathPoint P1: pelvis (-0.05397224 -0.0134836 -0.1213172)
      PathPoint P2: femur_l (-0.008387165 -0.01002041 -0.0774993)
    DeGrooteFregly2016Muscle glmin2_l: max_isometric_force=395 optimal_fiber_length=0.05888972
        tendon_slack_length=0.02744682 pennation_angle_at_optimal=0 activation_time_constant=0.0082
        deactivation_time_constant=0.038
      PathPoint P1: pelvis (-0.0716528 -0.01285015 -0.1130509)
      PathPoint P2: femur_l (-0.01118289 -0.01002041 -0.0774993)
    DeGrooteFregly2016Muscle glmin3_l: max_isometric_force=447 optimal_fiber_length=0.04203693
        tendon_slack_length=0.05627694 pennation_angle_at_optimal=0.01745329 activation_time_constant=0.0074
        deactivation_time_constant=0.0361
      PathPoint P1: pelvis (-0.09177607 -0.01402657 -0.09290899)
      PathPoint P2: femur_l (-0.01572593 -0.007997059 -0.07611538)
    DeGrooteFregly2016Muscle grac_l: max_isometric_force=281 optimal_fiber_length=0.2238383
        tendon_slack_length=0.1690087 pennation_angle_at_optimal=0.172 activation_time_constant=0.0147
        deactivation_time_constant=0.0543
      PathPoint P1: pelvis (-0.05508891 -0.1170268 -0.02859454)
      PathPoint P2: tibia_l (-0.02194887 -0.04670176 0.03643152)
      PathPoint P3: tibia_l (0.002121009 -0.06837805 0.01935386)
      PathWrap: wrap_object=GR_at_condyles_l method=hybrid
    DeGrooteFregly2016Muscle iliacus_l: max_isometric_force=1021 optimal_fiber_length=0.1062377
        tendon_slack_length=0.09577342 pennation_angle_at_optimal=0.2799 activation_time_constant=0.0202
        deactivation_time_constant=0.068
      PathPoint P1: pelvis (-0.07037329 0.02796264 -0.09814821)
      PathPoint P2: pelvis (-0.01570313 -0.05040515 -0.08801904)
      PathPoint P3: femur_l (-0.002679233 -0.05443781 -0.01923643)
      PathPoint P4: femur_l (-0.01421159 -0.06137502 -0.02712476)
      PathWrap: wrap_object=IL_at_brim_l method=hybrid range=(2 3)
    DeGrooteFregly2016Muscle intobl_l: max_isometric_force=900 optimal_fiber_length=0.1048845
        tendon_slack_length=0.1048845 pennation_angle_at_optimal=0 activation_time_constant=0.0129
        deactivation_time_constant=0.0499
      PathPoint P1: pelvis (-0.04652779 0.06334579 -0.1347064)
      PathPoint P2: torso (0.08340228 0.1610158 -0.01614546)
    DeGrooteFregly2016Muscle pect_l: max_isometric_force=464 optimal_fiber_length=0.0858209
        tendon_slack_length=0.03540112 pennation_angle_at_optimal=0 activation_time_constant=0.008
        deactivation_time_constant=0.0375
      PathPoint P1: pelvis (-0.0501337 -0.06949938 -0.05250871)
      PathPoint P2: femur_l (-0.01421159 -0.07919979 -0.03501308)
    DeGrooteFregly2016Muscle perbrev_l: max_isometric_force=521 optimal_fiber_length=0.04700464
        tendon_slack_length=0.1527133 pennation_angle_at_optimal=0.2052 activation_time_constant=0.0083
        deactivation_time_constant=0.0382
      PathPoint P1: tibia_l (-0.02895534 -0.2486832 -0.03088251)
      PathPoint P2: tibia_l (-0.04039449 -0.3823553 -0.03063643)
      PathPoint P3: tibia_l (-0.03395997 -0.3932573 -0.03137466)
      PathPoint P4: calcn_l (0.04876555 0.0202501 -0.02584278)
      PathPoint P5: calcn_l (0.07009401 0.01642508 -0.03804323)
    DeGrooteFregly2016Muscle perlong_l: max_isometric_force=1115 optimal_fiber_length=0.05148388
        tendon_slack_length=0.3366721 pennation_angle_at_optimal=0.248 activation_time_constant=0.0128
        deactivation_time_constant=0.0495
      PathPoint P1: tibia_l (-0.02383156 -0.1348507 -0.03469668)
      PathPoint P2: tibia_l (-0.03777302 -0.3830428 -0.02915998)
      PathPoint P3: tibia_l (-0.03241092 -0.3942395 -0.02952909)
      PathPoint P4: calcn_l (0.04534886 0.01725008 -0.02451182)
      PathPoint P5: calcn_l (0.07050816 0.007950038 -0.03149935)
      PathPoint P6: calcn_l (0.08821285 0.005175025 -0.01308776)
      PathPoint P7: calcn_l (0.1245541 0.00637503 0.02040803)
    DeGrooteFregly2016Muscle pertert_l: max_isometric_force=314 optimal_fiber_length=0.06793769
        tendon_slack_length=0.07665748 pennation_angle_at_optimal=0.2269 activation_time_constant=0.0068
        deactivation_time_constant=0.0344
      PathPoint P1: tibia_l (0.001191578 -0.275398 -0.02842175)
      PathPoint P2: tibia_l (0.02728713 -0.3849089 -0.03186681)
      PathPoint P3: calcn_l (0.08873053 0.01710008 -0.03316305)
    DeGrooteFregly2016Muscle piri_l: max_isometric_force=1030 optimal_fiber_length=0.0298148
        tendon_slack_length=0.1317585 pennation_angle_at_optimal=0.1745 activation_time_constant=0.0117
        deactivation_time_constant=0.0468
      PathPoint P1: pelvis (-0.1184249 -0.005909257 -0.01572933)
      PathPoint P2: pelvis (-0.1186691 -0.02774546 -0.07092751)
      PathPoint P3: femur_l (-0.01724028 -0.003468604 -0.06047713)
    DeGrooteFregly2016Muscle psoas_l: max_isometric_force=1427 optimal_fiber_length=0.1154694
        tendon_slack_length=0.09828233 pennation_angle_at_optimal=0.2155251 activation_time_constant=0.0252
        deactivation_time_constant=0.0804
      PathPoint P1: pelvis (-0.07048961 0.05610627 -0.04540665)
      PathPoint P2: pelvis (-0.02384549 -0.05918307 -0.07637631)
      PathPoint P3: femur_l (-0.01537647 -0.0449955 -0.006366014)
      PathPoint P4: femur_l (-0.02737478 -0.05048745 -0.01217846)
      PathWrap: wrap_object=PS_at_brim_l method=hybrid range=(2 3)
    DeGrooteFregly2016Muscle quadfem_l: max_isometric_force=665 optimal_fiber_length=0.06924565
        tendon_slack_length=0.03077584 pennation_angle_at_optimal=0 activation_time_constant=0.0112
        deactivation_time_constant=0.0455
      PathPoint P1: pelvis (-0.1329532 -0.1041586 -0.0605422)
      PathPoint P2: femur_l (-0.04438208 -0.03458969 -0.05065133)
    DeGrooteFregly2016Muscle recabd_l: max_isometric_force=658 optimal_fiber_length=0.3462164
        tendon_slack_length=0.01642668 pennation_angle_at_optimal=0 activation_time_constant=0.0302
        deactivation_time_constant=0.093
      PathPoint rectabd_l-P1: pelvis (-0.03024307 -0.06334579 -0.012807)
      PathPoint rectabd_l-P2: torso (0.1096144 0.2233913 -0.03336729)
    DeGrooteFregly2016Muscle recfem_l: max_isometric_force=2192 optimal_fiber_length=0.07309051
        tendon_slack_length=0.4337282 pennation_angle_at_optimal=0.217 activation_time_constant=0.0161
        deactivation_time_constant=0.0577 active_force_width_scale=1.5
      PathPoint P1: pelvis (-0.02791668 -0.03511167 -0.1086267)
      PathPoint P2: patella_l (0.01 0.049 -0.0007)
      PathPoint P3: patella_l (0.0121 0.0437 0.001)
      PathPoint P4: patella_l (0.005 0.00247 -3e-5)
      PathPoint P5: tibia_l (0.03884544 -0.06199401 0.000578278)
      PathWrap: wrap_object=KnExt_at_fem_l method=hybrid
    DeGrooteFregly2016Muscle sart_l: max_isometric_force=249 optimal_fiber_length=0.3985837
        tendon_slack_length=0.1226411 pennation_angle_at_optimal=0.0261 activation_time_constant=0.0171
        deactivation_time_constant=0.0603
      PathPoint P1: pelvis (-0.0226823 -0.01411706 -0.1229472)
      PathPoint P2: femur_l (-0.003494652 -0.3437772 0.05826287)
      PathPoint P3: tibia_l (-0.02990861 -0.03938466 0.04490883)
      PathPoint P4: tibia_l (-0.01894609 -0.05883145 0.032482)
      PathPoint P5: tibia_l (0.01620546 -0.07955505 0.003198985)
    DeGrooteFregly2016Muscle semimem_l: max_isometric_force=2201 optimal_fiber_length=0.08332845
        tendon_slack_length=0.3245934 pennation_angle_at_optimal=0.2546 activation_time_constant=0.0323
        deactivation_time_constant=0.0983 active_force_width_scale=1.5
      PathPoint P1: pelvis (-0.1148073 -0.1031631 -0.07148636)
      PathPoint P2: tibia_l (-0.0321726 -0.0402686 0.02411542)
      PathWrap: wrap_object=SM_at_condyles_l method=hybrid
    DeGrooteFregly2016Muscle semiten_l: max_isometric_force=591 optimal_fiber_length=0.1901603
        tendon_slack_length=0.2435629 pennation_angle_at_optimal=0.2413 activation_time_constant=0.0157
        deactivation_time_constant=0.0567 active_force_width_scale=1.5
      PathPoint P1: pelvis (-0.1207396 -0.113389 -0.05996006)
      PathPoint P2: tibia_l (-0.03717723 -0.04989378 0.02817567)
      PathPoint P3: tibia_l (0.002263998 -0.07592105 0.01439543)
      PathWrap: wrap_object=ST_at_condyles_l method=hybrid
    DeGrooteFregly2016Muscle soleus_l: max_isometric_force=6195 optimal_fiber_length=0.04278029
        tendon_slack_length=0.2735994 pennation_angle_at_optimal=0.3814289 activation_time_constant=0.0618
        deactivation_time_constant=0.172
      PathPoint P1: tibia_l (-0.009055992 -0.08996596 -0.01205771)
      PathPoint P2: calcn_l (0.004555593 0.02325011 0.0058784)
    DeGrooteFregly2016Muscle tfl_l: max_isometric_force=411 optimal_fiber_length=0.09128431
        tendon_slack_length=0.4319189 pennation_angle_at_optimal=0.0524 activation_time_constant=0.0104
        deactivation_time_constant=0.0436
      PathPoint P1: pelvis (-0.03617536 0.01936571 -0.1444863)
      PathPoint P2: femur_l (0.03424759 -0.09586835 -0.08261979)
      PathPoint P3: femur_l (0.01246426 -0.3902179 -0.04483888)
      PathPoint P4: tibia_l (0.01286904 -0.0402686 -0.04257111)
    DeGrooteFregly2016Muscle tibant_l: max_isometric_force=1227 optimal_fiber_length=0.06706398
        tendon_slack_length=0.2361477 pennation_angle_at_optimal=0.1951828 activation_time_constant=0.0231
        deactivation_time_constant=0.0753
      PathPoint P1: tibia_l (0.0183503 -0.1288595 -0.01993214)
      PathPoint P2: tibia_l (0.02990861 -0.1871999 -0.01574885)
      PathPoint P3: tibia_l (0.02776377 -0.3593727 0.016241)
      PathPoint P4: calcn_l (0.1207232 0.01335006 0.03382853)
    DeGrooteFregly2016Muscle tibpost_l: max_isometric_force=1730 optimal_fiber_length=0.03714722
        tendon_slack_length=0.2759508 pennation_angle_at_optimal=0.2265 activation_time_constant=0.0198
        deactivation_time_constant=0.067
      PathPoint P1: tibia_l (-0.00488547 -0.1280738 -0.0126729)
      PathPoint P2: tibia_l (-0.01954188 -0.3589799 0.02153163)
      PathPoint P3: calcn_l (0.0431746 0.02505012 0.03172118)
      PathPoint P4: calcn_l (0.07992995 0.01192506 0.03116661)
    DeGrooteFregly2016Muscle vasint_l: max_isometric_force=1697 optimal_fiber_length=0.1147692
        tendon_slack_length=0.2010913 pennation_angle_at_optimal=0.06309973 activation_time_constant=0.0261
        deactivation_time_constant=0.0827
      PathPoint P1: femur_l (0.03378164 -0.1853776 -0.0429014)
      PathPoint P2: femur_l (0.03902362 -0.2007936 -0.03944161)
      PathPoint P3: patella_l (0.0058 0.048 0.0006)
      PathPoint P4: patella_l (0.005 0.00247 0.00039)
      PathPoint P5: tibia_l (0.03880969 -0.06207258 -0.0005290629)
      PathWrap: wrap_object=KnExt_at_fem_l method=hybrid
    DeGrooteFregly2016Muscle vaslat_l: max_isometric_force=5149 optimal_fiber_length=0.1162594
        tendon_slack_length=0.2196011 pennation_angle_at_optimal=0.2529 activation_time_constant=0.0485
        deactivation_time_constant=0.1387
      PathPoint P1: femur_l (0.005591443 -0.1786331 -0.04829867)
      PathPoint P2: femur_l (0.03133538 -0.2496431 -0.05660217)
      PathPoint P3: patella_l (0.0103 0.0423 -0.0141)
      PathPoint P4: patella_l (0.005 0.00247 -0.00733)
      PathPoint P5: tibia_l (0.03877395 -0.06224937 -0.006287236)
      PathWrap: wrap_object=KnExtVL_at_fem_l method=hybrid
    DeGrooteFregly2016Muscle vasmed_l: max_isometric_force=2748 optimal_fiber_length=0.1083895
        tendon_slack_length=0.2049547 pennation_angle_at_optimal=0.4222 activation_time_constant=0.0339
        deactivation_time_constant=0.1022
      PathPoint P1: femur_l (0.01630838 -0.2022389 -0.02601762)
      PathPoint P2: femur_l (0.04146987 -0.2667934 -0.001245524)
      PathPoint P3: patella_l (0.0063 0.0445 0.017)
      PathPoint P4: patella_l (0.005 0.00247 0.0085)
      PathPoint P5: tibia_l (0.03801134 -0.06243598 0.008341968)
      PathWrap: wrap_object=KnExt_at_fem_l method=hybrid
    DeGrooteFregly2016Muscle biceps_l: max_isometric_force=1064 optimal_fiber_length=0.1228949
        tendon_slack_length=0.2277794 pennation_angle_at_optimal=0 activation_time_constant=0.0128
        deactivation_time_constant=0.0495 passive_fiber_strain_at_one_norm_force=1
      PathPoint P1: torso (0.01787192 0.4025395 -0.1560728)
      PathPoint P2: humerus_l (0.01883416 0.0001106156 0.001009626)
      PathPoint P3: radius_l (-0.002815887 -0.02932053 -0.01021186)
      PathWrap: wrap_object=elbow_ant_l method=hybrid
    DeGrooteFregly2016Muscle brachialis_l: max_isometric_force=987 optimal_fiber_length=0.09291444
        tendon_slack_length=0.05293962 pennation_angle_at_optimal=0 activation_time_constant=0.0097
        deactivation_time_constant=0.0419
      PathPoint P2: humerus_l (0.013019 -0.1659234 0.001009626)
      PathPoint P3: ulna_l (0 -0.01218642 0.004762992)
      PathWrap: wrap_object=elbow_ant_l method=hybrid
    DeGrooteFregly2016Muscle tricepslong_l: max_isometric_force=798 optimal_fiber_length=0.1432215
        tendon_slack_length=0.227658 pennation_angle_at_optimal=0.209 activation_time_constant=0.009
        deactivation_time_constant=0.04
      PathPoint P1: torso (-0.01191461 0.3471903 -0.1614546)
      PathPoint P2: ulna_l (-0.02995625 -0.03922402 -0.005648909)
      PathWrap: wrap_object=elbow_pos_l method=hybrid
    DeGrooteFregly2016Muscle tricepsshort_l: max_isometric_force=1249 optimal_fiber_length=0.1204255
        tendon_slack_length=0.2197236 pennation_angle_at_optimal=0.157 activation_time_constant=0.0375
        deactivation_time_constant=0.1113
      PathPoint P1: humerus_l (-0.004339668 -0.0553078 0)
      PathPoint P2: ulna_l (-0.02995625 -0.03922402 -0.005648909)
      PathWrap: wrap_object=elbow_pos_l method=hybrid
    DeGrooteFregly2016Muscle pectoralis_l: max_isometric_force=1274 optimal_fiber_length=0.157687
        tendon_slack_length=0.01423563 pennation_angle_at_optimal=0.297 activation_time_constant=0.0166
        deactivation_time_constant=0.059
      PathPoint P1: torso (0.04765844 0.352222 -0.02152728)
      PathPoint P2: humerus_l (0.013019 -0.06636937 0.00458921)
      PathWrap: wrap_object=upperribcage method=hybrid
    DeGrooteFregly2016Muscle deltant_l: max_isometric_force=1143 optimal_fiber_length=0.1083314
        tendon_slack_length=0.08865489 pennation_angle_at_optimal=0.384 activation_time_constant=0.0162
        deactivation_time_constant=0.0581
      PathPoint P1: torso (0.01787192 0.4015331 -0.1399273)
      PathPoint P2: torso (0.04527552 0.3733554 -0.1829819)
      PathPoint P3: humerus_l (0.013019 -0.1327387 0)
    DeGrooteFregly2016Muscle deltmid_l: max_isometric_force=1143 optimal_fiber_length=0.1178105
        tendon_slack_length=0.06097784 pennation_angle_at_optimal=0.262 activation_time_constant=0.0174
        deactivation_time_constant=0.061
      PathPoint P1: torso (0 0.4015331 -0.1808292)
      PathPoint P2: torso (0 0.3824125 -0.209891)
      PathPoint P3: humerus_l (0.004339668 -0.1327387 -0.00917842)
    DeGrooteFregly2016Muscle deltpost_l: max_isometric_force=520 optimal_fiber_length=0.1517985
        tendon_slack_length=0.03767262 pennation_angle_at_optimal=0.314 activation_time_constant=0.0121
        deactivation_time_constant=0.0479
      PathPoint P1: torso (-0.03574383 0.3824125 -0.1614546)
      PathPoint P2: torso (-0.02502068 0.3622855 -0.1829819)
      PathPoint P3: humerus_l (-0.004339668 -0.1327387 0)
    DeGrooteFregly2016Muscle lats_l: max_isometric_force=1064 optimal_fiber_length=0.266666
        tendon_slack_length=0.09238822 pennation_angle_at_optimal=0.332 activation_time_constant=0.0293
        deactivation_time_constant=0.0909
      PathPoint P1: torso (-0.06553036 0.1157301 -0.02152728)
      PathPoint P2: torso (-0.09531689 0.1831555 -0.07534548)
      PathPoint P3: torso (-0.08340228 0.2515872 -0.1291637)
      PathPoint P4: humerus_l (-0.003471735 -0.02212312 -0.00458921)
      PathWrap: wrap_object=upperribcage method=hybrid
    DeGrooteFregly2016Muscle supraspinatus_l: max_isometric_force=488 optimal_fiber_length=0.07321678
        tendon_slack_length=0.06029617 pennation_angle_at_optimal=0.122 activation_time_constant=0.0091
        deactivation_time_constant=0.0403
      PathPoint P1: torso (-0.07148766 0.372349 -0.1076364)
      PathPoint P2: torso (0 0.3975077 -0.1808292)
      PathPoint P3: humerus_l (0.008679337 0.00553078 -0.01835684)
      PathWrap: wrap_object=shoulder_l method=hybrid
    DeGrooteFregly2016Muscle infraspinatus_l: max_isometric_force=1211 optimal_fiber_length=0.08522743
        tendon_slack_length=0.03969804 pennation_angle_at_optimal=0.3316 activation_time_constant=0.0117
        deactivation_time_constant=0.0467
      PathPoint P1: torso (-0.08935958 0.3069364 -0.1130182)
      PathPoint P2: humerus_l (-0.0104152 0 0.00458921)
      PathWrap: wrap_object=shoulder_l method=hybrid
    DeGrooteFregly2016Muscle subscapularis_l: max_isometric_force=1378 optimal_fiber_length=0.09482091
        tendon_slack_length=0.05013519 pennation_angle_at_optimal=0.3491 activation_time_constant=0.0156
        deactivation_time_constant=0.0565
      PathPoint P1: torso (-0.06910474 0.3069364 -0.1130182)
      PathPoint P2: torso (0.01787192 0.3552411 -0.150691)
      PathPoint P3: humerus_l (0.02603801 0 0.00458921)
    SmoothSphereHalfSpaceForce [values shared by the 22 below unless stated]: socket_half_space=/contactgeometryset/floor
        stiffness=3067776 [N/m^2] dissipation=2 [s/m] static_friction=0.8 dynamic_friction=0.8 viscous_friction=0.5
        transition_velocity=0.2 [m/s] hertz_smoothing=300 hunt_crossley_smoothing=50
    SmoothSphereHalfSpaceForce contactHeel_r: socket_sphere=/contactgeometryset/heel_r
    SmoothSphereHalfSpaceForce contactLatHeel_r: socket_sphere=/contactgeometryset/latheel_r
    SmoothSphereHalfSpaceForce contactMedHeel_r: socket_sphere=/contactgeometryset/medheel_r
    SmoothSphereHalfSpaceForce contactMid_r: socket_sphere=/contactgeometryset/mid_r
    SmoothSphereHalfSpaceForce contactLatMid_r: socket_sphere=/contactgeometryset/latmid_r
    SmoothSphereHalfSpaceForce contactMedMid_r: socket_sphere=/contactgeometryset/medmid_r
    SmoothSphereHalfSpaceForce contactMH1_r: socket_sphere=/contactgeometryset/mh1_r
    SmoothSphereHalfSpaceForce contactMH3_r: socket_sphere=/contactgeometryset/mh3_r
    SmoothSphereHalfSpaceForce contactMH5_r: socket_sphere=/contactgeometryset/mh5_r
    SmoothSphereHalfSpaceForce contactHallux_r: socket_sphere=/contactgeometryset/hallux_r
    SmoothSphereHalfSpaceForce contactOtherToes_r: socket_sphere=/contactgeometryset/othertoes_r stiffness=306777.6
    SmoothSphereHalfSpaceForce contactHeel_l: socket_sphere=/contactgeometryset/heel_l
    SmoothSphereHalfSpaceForce contactLatHeel_l: socket_sphere=/contactgeometryset/latheel_l
    SmoothSphereHalfSpaceForce contactMedHeel_l: socket_sphere=/contactgeometryset/medheel_l
    SmoothSphereHalfSpaceForce contactMid_l: socket_sphere=/contactgeometryset/mid_l
    SmoothSphereHalfSpaceForce contactLatMid_l: socket_sphere=/contactgeometryset/latmid_l
    SmoothSphereHalfSpaceForce contactMedMid_l: socket_sphere=/contactgeometryset/medmid_l
    SmoothSphereHalfSpaceForce contactMH1_l: socket_sphere=/contactgeometryset/mh1_l
    SmoothSphereHalfSpaceForce contactMH3_l: socket_sphere=/contactgeometryset/mh3_l
    SmoothSphereHalfSpaceForce contactMH5_l: socket_sphere=/contactgeometryset/mh5_l
    SmoothSphereHalfSpaceForce contactHallux_l: socket_sphere=/contactgeometryset/hallux_l
    SmoothSphereHalfSpaceForce contactOtherToes_l: socket_sphere=/contactgeometryset/othertoes_l stiffness=306777.6
  MarkerSet:
    Marker LSHO: torso (0.01327227 0.4305165 -0.1521528) fixed=true
    Marker RSHO: torso (0.01085274 0.4181288 0.1671869)
    Marker CLAV: torso (0.1025344 0.3860584 -0.005170763)
    Marker LCLAV: torso (0.0953675 0.3902288 -0.0520551)
    Marker RCLAV: torso (0.09533416 0.3916435 0.06368588) fixed=true
    Marker XIPH: torso (0.156147 0.1714797 -0.00525553)
    Marker RASH: humerus_r (0.03393546 -0.01610573 -0.03138903)
    Marker RPSH: humerus_r (-0.02667827 -0.01244574 0.02304377)
    Marker RUA1: humerus_r (-0.04281726 -0.0867997 0.03754877)
    Marker RLEL: humerus_r (-0.02021948 -0.2812201 0.01057959)
    Marker RMEL: humerus_r (0.04118801 -0.3141467 -0.007279998)
    Marker RFAradius: ulna_r (0.00467614 -0.1953907 -0.01252723)
    Marker RFAulna: ulna_r (-0.01621913 -0.1906079 0.04873596)
    Marker RFIN: hand_r (-0.01827384 -0.07132703 -0.0005734554)
    Marker LASH: humerus_l (0.04741133 -0.008718928 -0.01871716)
    Marker LPSH: humerus_l (-0.05929071 -0.003021286 -0.01077985)
    Marker LUA1: humerus_l (0.02597462 -0.08854106 -0.03772038)
    Marker LLEL: humerus_l (0.004212939 -0.284528 -0.02682133)
    Marker LMEL: humerus_l (-0.0171884 -0.2859585 0.06058797)
    Marker LASI: pelvis (0.005325057 0.02418107 -0.125758)
    Marker LFAradius: ulna_l (0.02083894 -0.2045474 0.006809909)
    Marker LFAulna: ulna_l (-0.04043056 -0.1932232 -0.03874073)
    Marker LFIN: hand_l (-0.02859458 -0.05293718 -0.01236432)
    Marker LPSI: pelvis (-0.2114714 0.06099317 -0.04137852) fixed=true
    Marker LTH1: femur_l (0.008055875 -0.08676598 -0.1085557)
    Marker LTH2: femur_l (0.06806082 -0.2048082 -0.07381199)
    Marker LTH3: femur_l (0.001843257 -0.2772422 -0.06986032)
    Marker LTH4: femur_l (-0.06986225 -0.1839751 -0.06411022) fixed=true
    Marker LLFC: femur_l (-0.009037303 -0.3726811 -0.04909291)
    Marker LMFC: femur_l (0.02676068 -0.3912118 0.06518008)
    Marker LTB1: tibia_l (-0.01842405 -0.08754436 -0.06845411)
    Marker LTB2: tibia_l (0.03422606 -0.1730338 -0.03831343)
    Marker LTB3: tibia_l (-0.01410186 -0.2808162 -0.05618019)
    Marker LTB4: tibia_l (-0.07595062 -0.1753262 -0.05517164)
    Marker LLMAL: tibia_l (-0.003451276 -0.374427 -0.04567854)
    Marker LMMAL: tibia_l (0 -0.3830428 0.03937212)
    Marker LCAL: calcn_l (-0.01112129 0.007220643 0.0085113)
    Marker LCALM: calcn_l (0.01790293 0.004235747 0.03902552)
    Marker LCALL: calcn_l (0.014016 0.01561529 -0.02597205)
    Marker LTOE: toes_l (0.01416273 0.01642936 0.0379228)
    Marker LHLX: toes_l (0.06194459 0.02931023 0.004780995) fixed=true
    Marker LMT5: toes_l (0.04307182 0.01704073 -0.04729507)
    Marker LMFL: calcn_l (0.09714832 0.01398517 -0.04870261)
    Marker LMFM: calcn_l (0.1138898 0.02250011 0.05545661)
    Marker RTH1: femur_r (0.01799183 -0.03537396 0.1178919)
    Marker RTH2: femur_r (0.1004311 -0.1544553 0.06587889)
    Marker RTH3: femur_r (0.02020482 -0.2645229 0.08374923)
    Marker RTH4: femur_r (-0.06964788 -0.2274371 0.06119923) fixed=true
    Marker RLFC: femur_r (-0.0002506228 -0.3930896 0.05742621)
    Marker RMFC: femur_r (0.01119405 -0.394556 -0.0695288)
    Marker RTB1: tibia_r (-0.02826021 -0.100873 0.07706551)
    Marker RTB2: tibia_r (0.02901407 -0.2011835 0.05105744)
    Marker RTB3: tibia_r (-0.04167644 -0.2844601 0.05394161)
    Marker RTB4: tibia_r (-0.08863854 -0.189476 0.0289901)
    Marker RLMAL: tibia_r (-0.002420551 -0.3806464 0.04426867)
    Marker RMMAL: tibia_r (0.00995696 -0.3711984 -0.04504767)
    Marker RCAL: calcn_r (-0.008177241 0.01141179 -0.008677959)
    Marker RCALM: calcn_r (0.01844872 -0.004695434 -0.04131716)
    Marker RCALL: calcn_r (0.01324179 0.001904485 0.02427796)
    Marker RTOE: toes_r (0.01365267 0.01255593 -0.03421734)
    Marker RHLX: toes_r (0.06530763 0.02706688 -0.01237807) fixed=true
    Marker RMT5: toes_r (0.03799705 0.01780757 0.05323424)
    Marker RMFL: calcn_r (0.1138898 0.02250011 0.04991095)
    Marker RMFM: calcn_r (0.1138898 0.02250011 -0.05545661)
    Marker FHD: torso (0.1398936 0.6718916 -0.01532227)
    Marker RHD: torso (0.04973522 0.6082917 0.08291113) fixed=true
    Marker LHD: torso (0.03842044 0.62273 -0.09852801)
    Marker BACK: torso (-0.08935549 0.0001096695 0.00301967)
    Marker T10: torso (-0.110028 0.1569886 0.01598969)
    Marker C7: torso (-0.04624044 0.4584079 0.00842345)
    Marker RPSI: pelvis (-0.2083573 0.06278523 0.04840764)
    Marker RASI: pelvis (0.001661473 0.02738052 0.1379266)
  ContactGeometrySet:
    ContactSphere heel_r: socket_frame=/bodyset/calcn_r location=(0.001307528 -0.0081 0) radius=0.015
    ContactSphere latheel_r: socket_frame=/bodyset/calcn_r location=(0.02130753 -0.0081 0.025) radius=0.015
    ContactSphere medheel_r: socket_frame=/bodyset/calcn_r location=(0.02130753 -0.0081 -0.025) radius=0.015
    ContactSphere mid_r: socket_frame=/bodyset/calcn_r location=(0.08355376 -0.0081 0.0056) radius=0.015
    ContactSphere latmid_r: socket_frame=/bodyset/calcn_r location=(0.07215376 -0.0081 0.031) radius=0.015
    ContactSphere medmid_r: socket_frame=/bodyset/calcn_r location=(0.09165376 -0.0081 -0.023) radius=0.015
    ContactSphere mh1_r: socket_frame=/bodyset/calcn_r location=(0.182 -0.0081 -0.023) radius=0.015
    ContactSphere mh3_r: socket_frame=/bodyset/calcn_r location=(0.1658 -0.0081 0.0116) radius=0.015
    ContactSphere mh5_r: socket_frame=/bodyset/calcn_r location=(0.143 -0.0081 0.037) radius=0.015
    ContactSphere hallux_r: socket_frame=/bodyset/toes_r location=(0.0562 -0.0102 -0.0181) radius=0.015
    ContactSphere othertoes_r: socket_frame=/bodyset/toes_r location=(0.0441 -0.006 0.0242) radius=0.015
    ContactSphere heel_l: socket_frame=/bodyset/calcn_l location=(0.001307528 -0.0081 0) radius=0.015
    ContactSphere latheel_l: socket_frame=/bodyset/calcn_l location=(0.02130753 -0.0081 -0.025) radius=0.015
    ContactSphere medheel_l: socket_frame=/bodyset/calcn_l location=(0.02130753 -0.0081 0.025) radius=0.015
    ContactSphere mid_l: socket_frame=/bodyset/calcn_l location=(0.08355376 -0.0081 -0.0056) radius=0.015
    ContactSphere latmid_l: socket_frame=/bodyset/calcn_l location=(0.07215376 -0.0081 -0.031) radius=0.015
    ContactSphere medmid_l: socket_frame=/bodyset/calcn_l location=(0.09165376 -0.0081 0.023) radius=0.015
    ContactSphere mh1_l: socket_frame=/bodyset/calcn_l location=(0.182 -0.0081 0.023) radius=0.015
    ContactSphere mh3_l: socket_frame=/bodyset/calcn_l location=(0.1658 -0.0081 -0.0116) radius=0.015
    ContactSphere mh5_l: socket_frame=/bodyset/calcn_l location=(0.143 -0.0081 -0.037) radius=0.015
    ContactSphere hallux_l: socket_frame=/bodyset/toes_l location=(0.0562 -0.0102 0.0181) radius=0.015
    ContactSphere othertoes_l: socket_frame=/bodyset/toes_l location=(0.0441 -0.006 -0.0242) radius=0.015
    ContactHalfSpace floor: socket_frame=/ground location=(0 0 0) orientation=(0 0 -1.570796)
