# OpenSim document version 40000
ScaleTool TODO-subject-name:
  mass: 10
  height: 1.3
  age: -1
  GenericModelMaker:
    model_file: Rajagopal2015_passiveCal_hipAbdMoved.osim
  ModelScaler:
    apply: true
    scaling_order: manualScale
    time_range: -1 1
    preserve_mass_distribution: false
    output_model_file: rescaled.osim
    ScaleSet:
      Scale: scales=(0.929339 0.892987 1.003657) segment=pelvis apply=true
      Scale: scales=(1.405717 0.998739 1.364186) segment=femur_r apply=true
      Scale: scales=(1.428481 1.16384 0.877903) segment=tibia_r apply=true
      Scale: scales=(0.774179 0.805281 1.179335) segment=talus_r apply=true
      Scale: scales=(0.984245 1.418926 1.387718) segment=calcn_r apply=true
      Scale: scales=(1.070195 1.070195 1.070195) segment=toes_r apply=true
      Scale: scales=(1.405717 0.998739 1.364186) segment=femur_l apply=true
      Scale: scales=(1.428481 1.16384 0.877903) segment=tibia_l apply=true
      Scale: scales=(0.774179 0.805281 1.179335) segment=talus_l apply=true
      Scale: scales=(0.984245 1.418926 1.387718) segment=calcn_l apply=true
      Scale: scales=(1.070195 1.070195 1.070195) segment=toes_l apply=true
      Scale: scales=(0.953903 1.025802 1.128833) segment=torso apply=true
      Scale: scales=(1.396839 1.221969 1.429449) segment=humerus_r apply=true
      Scale: scales=(1.101861 1.058911 1.481523) segment=ulna_r apply=true
      Scale: scales=(1.465157 1.126932 0.758018) segment=radius_r apply=true
      Scale: scales=(1.070195 1.070195 1.070195) segment=hand_r apply=true
      Scale: scales=(1.396839 1.221969 1.429449) segment=humerus_l apply=true
      Scale: scales=(1.101861 1.058911 1.481523) segment=ulna_l apply=true
      Scale: scales=(1.465157 1.126932 0.758018) segment=radius_l apply=true
      Scale: scales=(1.070195 1.070195 1.070195) segment=hand_l apply=true
