# OpenSim document version 40000
Model ankle_perturb_sim_subject02:
  gravity: 0 -9.80665 0
  length_units: meters
  force_units: N
  Ground
  BodySet:
    Body pelvis: mass=10.88505 [kg] mass_center=(-0.07226671 0 0) inertia=(0.0920962 0.0920962 0.05235861 0 0 0)
        meshes=(r_pelvis.vtp l_pelvis.vtp sacrum.vtp)
      WrapCylinder Gmax1_at_pelvis_r: xyz_body_rotation=(-0.6 0.45 0) translation=(-0.07870632 -0.1060408 0.06341273)
          quadrant=-x radius=0.04177176 length=0.1566842
      WrapCylinder Gmax2_at_pelvis_r: xyz_body_rotation=(-0.75 0.39 0) translation=(-0.0817728 -0.08890288 0.0706896)
          quadrant=all radius=0.04166886 length=0.1049747
      WrapCylinder Gmax3_at_pelvis_r: xyz_body_rotation=(-0.1 0 0) translation=(-0.08483928 -0.09425847 0.0706896)
          quadrant=all radius=0.04185938 length=0.1039872
      WrapCylinder Gmax1_at_pelvis_l: xyz_body_rotation=(0.6 -0.45 0) translation=(-0.07870632 -0.1060408 -0.06341273)
          quadrant=-x radius=0.04177176 length=0.1566842
      WrapCylinder Gmax2_at_pelvis_l: xyz_body_rotation=(0.75 -0.39 0) translation=(-0.0817728 -0.08890288 -0.0706896)
          quadrant=all radius=0.04166886 length=0.1049747
      WrapCylinder Gmax3_at_pelvis_l: xyz_body_rotation=(0.1 0 0) translation=(-0.08483928 -0.09425847 -0.0706896)
          quadrant=all radius=0.04185938 length=0.1039872
      WrapCylinder PS_at_brim_r: xyz_body_rotation=(-0.25 -0.27 0.1) translation=(-0.07563984 -0.06426714 0.06819468)
          quadrant=-y radius=0.05231999 length=0.1040148
      WrapCylinder PS_at_brim_l: xyz_body_rotation=(0.25 0.27 0.1) translation=(-0.07563984 -0.06426714 -0.06819468)
          quadrant=-y radius=0.05231999 length=0.1040148
      WrapCylinder IL_at_brim_r: xyz_body_rotation=(-0.32 -0.24 0.9) translation=(-0.07257336 -0.06962273 0.07859021)
          quadrant=-y radius=0.05741982 length=0.1041568
      WrapCylinder IL_at_brim_l: xyz_body_rotation=(0.32 0.24 0.9) translation=(-0.07257336 -0.06962273 -0.07859021)
          quadrant=-y radius=0.05741982 length=0.1041568
    Body femur_r: mass=8.596941 mass_center=(0 -0.1773918 0) inertia=(0.1489602 0.04586907 0.1489602 0 0 0)
        meshes=femur_r.vtp
      WrapCylinder Gastroc_at_condyles_r: translation=(0.005658985 -0.4278272 0) quadrant=all radius=0.02719098
          length=0.1160702
      WrapCylinder KnExt_at_fem_r: xyz_body_rotation=(-0.0623366 0.0507601 0)
          translation=(0.004061205 -0.4202432 0.002427156) quadrant=all radius=0.02719791 length=0.1160198
      WrapCylinder AB_at_femshaft_r: xyz_body_rotation=(1.66157 0.186644 0)
          translation=(0.01657336 -0.1174907 0.0271198) quadrant=all radius=0.01888169 length=0.07333373
      WrapCylinder AL_at_femshaft_r: xyz_body_rotation=(1.77711 0.136489 0)
          translation=(0.03478318 -0.2419926 0.0175425) quadrant=all radius=0.02297767 length=0.1050262
      WrapCylinder AMprox_at_femshaft_r: xyz_body_rotation=(1.61126 0.18656 0)
          translation=(0.005866093 -0.07606434 0.02948531) quadrant=all radius=0.02415317 length=0.07327867
      WrapCylinder AMmid_at_femshaft_r: xyz_body_rotation=(1.61139 0.13656 0)
          translation=(0.02604548 -0.1676989 0.02389212) quadrant=all radius=0.02451097 length=0.1254462
      WrapCylinder AMdist_at_femshaft_r: xyz_body_rotation=(1.71188 0.186636 0)
          translation=(0.03577214 -0.2720731 0.01086951) quadrant=all radius=0.02493318 length=0.2097999
      WrapCylinder AMisch_at_condyles_r: xyz_body_rotation=(1.71115 -0.463363 0)
          translation=(-0.02563645 -0.393216 -0.003661284) quadrant=all radius=0.04547376 length=0.2552677
      WrapCylinder PECT_at_femshaft_r: xyz_body_rotation=(1.81295 0.276344 0)
          translation=(0.006887811 -0.08817717 0.03533235) quadrant=all radius=0.01710178 length=0.05284186
    Body tibia_r: mass=3.426705 mass_center=(0 -0.2270722 0) inertia=(0.08984413 0.008454309 0.08984413 0 0 0)
        meshes=(tibia_r.vtp r_fibula.vtp)
      WrapCylinder GasLat_at_shank_r: xyz_body_rotation=(2.96723 -0.279725 -1.47812)
          translation=(-0.008882634 -0.09000183 -0.003767673) quadrant=-y radius=0.06628139 length=0.1148423
      WrapCylinder GasMed_at_shank_r: xyz_body_rotation=(2.96723 0.0279725 -1.47812)
          translation=(-0.008882634 -0.09000183 -0.003767673) quadrant=-y radius=0.06639541 length=0.1144078
      WrapCylinder GR_at_condyles_r: xyz_body_rotation=(0 -0.4 0) translation=(-0.003601068 -0.02432482 0) quadrant=all
          radius=0.04334203 length=0.1150803
      WrapCylinder SM_at_condyles_r: xyz_body_rotation=(0 -0.1 0) translation=(-0.001200356 -0.02432482 0) quadrant=all
          radius=0.04252207 length=0.1142318
      WrapCylinder ST_at_condyles_r: xyz_body_rotation=(0 -0.2 0) translation=(-0.002400712 -0.02493294 0) quadrant=all
          radius=0.05130466 length=0.114409
      WrapCylinder BF_at_gastroc_r: translation=(-0.06962065 -0.07297446 0) quadrant=y radius=0.03624895
          length=0.1712578
    Body patella_r: mass=0.07967148 mass_center=(0.0018 0.0264 0) inertia=(2.082724e-6 9.513765e-6 9.513765e-6 0 0 0)
        meshes=r_patella.vtp
    Body talus_r: mass=0.09242631 mass_center=(0 0 0) inertia=(0.001094782 0.001139806 0.001139806 0 0 0)
        meshes=r_talus.vtp
    Body calcn_r: mass=1.155329 mass_center=(0.1056074 0.02524692 0)
        inertia=(0.0007923638 0.002746675 0.002746675 0 0 0) meshes=r_foot.vtp
    Body toes_r: mass=0.2001954 mass_center=(0.03926301 0.006559644 -0.01836826)
        inertia=(0.0001084365 0.0002367433 0.0002367433 0 0 0) meshes=r_bofoot.vtp
    Body femur_l: mass=8.596941 mass_center=(0 -0.1773918 0) inertia=(0.1489602 0.04586907 0.1489602 0 0 0)
        meshes=femur_l.vtp
      WrapCylinder Gastroc_at_condyles_l: translation=(0.005658985 -0.4278272 0) quadrant=all radius=0.02719098
          length=0.1160702
      WrapCylinder KnExt_at_fem_l: xyz_body_rotation=(0.0623366 -0.0507601 0)
          translation=(0.004061205 -0.4202432 -0.002427156) quadrant=all radius=0.02719791 length=0.1160198
      WrapCylinder AB_at_femshaft_l: xyz_body_rotation=(-1.66157 -0.186644 0)
          translation=(0.01657336 -0.1174907 -0.0271198) quadrant=all radius=0.01888169 length=0.07333373
      WrapCylinder AL_at_femshaft_l: xyz_body_rotation=(-1.77711 -0.136489 0)
          translation=(0.03478318 -0.2419926 -0.0175425) quadrant=all radius=0.02297767 length=0.1050262
      WrapCylinder AMprox_at_femshaft_l: xyz_body_rotation=(-1.61126 -0.18656 0)
          translation=(0.005866093 -0.07606434 -0.02948531) quadrant=all radius=0.02415317 length=0.07327867
      WrapCylinder AMmid_at_femshaft_l: xyz_body_rotation=(-1.61139 -0.13656 0)
          translation=(0.02604548 -0.1676989 -0.02389212) quadrant=all radius=0.02451097 length=0.1254462
      WrapCylinder AMdist_at_femshaft_l: xyz_body_rotation=(-1.71188 -0.186636 0)
          translation=(0.03577214 -0.2720731 -0.01086951) quadrant=all radius=0.02493318 length=0.2097999
      WrapCylinder AMisch_at_condyles_l: xyz_body_rotation=(-1.71115 0.463363 0)
          translation=(-0.02563645 -0.393216 0.003661284) quadrant=all radius=0.04547376 length=0.2552677
      WrapCylinder PECT_at_femshaft_l: xyz_body_rotation=(-1.81295 -0.276344 0)
          translation=(0.006887811 -0.08817717 -0.03533235) quadrant=all radius=0.01710178 length=0.05284186
    Body tibia_l: mass=3.426705 mass_center=(0 -0.2270722 0) inertia=(0.08984413 0.008454309 0.08984413 0 0 0)
        meshes=(tibia_l.vtp l_fibula.vtp)
      WrapCylinder GasLat_at_shank_l: xyz_body_rotation=(-2.96723 0.279725 -1.47812)
          translation=(-0.008882634 -0.09000183 0.003767673) quadrant=-y radius=0.06628139 length=0.1148423
      WrapCylinder GasMed_at_shank_l: xyz_body_rotation=(-2.96723 -0.0279725 -1.47812)
          translation=(-0.008882634 -0.09000183 0.003767673) quadrant=-y radius=0.06639541 length=0.1144078
      WrapCylinder GR_at_condyles_l: xyz_body_rotation=(0 0.4 0) translation=(-0.003601068 -0.02432482 0) quadrant=all
          radius=0.04334203 length=0.1150803
      WrapCylinder SM_at_condyles_l: xyz_body_rotation=(0 0.1 0) translation=(-0.001200356 -0.02432482 0) quadrant=all
          radius=0.04252207 length=0.1142318
      WrapCylinder ST_at_condyles_l: xyz_body_rotation=(0 0.2 0) translation=(-0.002400712 -0.02493294 0) quadrant=all
          radius=0.05130466 length=0.114409
      WrapCylinder BF_at_gastroc_l: translation=(-0.06962065 -0.07297446 0) quadrant=all radius=0.03624895
          length=0.1712578
    Body patella_l: mass=0.07967148 mass_center=(0.0018 0.0264 0) inertia=(2.082724e-6 9.513765e-6 9.513765e-6 0 0 0)
        meshes=l_patella.vtp
    Body talus_l: mass=0.09242631 mass_center=(0 0 0) inertia=(0.001094782 0.001139806 0.001139806 0 0 0)
        meshes=l_talus.vtp
    Body calcn_l: mass=1.155329 mass_center=(0.1056074 0.02524692 0)
        inertia=(0.0007923638 0.002746675 0.002746675 0 0 0) meshes=l_foot.vtp
    Body toes_l: mass=0.2001954 mass_center=(0.03926301 0.006559644 0.01836826)
        inertia=(0.0001084365 0.0002367433 0.0002367433 0 0 0) meshes=l_bofoot.vtp
    Body torso: mass=31.64363 mass_center=(-0.03038373 0.3237667 0) inertia=(1.372877 0.7847744 1.372877 0 0 0)
        meshes=(hat_spine.vtp hat_jaw.vtp hat_skull.vtp hat_ribs_scap.vtp)
    Body humerus_r: mass=1.878565 mass_center=(0 -0.2001841 0) inertia=(0.01702318 0.004691102 0.01702318 0 0 0)
        meshes=humerus_rv.vtp
    Body ulna_r: mass=0.5614898 mass_center=(0 -0.1364495 0) inertia=(0.003174637 0.000547466 0.003174637 0 0 0)
        meshes=ulna_rv.vtp
    Body radius_r: mass=0.5614898 mass_center=(0 -0.1364495 0) inertia=(0.003174637 0.000547466 0.003174637 0 0 0)
        meshes=radius_rv.vtp
    Body hand_r: mass=0.4228504 mass_center=(0 -0.07423676 0) inertia=(0.0009968585 0.0006113023 0.001497523 0 0 0)
        meshes=(pisiform_rvs.vtp lunate_rvs.vtp scaphoid_rvs.vtp triquetrum_rvs.vtp hamate_rvs.vtp capitate_rvs.vtp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)
    Body humerus_l: mass=1.878565 mass_center=(0 -0.2001841 0) inertia=(0.01702318 0.004691102 0.01702318 0 0 0)
        meshes=humerus_lv.vtp
    Body ulna_l: mass=0.5614898 mass_center=(0 -0.1364495 0) inertia=(0.003174637 0.000547466 0.003174637 0 0 0)
        meshes=ulna_lv.vtp
    Body radius_l: mass=0.5614898 mass_center=(0 -0.1364495 0) inertia=(0.003174637 0.000547466 0.003174637 0 0 0)
        meshes=radius_lv.vtp
    Body hand_l: mass=0.4228504 mass_center=(0 -0.07423676 0) inertia=(0.0009968585 0.0006113023 0.001497523 0 0 0)
        meshes=(pisiform_lvs.vtp lunate_lvs.vtp scaphoid_lvs.vtp triquetrum_lvs.vtp hamate_lvs.vtp capitate_lvs.vtp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)
  JointSet:
    CustomJoint ground_pelvis: socket_parent_frame=ground_offset socket_child_frame=pelvis_offset
      Coordinate pelvis_tilt: default_value=0 range=(-3.141593 3.141593) clamped=true
      Coordinate pelvis_list: default_value=0 range=(-3.141593 3.141593) clamped=true
      Coordinate pelvis_rotation: default_value=0 range=(-3.141593 3.141593) clamped=true
      Coordinate pelvis_tx: default_value=0 range=(-5 5) clamped=true
      Coordinate pelvis_ty: default_value=0.93 range=(-1 2) clamped=true
      Coordinate pelvis_tz: default_value=0 range=(-3 3) clamped=true
      PhysicalOffsetFrame ground_offset: socket_parent=/ground translation=(0 0 0) [meters]
      PhysicalOffsetFrame pelvis_offset: socket_parent=/bodyset/pelvis translation=(0 0 0)
      SpatialTransform:
        TransformAxis rotation1: coordinates=pelvis_tilt axis=(0 0 1) LinearFunction(coefficients=1 0)
        TransformAxis rotation2: coordinates=pelvis_list axis=(1 0 0) LinearFunction(coefficients=1 0)
        TransformAxis rotation3: coordinates=pelvis_rotation axis=(0 1 0) LinearFunction(coefficients=1 0)
        TransformAxis translation1: coordinates=pelvis_tx axis=(1 0 0) LinearFunction(coefficients=1 0)
        TransformAxis translation2: coordinates=pelvis_ty axis=(0 1 0) LinearFunction(coefficients=1 0)
        TransformAxis translation3: coordinates=pelvis_tz axis=(0 0 1) LinearFunction(coefficients=1 0)
    CustomJoint hip_r: socket_parent_frame=pelvis_offset socket_child_frame=femur_r_offset
      Coordinate hip_flexion_r: default_value=0 range=(-0.5235988 2.094395) clamped=true
      Coordinate hip_adduction_r: default_value=0 range=(-0.8726646 0.5235988) clamped=true
      Coordinate hip_rotation_r: default_value=0 range=(-0.6981317 0.6981317) clamped=true
      PhysicalOffsetFrame pelvis_offset: socket_parent=/bodyset/pelvis translation=(-0.05752308 -0.08407213 0.08031586)
      PhysicalOffsetFrame femur_r_offset: socket_parent=/bodyset/femur_r translation=(0 0 0)
      SpatialTransform: axes_held_at_zero=(translation1 translation2 translation3)
        TransformAxis rotation1: coordinates=hip_flexion_r axis=(0 0 1) LinearFunction(coefficients=1 0)
        TransformAxis rotation2: coordinates=hip_adduction_r axis=(1 0 0) LinearFunction(coefficients=1 0)
        TransformAxis rotation3: coordinates=hip_rotation_r axis=(0 1 0) LinearFunction(coefficients=1 0)
    CustomJoint walker_knee_r: socket_parent_frame=femur_r_offset socket_child_frame=tibia_r_offset
      Coordinate knee_angle_r: default_value=0 range=(0 2.0944) clamped=true
      PhysicalOffsetFrame femur_r_offset: socket_parent=/bodyset/femur_r
          translation=(-0.009156238 -0.4256985 -0.00319193) orientation=(-1.64157 1.44618 1.5708) [radians]
      PhysicalOffsetFrame tibia_r_offset: socket_parent=/bodyset/tibia_r
          translation=(-0.00971088 -0.004299412 -0.001695453) orientation=(-1.64157 1.44618 1.5708)
      SpatialTransform: axes_held_at_zero=translation3
        TransformAxis rotation1: coordinates=knee_angle_r axis=(1 0 0) LinearFunction(coefficients=1 0)
        TransformAxis rotation2: coordinates=knee_angle_r axis=(0 0 1)
          SimmSpline: x=(0 0.174533 0.349066 0.523599 0.698132 0.872665 1.0472 1.22173 1.39626 1.5708 1.74533 1.91986 2.0944)
              y=(0 0.012681 0.022697 0.029605 0.033205 0.033535 0.030878 0.025755 0.018929 0.011407 0.004433 -0.000505 -0.001678)
        TransformAxis rotation3: coordinates=knee_angle_r axis=(0 1 0)
          SimmSpline: x=(0 0.174533 0.349066 0.523599 0.698132 0.872665 1.0472 1.22173 1.39626 1.5708 1.74533 1.91986 2.0944)
              y=(0 0.059461 0.109399 0.150618 0.18392 0.210107 0.229983 0.24435 0.254012 0.25977 0.262428 0.262788 0.261654)
        TransformAxis translation1: coordinates=knee_angle_r axis=(0 1 0)
          MultiplierFunction: scale=1.043481
            SimmSpline: x=(0 0.174533 0.349066 0.523599 0.698132 0.872665 1.0472 1.22173 1.39626 1.5708 1.74533 1.91986 2.0944)
                y=(0 0.000479 0.000835 0.001086 0.001251 0.001346 0.001391 0.001403 0.0014 0.0014 0.001421 0.001481 0.001599)
        TransformAxis translation2: coordinates=knee_angle_r axis=(0 0 1)
          MultiplierFunction: scale=1.160702
            SimmSpline: x=(0 0.174533 0.349066 0.523599 0.698132 0.872665 1.0472 1.22173 1.39626 1.5708 1.74533 1.91986 2.0944)
                y=(0 0.000988 0.001899 0.002734 0.003492 0.004173 0.004777 0.005305 0.005756 0.00613 0.006427 0.006648 0.006792)
    CustomJoint patellofemoral_r: socket_parent_frame=femur_r_offset socket_child_frame=patella_r_offset
      Coordinate knee_angle_r_beta: default_value=0 range=(-99999.9 99999.9) clamped=false
      PhysicalOffsetFrame femur_r_offset: socket_parent=/bodyset/femur_r
          translation=(-0.009156238 -0.4256985 -0.00319193)
      PhysicalOffsetFrame patella_r_offset: socket_parent=/bodyset/patella_r translation=(0 0 0)
      SpatialTransform: axes_held_at_zero=(rotation2 rotation3)
        TransformAxis rotation1: coordinates=knee_angle_r_beta axis=(0 0 1)
          SimmSpline: x=(0 0.174533 0.349066 0.523599 0.698132 0.872665 1.0472 1.22173 1.39626 1.5708 1.74533 1.91986 2.0944)
              y=(0.00113686 -0.00629212 -0.105582 -0.253683 -0.414245 -0.579047 -0.747244 -0.91799 -1.09044 -1.26379 -1.43763 -1.61186 -1.78634)
        TransformAxis translation1: coordinates=knee_angle_r_beta axis=(1 0 0)
          MultiplierFunction: scale=1.131797
            SimmSpline: x=(0 0.174533 0.349066 0.523599 0.698132 0.872665 1.0472 1.22173 1.39626 1.5708 1.74533 1.91986 2.0944)
                y=(0.0524 0.0488 0.0437 0.0371 0.0296 0.0216 0.0136 0.0057 -0.0019 -0.0088 -0.0148 -0.0196 -0.0227)
        TransformAxis translation2: coordinates=knee_angle_r_beta axis=(0 1 0)
          MultiplierFunction: scale=1.043481
            SimmSpline: x=(0 0.174533 0.349066 0.523599 0.698132 0.872665 1.0472 1.22173 1.39626 1.5708 1.74533 1.91986 2.0944)
                y=(-0.0108 -0.019 -0.0263 -0.0322 -0.0367 -0.0395 -0.0408 -0.0404 -0.0384 -0.0349 -0.0301 -0.0245 -0.0187)
        TransformAxis translation3: axis=(0 0 1) MultiplierFunction(scale=1.160702, Constant(value=0.00275))
    PinJoint ankle_r: socket_parent_frame=tibia_r_offset socket_child_frame=talus_r_offset
      Coordinate ankle_angle_r: default_value=0 range=(-0.6981317 0.5235988) clamped=true
      PhysicalOffsetFrame tibia_r_offset: socket_parent=/bodyset/tibia_r translation=(-0.01200356 -0.4864964 0)
          orientation=(0.175895 -0.105208 0.0186622)
      PhysicalOffsetFrame talus_r_offset: socket_parent=/bodyset/talus_r translation=(0 0 0)
          orientation=(0.175895 -0.105208 0.0186622)
    PinJoint subtalar_r: socket_parent_frame=talus_r_offset socket_child_frame=calcn_r_offset
      Coordinate subtalar_angle_r: default_value=0 range=(-0.3490659 0.3490659) clamped=true locked=true
      PhysicalOffsetFrame talus_r_offset: socket_parent=/bodyset/talus_r
          translation=(-0.05465117 -0.04681847 0.008233901) orientation=(-1.76819 0.906223 1.8196)
      PhysicalOffsetFrame calcn_r_offset: socket_parent=/bodyset/calcn_r translation=(0 0 0)
          orientation=(-1.76819 0.906223 1.8196)
    PinJoint mtp_r: socket_parent_frame=calcn_r_offset socket_child_frame=toes_r_offset
      Coordinate mtp_angle_r: default_value=0 range=(-0.5235988 0.5235988) clamped=true locked=true
      PhysicalOffsetFrame calcn_r_offset: socket_parent=/bodyset/calcn_r
          translation=(0.188826 -0.001683128 0.001102841)
      PhysicalOffsetFrame toes_r_offset: socket_parent=/bodyset/toes_r translation=(0 0 0)
    CustomJoint hip_l: socket_parent_frame=pelvis_offset socket_child_frame=femur_l_offset
      Coordinate hip_flexion_l: default_value=0 range=(-0.5235988 2.094395) clamped=true
      Coordinate hip_adduction_l: default_value=0 range=(-0.8726646 0.5235988) clamped=true
      Coordinate hip_rotation_l: default_value=0 range=(-0.6981317 0.6981317) clamped=true
      PhysicalOffsetFrame pelvis_offset: socket_parent=/bodyset/pelvis
          translation=(-0.05752308 -0.08407213 -0.08031586)
      PhysicalOffsetFrame femur_l_offset: socket_parent=/bodyset/femur_l translation=(0 0 0)
      SpatialTransform: axes_held_at_zero=(translation1 translation2 translation3)
        TransformAxis rotation1: coordinates=hip_flexion_l axis=(0 0 1) LinearFunction(coefficients=1 0)
        TransformAxis rotation2: coordinates=hip_adduction_l axis=(1 0 0) LinearFunction(coefficients=-1 0)
        TransformAxis rotation3: coordinates=hip_rotation_l axis=(0 1 0) LinearFunction(coefficients=-1 0)
    CustomJoint walker_knee_l: socket_parent_frame=femur_l_offset socket_child_frame=tibia_l_offset
      Coordinate knee_angle_l: default_value=0 range=(0 2.0944) clamped=true
      PhysicalOffsetFrame femur_l_offset: socket_parent=/bodyset/femur_l
          translation=(-0.009156238 -0.4256985 0.00319193) orientation=(1.64157 -1.44618 1.5708)
      PhysicalOffsetFrame tibia_l_offset: socket_parent=/bodyset/tibia_l
          translation=(-0.00971088 -0.004299412 0.001695453) orientation=(1.64157 -1.44618 1.5708)
      SpatialTransform: axes_held_at_zero=translation3
        TransformAxis rotation1: coordinates=knee_angle_l axis=(-1 0 0) LinearFunction(coefficients=1 0)
        TransformAxis rotation2: coordinates=knee_angle_l axis=(0 0 1)
          SimmSpline: x=(0 0.174533 0.349066 0.523599 0.698132 0.872665 1.0472 1.22173 1.39626 1.5708 1.74533 1.91986 2.0944)
              y=(0 0.012681 0.022697 0.029605 0.033205 0.033535 0.030878 0.025755 0.018929 0.011407 0.004433 -0.000505 -0.001678)
        TransformAxis rotation3: coordinates=knee_angle_l axis=(0 1 0)
          SimmSpline: x=(0 0.174533 0.349066 0.523599 0.698132 0.872665 1.0472 1.22173 1.39626 1.5708 1.74533 1.91986 2.0944)
              y=(0 -0.059461 -0.109399 -0.150618 -0.18392 -0.210107 -0.229983 -0.24435 -0.254012 -0.25977 -0.262428 -0.262788 -0.261654)
        TransformAxis translation1: coordinates=knee_angle_l axis=(0 1 0)
          MultiplierFunction: scale=1.043481
            SimmSpline: x=(0 0.174533 0.349066 0.523599 0.698132 0.872665 1.0472 1.22173 1.39626 1.5708 1.74533 1.91986 2.0944)
                y=(0 0.000479 0.000835 0.001086 0.001251 0.001346 0.001391 0.001403 0.0014 0.0014 0.001421 0.001481 0.001599)
        TransformAxis translation2: coordinates=knee_angle_l axis=(0 0 1)
          MultiplierFunction: scale=1.160702
            SimmSpline: x=(0 0.174533 0.349066 0.523599 0.698132 0.872665 1.0472 1.22173 1.39626 1.5708 1.74533 1.91986 2.0944)
                y=(0 -0.000988 -0.001899 -0.002734 -0.003492 -0.004173 -0.004777 -0.005305 -0.005756 -0.00613 -0.006427 -0.006648 -0.006792)
    CustomJoint patellofemoral_l: socket_parent_frame=femur_l_offset socket_child_frame=patella_l_offset
      Coordinate knee_angle_l_beta: default_value=0 range=(-99999.9 99999.9) clamped=false
      PhysicalOffsetFrame femur_l_offset: socket_parent=/bodyset/femur_l
          translation=(-0.009156238 -0.4256985 0.00319193)
      PhysicalOffsetFrame patella_l_offset: socket_parent=/bodyset/patella_l translation=(0 0 0)
      SpatialTransform: axes_held_at_zero=(rotation2 rotation3)
        TransformAxis rotation1: coordinates=knee_angle_l_beta axis=(0 0 1)
          SimmSpline: x=(0 0.174533 0.349066 0.523599 0.698132 0.872665 1.0472 1.22173 1.39626 1.5708 1.74533 1.91986 2.0944)
              y=(0.00113686 -0.00629212 -0.105582 -0.253683 -0.414245 -0.579047 -0.747244 -0.91799 -1.09044 -1.26379 -1.43763 -1.61186 -1.78634)
        TransformAxis translation1: coordinates=knee_angle_l_beta axis=(1 0 0)
          MultiplierFunction: scale=1.131797
            SimmSpline: x=(0 0.174533 0.349066 0.523599 0.698132 0.872665 1.0472 1.22173 1.39626 1.5708 1.74533 1.91986 2.0944)
                y=(0.0524 0.0488 0.0437 0.0371 0.0296 0.0216 0.0136 0.0057 -0.0019 -0.0088 -0.0148 -0.0196 -0.0227)
        TransformAxis translation2: coordinates=knee_angle_l_beta axis=(0 1 0)
          MultiplierFunction: scale=1.043481
            SimmSpline: x=(0 0.174533 0.349066 0.523599 0.698132 0.872665 1.0472 1.22173 1.39626 1.5708 1.74533 1.91986 2.0944)
                y=(-0.0108 -0.019 -0.0263 -0.0322 -0.0367 -0.0395 -0.0408 -0.0404 -0.0384 -0.0349 -0.0301 -0.0245 -0.0187)
        TransformAxis translation3: axis=(0 0 1) MultiplierFunction(scale=1.160702, Constant(value=-0.00275))
    PinJoint ankle_l: socket_parent_frame=tibia_l_offset socket_child_frame=talus_l_offset
      Coordinate ankle_angle_l: default_value=0 range=(-0.6981317 0.5235988) clamped=true
      PhysicalOffsetFrame tibia_l_offset: socket_parent=/bodyset/tibia_l translation=(-0.01200356 -0.4864964 0)
          orientation=(-0.175895 0.105208 0.0186622)
      PhysicalOffsetFrame talus_l_offset: socket_parent=/bodyset/talus_l translation=(0 0 0)
          orientation=(-0.175895 0.105208 0.0186622)
    PinJoint subtalar_l: socket_parent_frame=talus_l_offset socket_child_frame=calcn_l_offset
      Coordinate subtalar_angle_l: default_value=0 range=(-0.3490659 0.3490659) clamped=true locked=true
      PhysicalOffsetFrame talus_l_offset: socket_parent=/bodyset/talus_l
          translation=(-0.05465117 -0.04681847 -0.008233901) orientation=(1.76819 -0.906223 1.8196)
      PhysicalOffsetFrame calcn_l_offset: socket_parent=/bodyset/calcn_l translation=(0 0 0)
          orientation=(1.76819 -0.906223 1.8196)
    PinJoint mtp_l: socket_parent_frame=calcn_l_offset socket_child_frame=toes_l_offset
      Coordinate mtp_angle_l: default_value=0 range=(-0.5235988 0.5235988) clamped=true locked=true
      PhysicalOffsetFrame calcn_l_offset: socket_parent=/bodyset/calcn_l
          translation=(0.188826 -0.001683128 -0.001102841)
      PhysicalOffsetFrame toes_l_offset: socket_parent=/bodyset/toes_l translation=(0 0 0)
    CustomJoint back: socket_parent_frame=pelvis_offset socket_child_frame=torso_offset
      Coordinate lumbar_extension: default_value=0 range=(-1.570796 1.570796) clamped=true
      Coordinate lumbar_bending: default_value=0 range=(-1.570796 1.570796) clamped=true
      Coordinate lumbar_rotation: default_value=0 range=(-1.570796 1.570796) clamped=true
      PhysicalOffsetFrame pelvis_offset: socket_parent=/bodyset/pelvis translation=(-0.1029315 0.0872962 0)
      PhysicalOffsetFrame torso_offset: socket_parent=/bodyset/torso translation=(0 0 0)
      SpatialTransform: axes_held_at_zero=(translation1 translation2 translation3)
        TransformAxis rotation1: coordinates=lumbar_extension axis=(0 0 1) LinearFunction(coefficients=1 0)
        TransformAxis rotation2: coordinates=lumbar_bending axis=(1 0 0) LinearFunction(coefficients=1 0)
        TransformAxis rotation3: coordinates=lumbar_rotation axis=(0 1 0) LinearFunction(coefficients=1 0)
    CustomJoint acromial_r: socket_parent_frame=torso_offset socket_child_frame=humerus_r_offset
      Coordinate arm_flex_r: default_value=0 range=(-1.570796 1.570796) clamped=true
      Coordinate arm_add_r: default_value=0 range=(-2.094395 1.570796) clamped=true
      Coordinate arm_rot_r: default_value=0 range=(-1.570796 1.570796) clamped=true
      PhysicalOffsetFrame torso_offset: socket_parent=/bodyset/torso translation=(0.003195356 0.3758729 0.1996495)
      PhysicalOffsetFrame humerus_r_offset: socket_parent=/bodyset/humerus_r translation=(0 0 0)
      SpatialTransform: axes_held_at_zero=(translation1 translation2 translation3)
        TransformAxis rotation1: coordinates=arm_flex_r axis=(0 0 1) LinearFunction(coefficients=1 0)
        TransformAxis rotation2: coordinates=arm_add_r axis=(1 0 0) LinearFunction(coefficients=1 0)
        TransformAxis rotation3: coordinates=arm_rot_r axis=(0 1 0) LinearFunction(coefficients=1 0)
    PinJoint elbow_r: socket_parent_frame=humerus_r_offset socket_child_frame=ulna_r_offset
      Coordinate elbow_flex_r: default_value=0 range=(0 2.618) clamped=true
      PhysicalOffsetFrame humerus_r_offset: socket_parent=/bodyset/humerus_r
          translation=(0.0160281 -0.3483685 -0.008933521) orientation=(-0.0228627 0.228018 0.0051689)
      PhysicalOffsetFrame ulna_r_offset: socket_parent=/bodyset/ulna_r translation=(0 0 0)
          orientation=(-0.0228627 0.228018 0.0051689)
    PinJoint radioulnar_r: socket_parent_frame=ulna_r_offset socket_child_frame=radius_r_offset
      Coordinate pro_sup_r: default_value=0 range=(0 1.570796) clamped=true
      PhysicalOffsetFrame ulna_r_offset: socket_parent=/bodyset/ulna_r translation=(-0.00931154 -0.01472556 0.01956679)
          orientation=(-1.56884 0.056428 1.53614)
      PhysicalOffsetFrame radius_r_offset: socket_parent=/bodyset/radius_r translation=(0 0 0)
          orientation=(-1.56884 0.056428 1.53614)
    UniversalJoint radius_hand_r: socket_parent_frame=radius_r_offset socket_child_frame=hand_r_offset
      Coordinate wrist_flex_r: default_value=0 range=(-1.22173 1.22173) clamped=true locked=true
      Coordinate wrist_dev_r: default_value=0 range=(-0.4363323 0.6108652) clamped=true locked=true
      PhysicalOffsetFrame radius_r_offset: socket_parent=/bodyset/radius_r
          translation=(-0.01217684 -0.2670017 0.01020987) orientation=(-1.5708 0 -1.5708)
      PhysicalOffsetFrame hand_r_offset: socket_parent=/bodyset/hand_r translation=(0 0 0)
          orientation=(-1.5708 0 -1.5708)
    CustomJoint acromial_l: socket_parent_frame=torso_offset socket_child_frame=humerus_l_offset
      Coordinate arm_flex_l: default_value=0 range=(-1.570796 1.570796) clamped=true
      Coordinate arm_add_l: default_value=0 range=(-2.094395 1.570796) clamped=true
      Coordinate arm_rot_l: default_value=0 range=(-1.570796 1.570796) clamped=true
      PhysicalOffsetFrame torso_offset: socket_parent=/bodyset/torso translation=(0.003195356 0.3758729 -0.1996495)
      PhysicalOffsetFrame humerus_l_offset: socket_parent=/bodyset/humerus_l translation=(0 0 0)
      SpatialTransform: axes_held_at_zero=(translation1 translation2 translation3)
        TransformAxis rotation1: coordinates=arm_flex_l axis=(0 0 1) LinearFunction(coefficients=1 0)
        TransformAxis rotation2: coordinates=arm_add_l axis=(-1 0 0) LinearFunction(coefficients=1 0)
        TransformAxis rotation3: coordinates=arm_rot_l axis=(0 -1 0) LinearFunction(coefficients=1 0)
    PinJoint elbow_l: socket_parent_frame=humerus_l_offset socket_child_frame=ulna_l_offset
      Coordinate elbow_flex_l: default_value=0 range=(0 2.618) clamped=true
      PhysicalOffsetFrame humerus_l_offset: socket_parent=/bodyset/humerus_l
          translation=(0.0160281 -0.3483685 0.008933521) orientation=(0.0228627 -0.228018 0.0051689)
      PhysicalOffsetFrame ulna_l_offset: socket_parent=/bodyset/ulna_l translation=(0 0 0)
          orientation=(0.0228627 -0.228018 0.0051689)
    PinJoint radioulnar_l: socket_parent_frame=ulna_l_offset socket_child_frame=radius_l_offset
      Coordinate pro_sup_l: default_value=0 range=(0 1.570796) clamped=true
      PhysicalOffsetFrame ulna_l_offset: socket_parent=/bodyset/ulna_l
          translation=(-0.00931154 -0.01472556 -0.01956679) orientation=(1.56884 -0.056428 1.53614)
      PhysicalOffsetFrame radius_l_offset: socket_parent=/bodyset/radius_l translation=(0 0 0)
          orientation=(1.56884 -0.056428 1.53614)
    UniversalJoint radius_hand_l: socket_parent_frame=radius_l_offset socket_child_frame=hand_l_offset
      Coordinate wrist_flex_l: default_value=0 range=(-1.22173 1.22173) clamped=true locked=true
      Coordinate wrist_dev_l: default_value=0 range=(-0.4363323 0.6108652) clamped=true locked=true
      PhysicalOffsetFrame radius_l_offset: socket_parent=/bodyset/radius_l
          translation=(-0.01217684 -0.2670017 -0.01020987) orientation=(1.5708 0 1.5708)
      PhysicalOffsetFrame hand_l_offset: socket_parent=/bodyset/hand_l translation=(0 0 0)
          orientation=(1.5708 0 1.5708)
  ConstraintSet:
    CoordinateCouplerConstraint patellofemoral_knee_angle_r_con: independent_coordinate_names=knee_angle_r
        dependent_coordinate_name=knee_angle_r_beta scale_factor=1
        coupled_coordinates_function=LinearFunction(coefficients=1 0)
    CoordinateCouplerConstraint patellofemoral_knee_angle_l_con: independent_coordinate_names=knee_angle_l
        dependent_coordinate_name=knee_angle_l_beta scale_factor=1
        coupled_coordinates_function=LinearFunction(coefficients=1 0)
  ForceSet:
    ExpressionBasedCoordinateForce PassiveShoulderDampingX_r: coordinate=arm_flex_r
        expression=-2.44*exp(5.05*(q-1.81))+1.51*exp(-11.88*(q+0.50))-1.0*qdot
    ExpressionBasedCoordinateForce PassiveShoulderDampingY_r: coordinate=arm_add_r
        expression=-15.03*exp(20.94*(q-0.10))+5.03*exp(-14.93*(q+1.57))-1.0*qdot
    ExpressionBasedCoordinateForce PassiveShoulderDampingZ_r: coordinate=arm_rot_r
        expression=-0.43*exp(14.94*(q-0.15))+0.43*exp(-14.93*(q+0.15))-1.0*qdot
    ExpressionBasedCoordinateForce PassiveElbowDamping_r: coordinate=elbow_flex_r
        expression=6.09*exp(-6.94*(q-0.30))-11.03*exp(11.33*(q-2.40))-1.0*qdot
    ExpressionBasedCoordinateForce PassiveShoulderDampingX_l: coordinate=arm_flex_l
        expression=-2.44*exp(5.05*(q-1.81))+1.51*exp(-11.88*(q+0.50))-1.0*qdot
    ExpressionBasedCoordinateForce PassiveShoulderDampingY_l: coordinate=arm_add_l
        expression=-15.03*exp(20.94*(q-0.10))+5.03*exp(-14.93*(q+1.57))-1.0*qdot
    ExpressionBasedCoordinateForce PassiveShoulderDampingZ_l: coordinate=arm_rot_l
        expression=-0.43*exp(14.94*(q-0.15))+0.43*exp(-14.93*(q+0.15))-1.0*qdot
    ExpressionBasedCoordinateForce PassiveElbowDamping_l: coordinate=elbow_flex_l
        expression=6.09*exp(-6.94*(q-0.30))-11.03*exp(11.33*(q-2.40))-1.0*qdot
    ExpressionBasedCoordinateForce PassiveHipDampingX_r: coordinate=hip_flexion_r
        expression=-2.44*exp(5.05*(q-1.81))+1.51*exp(-21.88*(q+0.47))-0.1*qdot
    ExpressionBasedCoordinateForce PassiveHipDampingY_r: coordinate=hip_adduction_r
        expression=-0.03*exp(14.94*(q-0.50))+0.03*exp(-14.94*(q+0.50))-0.1*qdot
    ExpressionBasedCoordinateForce PassiveHipDampingZ_r: coordinate=hip_rotation_r
        expression=-0.03*exp(14.94*(q-0.92))+0.03*exp(-14.94*(q+0.92))-0.1*qdot
    ExpressionBasedCoordinateForce PassiveHipDampingX_l: coordinate=hip_flexion_l
        expression=-2.44*exp(5.05*(q-1.81))+1.51*exp(-21.88*(q+0.47))-0.1*qdot
    ExpressionBasedCoordinateForce PassiveHipDampingY_l: coordinate=hip_adduction_l
        expression=-0.03*exp(14.94*(q-0.50))+0.03*exp(-14.94*(q+0.50))-0.1*qdot
    ExpressionBasedCoordinateForce PassiveHipDampingZ_l: coordinate=hip_rotation_l
        expression=-0.03*exp(14.94*(q-0.92))+0.03*exp(-14.94*(q+0.92))-0.1*qdot
    ExpressionBasedCoordinateForce PassiveKneeDamping_r: coordinate=knee_angle_r
        expression=6.09*exp(33.94*(-q-0.13))-11.03*exp(-11.33*(-q+2.40))-0.1*qdot
    ExpressionBasedCoordinateForce PassiveKneeDamping_l: coordinate=knee_angle_l
        expression=6.09*exp(33.94*(-q-0.13))-11.03*exp(-11.33*(-q+2.40))-0.1*qdot
    ExpressionBasedBushingForce PassiveAnkleBushing_r: socket_frame1=/bodyset/tibia_r socket_frame2=/bodyset/calcn_r
        Mx_expression=9.52095038*theta_x-29.57608094*theta_x^2+169.01588105*theta_x^3
        My_expression=3.61796125*theta_y-10.1612135*theta_y^2+64.5279144*theta_y^3
        Mz_expression=5.98187224*theta_z+15.74951827*theta_z^2+33.6780792*theta_z^3 Fx_expression=0 Fy_expression=0
        Fz_expression=0 rotational_damping=(2 2 2) translational_damping=(0 0 0) moment_visual_scale=1
        force_visual_scale=1 visual_aspect_ratio=1
      PhysicalOffsetFrame tibia_r_offset_bushing: socket_parent=/bodyset/tibia_r translation=(-0.01200356 -0.4864964 0)
          orientation=(0.175895 -0.105208 0.0186622)
      PhysicalOffsetFrame calcn_r_offset_bushing: socket_parent=/bodyset/calcn_r
          translation=(0.05150473 0.03530361 -0.0080875) orientation=(0.175895 -0.105208 0.0186622)
    ExpressionBasedBushingForce PassiveAnkleBushing_l: socket_frame1=/bodyset/tibia_l socket_frame2=/bodyset/calcn_l
        Mx_expression=9.52095038*theta_x+29.57608094*theta_x^2+169.01588105*theta_x^3
        My_expression=3.61796125*theta_y+10.1612135*theta_y^2+64.5279144*theta_y^3
        Mz_expression=5.98187224*theta_z+15.74951827*theta_z^2+33.6780792*theta_z^3 Fx_expression=0 Fy_expression=0
        Fz_expression=0 rotational_damping=(2 2 2) translational_damping=(0 0 0) moment_visual_scale=1
        force_visual_scale=1 visual_aspect_ratio=1
      PhysicalOffsetFrame tibia_l_offset_bushing: socket_parent=/bodyset/tibia_l translation=(-0.01200356 -0.4864964 0)
          orientation=(-0.175895 0.105208 0.0186622)
      PhysicalOffsetFrame calcn_l_offset_bushing: socket_parent=/bodyset/calcn_l
          translation=(0.05150473 0.03530361 0.0080875) orientation=(-0.175895 0.105208 0.0186622)
    ExpressionBasedCoordinateForce PassiveAnkleDamping_r: coordinate=ankle_angle_r expression=-0.1*qdot
    ExpressionBasedCoordinateForce PassiveAnkleDamping_l: coordinate=ankle_angle_l expression=-0.1*qdot
    ExpressionBasedCoordinateForce PassiveSubtalarDamping_r: coordinate=subtalar_angle_r expression=-2.0*qdot
    ExpressionBasedCoordinateForce PassiveSubtalarDamping_l: coordinate=subtalar_angle_l expression=-2.0*qdot
    ExpressionBasedCoordinateForce PassiveToeDamping_r: coordinate=mtp_angle_r expression=-25.0*q-2.0*qdot
    ExpressionBasedCoordinateForce PassiveToeDamping_l: coordinate=mtp_angle_l expression=-25.0*q-2.0*qdot
    SmoothSphereHalfSpaceForce [values shared by the 12 below unless stated]: socket_half_space=/contactgeometryset/floor
        stiffness=3067776 [N/m^2] dissipation=2 [s/m] static_friction=0.8 dynamic_friction=0.8 viscous_friction=0.5
        transition_velocity=0.2 [m/s] hertz_smoothing=300 hunt_crossley_smoothing=50
    SmoothSphereHalfSpaceForce contactHeel_r: socket_sphere=/contactgeometryset/heel_r
    SmoothSphereHalfSpaceForce contactLateralRearfoot_r: socket_sphere=/contactgeometryset/lateralRearfoot_r
    SmoothSphereHalfSpaceForce contactLateralMidfoot_r: socket_sphere=/contactgeometryset/lateralMidfoot_r
    SmoothSphereHalfSpaceForce contactLateralToe_r: socket_sphere=/contactgeometryset/lateralToe_r stiffness=306777.6
    SmoothSphereHalfSpaceForce contactMedialToe_r: socket_sphere=/contactgeometryset/medialToe_r
    SmoothSphereHalfSpaceForce contactMedialMidfoot_r: socket_sphere=/contactgeometryset/medialMidfoot_r
    SmoothSphereHalfSpaceForce contactHeel_l: socket_sphere=/contactgeometryset/heel_l
    SmoothSphereHalfSpaceForce contactLateralRearfoot_l: socket_sphere=/contactgeometryset/lateralRearfoot_l
    SmoothSphereHalfSpaceForce contactLateralMidfoot_l: socket_sphere=/contactgeometryset/lateralMidfoot_l
    SmoothSphereHalfSpaceForce contactLateralToe_l: socket_sphere=/contactgeometryset/lateralToe_l stiffness=306777.6
    SmoothSphereHalfSpaceForce contactMedialToe_l: socket_sphere=/contactgeometryset/medialToe_l
    SmoothSphereHalfSpaceForce contactMedialMidfoot_l: socket_sphere=/contactgeometryset/medialMidfoot_l
    ActivationCoordinateActuator torque_arm_flex_l: min_control=-1 max_control=1 coordinate=arm_flex_l
        optimal_force=38.24
    ActivationCoordinateActuator torque_arm_flex_r: min_control=-1 max_control=1 coordinate=arm_flex_r
        optimal_force=38.24
    ActivationCoordinateActuator torque_arm_add_l: min_control=-1 max_control=1 coordinate=arm_add_l
        optimal_force=38.24
    ActivationCoordinateActuator torque_arm_add_r: min_control=-1 max_control=1 coordinate=arm_add_r
        optimal_force=38.24
    ActivationCoordinateActuator torque_arm_rot_l: min_control=-1 max_control=1 coordinate=arm_rot_l
        optimal_force=38.24
    ActivationCoordinateActuator torque_arm_rot_r: min_control=-1 max_control=1 coordinate=arm_rot_r
        optimal_force=38.24
    ActivationCoordinateActuator torque_elbow_flex_l: min_control=-1 max_control=1 coordinate=elbow_flex_l
        optimal_force=15.296
    ActivationCoordinateActuator torque_elbow_flex_r: min_control=-1 max_control=1 coordinate=elbow_flex_r
        optimal_force=15.296
    ActivationCoordinateActuator torque_pro_sup_l: min_control=-1 max_control=1 coordinate=pro_sup_l
        optimal_force=15.296
    ActivationCoordinateActuator torque_pro_sup_r: min_control=-1 max_control=1 coordinate=pro_sup_r
        optimal_force=15.296
    ActivationCoordinateActuator torque_lumbar_extension: min_control=-1 max_control=1 coordinate=lumbar_extension
        optimal_force=76.48
    ActivationCoordinateActuator torque_lumbar_bending: min_control=-1 max_control=1 coordinate=lumbar_bending
        optimal_force=76.48
    ActivationCoordinateActuator torque_lumbar_rotation: min_control=-1 max_control=1 coordinate=lumbar_rotation
        optimal_force=76.48
    SpringGeneralizedForce passive_stiffness_lumbar_extension: coordinate=lumbar_extension stiffness=76.48 viscosity=2
    SpringGeneralizedForce passive_stiffness_lumbar_bending: coordinate=lumbar_bending stiffness=114.72 viscosity=2
    SpringGeneralizedForce passive_stiffness_lumbar_rotation: coordinate=lumbar_rotation stiffness=38.24 viscosity=2
    DeGrooteFregly2016Muscle [values shared by the 80 below unless stated]: min_control=0.01 max_control=1
        max_contraction_velocity=10 activation_time_constant=0.01 deactivation_time_constant=0.04
        default_activation=0.01 fiber_damping=0.01 tendon_strain_at_one_norm_force=0.049
    DeGrooteFregly2016Muscle addbrev_r: max_isometric_force=660.9891 optimal_fiber_length=0.1085147
        tendon_slack_length=0.0373121 pennation_angle_at_optimal=0.1147809 [radians] ignore_tendon_compliance=true
        passive_fiber_strain_at_one_norm_force=0.5015522
      PathPoint P1: pelvis (-0.01952326 -0.1006852 0.01600912)
      PathPoint P2: femur_r (-0.002263594 -0.1231308 0.02890148)
      PathWrap: wrap_object=AB_at_femshaft_r method=hybrid
    DeGrooteFregly2016Muscle addlong_r: max_isometric_force=978.4845 optimal_fiber_length=0.1126997
        tendon_slack_length=0.1372805 pennation_angle_at_optimal=0.1377704 ignore_tendon_compliance=true
        passive_fiber_strain_at_one_norm_force=0.5002995
      PathPoint P1: pelvis (-0.007747973 -0.09522248 0.01962676)
      PathPoint P2: femur_r (0.01274403 -0.249778 0.01837391)
      PathWrap: wrap_object=AL_at_femshaft_r method=hybrid
    DeGrooteFregly2016Muscle addmagDist_r: max_isometric_force=638.0322 optimal_fiber_length=0.1844102
        tendon_slack_length=0.0909362 pennation_angle_at_optimal=0.194705 ignore_tendon_compliance=true
        passive_fiber_strain_at_one_norm_force=0.7
      PathPoint P1: pelvis (-0.07568073 -0.1367498 0.041395)
      PathPoint P2: femur_r (0.01273272 -0.2739138 0.02240155)
      PathWrap: wrap_object=AMdist_at_femshaft_r method=hybrid
    DeGrooteFregly2016Muscle addmagIsch_r: max_isometric_force=638.9248 optimal_fiber_length=0.1623287
        tendon_slack_length=0.2248315 pennation_angle_at_optimal=0.1680443 ignore_tendon_compliance=true
        passive_fiber_strain_at_one_norm_force=0.7000392
      PathPoint P1: pelvis (-0.09160598 -0.1389884 0.04335976)
      PathPoint P2: femur_r (0.005443944 -0.4048393 -0.03798978)
      PathWrap: wrap_object=AMisch_at_condyles_r method=hybrid
    DeGrooteFregly2016Muscle addmagMid_r: max_isometric_force=632.5435 optimal_fiber_length=0.1445465
        tendon_slack_length=0.04894604 pennation_angle_at_optimal=0.2073076 ignore_tendon_compliance=true
        passive_fiber_strain_at_one_norm_force=0.7
      PathPoint P1: pelvis (-0.05382695 -0.1293376 0.02966884)
      PathPoint P2: femur_r (0.002738949 -0.1694613 0.03391571)
      PathWrap: wrap_object=AMmid_at_femshaft_r method=hybrid
    DeGrooteFregly2016Muscle addmagProx_r: max_isometric_force=620.3076 optimal_fiber_length=0.113037
        tendon_slack_length=0.04316398 pennation_angle_at_optimal=0.3114833 ignore_tendon_compliance=true
        passive_fiber_strain_at_one_norm_force=0.7
      PathPoint P1: pelvis (-0.03166652 -0.1151988 0.0141899)
      PathPoint P2: femur_r (-0.01728254 -0.08228891 0.03716568)
      PathWrap: wrap_object=AMprox_at_femshaft_r method=hybrid
    DeGrooteFregly2016Muscle bflh_r: max_isometric_force=1378.633 optimal_fiber_length=0.1033484
        tendon_slack_length=0.3443818 pennation_angle_at_optimal=0.1759182 ignore_tendon_compliance=true
        passive_fiber_strain_at_one_norm_force=0.7068715
      PathPoint P1: pelvis (-0.1063046 -0.1275703 0.06091781)
      PathPoint P2: tibia_r (-0.040452 -0.04256844 0.02888549)
      PathPoint P3: tibia_r (-0.03445022 -0.05533897 0.03459409)
    DeGrooteFregly2016Muscle bfsh_r: max_isometric_force=576.6497 optimal_fiber_length=0.1184639
        tendon_slack_length=0.1136493 pennation_angle_at_optimal=0.2642232 ignore_tendon_compliance=true
        passive_fiber_strain_at_one_norm_force=0.6888986
      PathPoint P1: femur_r (0.005658985 -0.2202788 0.02716043)
      PathPoint P2: tibia_r (-0.03613072 -0.0509605 0.03630666)
      PathWrap: wrap_object=BF_at_gastroc_r method=hybrid
    DeGrooteFregly2016Muscle edl_r: max_isometric_force=569.2452 optimal_fiber_length=0.08167419
        tendon_slack_length=0.4347415 pennation_angle_at_optimal=0.2182582 ignore_tendon_compliance=true
        passive_fiber_strain_at_one_norm_force=0.7072192
      PathPoint P1: tibia_r (-0.0192057 -0.1407191 0.02340524)
      PathPoint P2: tibia_r (0.01968584 -0.4573066 0.01278725)
      PathPoint P3: calcn_r (0.0970532 0.0302963 0.0008169192)
      PathPoint P4: calcn_r (0.1706616 0.004628602 0.01327494)
      PathPoint P5: toes_r (0.0003404307 0.005138388 0.01605911)
      PathPoint P6: toes_r (0.05027027 -0.0004373096 0.02624037)
    DeGrooteFregly2016Muscle ehl_r: max_isometric_force=270.4625 optimal_fiber_length=0.08788898
        tendon_slack_length=0.38398 pennation_angle_at_optimal=0.1972681 ignore_tendon_compliance=true
        passive_fiber_strain_at_one_norm_force=0.7178208
      PathPoint P1: tibia_r (-0.01680498 -0.1885174 0.02157849)
      PathPoint P2: tibia_r (0.008522528 -0.3538045 0.01872419)
      PathPoint P3: tibia_r (0.02400712 -0.4491578 -0.003196813)
      PathPoint P4: calcn_r (0.1024392 0.03273684 -0.02154624)
      PathPoint P5: calcn_r (0.1365504 0.02600433 -0.02624353)
      PathPoint P6: calcn_r (0.1831232 0.01169774 -0.02859217)
      PathPoint P7: toes_r (0.03381612 0.004482423 -0.02571557)
      PathPoint P8: toes_r (0.06388749 0.003717132 -0.01952284)
    DeGrooteFregly2016Muscle fdl_r: max_isometric_force=405.1507 optimal_fiber_length=0.05178636
        tendon_slack_length=0.4398042 pennation_angle_at_optimal=0.2248391 ignore_tendon_compliance=true
        passive_fiber_strain_at_one_norm_force=0.6997089
      PathPoint P1: tibia_r (-0.002760819 -0.2228154 -0.002055094)
      PathPoint P2: tibia_r (-0.02112627 -0.4433198 -0.01415732)
      PathPoint P3: calcn_r (0.04604483 0.02650927 -0.02859217)
      PathPoint P4: calcn_r (0.07477004 0.01481153 -0.02685622)
      PathPoint P5: calcn_r (0.1750971 -0.006816668 0.01184533)
      PathPoint P6: toes_r (-0.002156061 -0.008527537 0.01542934)
      PathPoint P7: toes_r (0.03234092 -0.007762245 0.02256672)
      PathPoint P8: toes_r (0.05004331 -0.006559644 0.02540068)
    DeGrooteFregly2016Muscle fhl_r: max_isometric_force=873.2208 optimal_fiber_length=0.06090747
        tendon_slack_length=0.4095244 pennation_angle_at_optimal=0.2580255 ignore_tendon_compliance=true
        passive_fiber_strain_at_one_norm_force=0.7002505
      PathPoint P1: tibia_r (-0.03721104 -0.2630729 0.02283438)
      PathPoint P2: tibia_r (-0.02904862 -0.4464821 -0.008677064)
      PathPoint P3: calcn_r (0.03949717 0.02322717 -0.02460969)
      PathPoint P4: calcn_r (0.1096205 0.005722635 -0.02614141)
      PathPoint P5: calcn_r (0.1822784 -0.004460289 -0.02746891)
      PathPoint P6: toes_r (0.01758892 -0.006996954 -0.0278148)
      PathPoint P7: toes_r (0.06377402 -0.01115139 -0.01899803)
    DeGrooteFregly2016Muscle gaslat_r: max_isometric_force=1430.539 optimal_fiber_length=0.07196977
        tendon_slack_length=0.4603008 pennation_angle_at_optimal=0.2102268 passive_fiber_strain_at_one_norm_force=2
        tendon_strain_at_one_norm_force=0.1
      PathPoint P1: femur_r (-0.003395391 -0.3979837 0.03215145)
      PathPoint P2: calcn_r (0.004646726 0.02608848 -0.00541209)
      PathWrap: wrap_object=GasLat_at_shank_r method=hybrid
      PathWrap pathwrap_0: wrap_object=Gastroc_at_condyles_r method=hybrid
    DeGrooteFregly2016Muscle gasmed_r: max_isometric_force=2833.471 optimal_fiber_length=0.06233849
        tendon_slack_length=0.4873603 pennation_angle_at_optimal=0.1656816 passive_fiber_strain_at_one_norm_force=2
        tendon_strain_at_one_norm_force=0.1
      PathPoint P1: femur_r (0.009054376 -0.3952706 -0.0241426)
      PathPoint P2: calcn_r (0.004646726 0.02608848 -0.00541209)
      PathWrap: wrap_object=GasMed_at_shank_r method=hybrid
      PathWrap pathwrap_0: wrap_object=Gastroc_at_condyles_r method=hybrid
    DeGrooteFregly2016Muscle glmax1_r: max_isometric_force=1024.929 optimal_fiber_length=0.1568549
        tendon_slack_length=0.0521152 pennation_angle_at_optimal=0.3540118 ignore_tendon_compliance=true
        passive_fiber_strain_at_one_norm_force=0.8468075
      PathPoint P1: pelvis (-0.1258279 0.03695361 0.05852683)
      PathPoint P2: pelvis (-0.1284855 -0.02592108 0.08098118)
      PathPoint P3: femur_r (-0.05025179 -0.03401748 0.0350532)
      PathPoint P4: femur_r (-0.03135078 -0.05906102 0.05455299)
      PathWrap: wrap_object=Gmax1_at_pelvis_r method=hybrid
    DeGrooteFregly2016Muscle glmax2_r: max_isometric_force=1479.04 optimal_fiber_length=0.1659182
        tendon_slack_length=0.07174342 pennation_angle_at_optimal=0.3673821 ignore_tendon_compliance=true
        passive_fiber_strain_at_one_norm_force=0.7164175
      PathPoint P1: pelvis (-0.1346185 0.009318735 0.04802735)
      PathPoint P2: pelvis (-0.1373783 -0.06523115 0.08451566)
      PathPoint P3: femur_r (-0.05093086 -0.06093929 0.02924969)
      PathPoint P4: femur_r (-0.01765603 -0.1060177 0.04863341)
      PathWrap: wrap_object=Gmax2_at_pelvis_r method=hybrid
    DeGrooteFregly2016Muscle glmax3_r: max_isometric_force=997.3834 optimal_fiber_length=0.1764107
        tendon_slack_length=0.07364525 pennation_angle_at_optimal=0.3824161 ignore_tendon_compliance=true
        passive_fiber_strain_at_one_norm_force=0.7121937
      PathPoint P1: pelvis (-0.1328808 -0.05623375 0.009355977)
      PathPoint P2: pelvis (-0.130121 -0.1352823 0.04522056)
      PathPoint P3: femur_r (-0.0318035 -0.1173916 0.0109106)
      PathPoint P4: femur_r (-0.006790782 -0.14807 0.04770485)
      PathWrap: wrap_object=Gmax3_at_pelvis_r method=hybrid
    DeGrooteFregly2016Muscle glmed1_r: max_isometric_force=1127.922 optimal_fiber_length=0.08258559
        tendon_slack_length=0.06314611 pennation_angle_at_optimal=0.3165559 ignore_tendon_compliance=true
        passive_fiber_strain_at_one_norm_force=0.7
      PathPoint P1: pelvis (-0.05022629 0.02801325 0.1198484)
      PathPoint P2_0: femur_r (-0.01572265 -0.01909018 0.06870151)
    DeGrooteFregly2016Muscle glmed2_r: max_isometric_force=786.941 optimal_fiber_length=0.09117464
        tendon_slack_length=0.08149365 pennation_angle_at_optimal=0.3165559 ignore_tendon_compliance=true
        passive_fiber_strain_at_one_norm_force=0.7014005
      PathPoint P1: pelvis (-0.08660488 0.05851943 0.08522621)
      PathPoint P2_0: femur_r (-0.02494029 -0.01039213 0.06514582)
    DeGrooteFregly2016Muscle glmed3_r: max_isometric_force=890.9417 optimal_fiber_length=0.08482409
        tendon_slack_length=0.05255938 pennation_angle_at_optimal=0.3165559 ignore_tendon_compliance=true
        passive_fiber_strain_at_one_norm_force=0.7030514
      PathPoint P1: pelvis (-0.1020788 0.01666596 0.06642913)
      PathPoint P2_0: femur_r (-0.03497253 -0.004904361 0.06012436)
    DeGrooteFregly2016Muscle glmin1_r: max_isometric_force=386.7298 optimal_fiber_length=0.08756375
        tendon_slack_length=0.02078066 pennation_angle_at_optimal=0.1745329 ignore_tendon_compliance=true
        passive_fiber_strain_at_one_norm_force=0.7
      PathPoint P1: pelvis (-0.03023502 -0.0001159129 0.1231397)
      PathPoint P2: femur_r (0.006212795 -0.01616206 0.06504319)
    DeGrooteFregly2016Muscle glmin2_r: max_isometric_force=404.5322 optimal_fiber_length=0.07457723
        tendon_slack_length=0.03475705 pennation_angle_at_optimal=0 ignore_tendon_compliance=true
        passive_fiber_strain_at_one_norm_force=0.7000285
      PathPoint P1: pelvis (-0.06296505 0.01071148 0.1051459)
      PathPoint P2: femur_r (0.004010569 -0.009404131 0.06089545)
    DeGrooteFregly2016Muscle glmin3_r: max_isometric_force=450.9191 optimal_fiber_length=0.03897529
        tendon_slack_length=0.05217817 pennation_angle_at_optimal=0.01745329 ignore_tendon_compliance=true
        passive_fiber_strain_at_one_norm_force=0.7002322
      PathPoint P1: pelvis (-0.08064842 -0.01660234 0.08295633)
      PathPoint P2: femur_r (-0.004047462 -0.001321778 0.0594995)
    DeGrooteFregly2016Muscle grac_r: max_isometric_force=291.8775 optimal_fiber_length=0.2440716
        tendon_slack_length=0.1843006 pennation_angle_at_optimal=0.1720016 ignore_tendon_compliance=true
        passive_fiber_strain_at_one_norm_force=0.8027483
      PathPoint P1: pelvis (-0.0484095 -0.1385171 0.02553142)
      PathPoint P2: tibia_r (-0.02211056 -0.05783226 -0.0338063)
      PathPoint P3: tibia_r (0.002136634 -0.0846747 -0.01795924)
      PathWrap: wrap_object=GR_at_condyles_r method=hybrid
    DeGrooteFregly2016Muscle iliacus_r: max_isometric_force=1070.242 optimal_fiber_length=0.113067
        tendon_slack_length=0.101952 pennation_angle_at_optimal=0.279914 ignore_tendon_compliance=true
        passive_fiber_strain_at_one_norm_force=0.5005449
      PathPoint P1: pelvis (-0.06184068 0.03309758 0.08763432)
      PathPoint P2: pelvis (-0.01379916 -0.05966133 0.07859021)
      PathPoint P3: femur_r (-0.002603133 -0.05895668 0.01613376)
      PathPoint P4: femur_r (-0.01380792 -0.06646974 0.02274976)
      PathWrap: wrap_object=IL_at_brim_r method=hybrid range=(2 3)
    DeGrooteFregly2016Muscle perbrev_r: max_isometric_force=482.0423 optimal_fiber_length=0.05456968
        tendon_slack_length=0.1773245 pennation_angle_at_optimal=0.2052361 ignore_tendon_compliance=true
        passive_fiber_strain_at_one_norm_force=0.6987541
      PathPoint P1: tibia_r (-0.02916865 -0.3079522 0.02865715)
      PathPoint P2: tibia_r (-0.04069207 -0.4734826 0.0284288)
      PathPoint P3: tibia_r (-0.03421015 -0.4869829 0.02911383)
      PathPoint P4: calcn_r (0.04974109 0.02272223 0.02379277)
      PathPoint P5: calcn_r (0.07149621 0.01843025 0.03502541)
    DeGrooteFregly2016Muscle perlong_r: max_isometric_force=1056.466 optimal_fiber_length=0.0596215
        tendon_slack_length=0.3899114 pennation_angle_at_optimal=0.2479525 ignore_tendon_compliance=true
        passive_fiber_strain_at_one_norm_force=0.6924185
      PathPoint P1: tibia_r (-0.02400712 -0.1669899 0.03219648)
      PathPoint P2: tibia_r (-0.03805129 -0.474334 0.02705874)
      PathPoint P3: tibia_r (-0.03264968 -0.4881991 0.02740126)
      PathPoint P4: calcn_r (0.04625604 0.01935597 0.02256739)
      PathPoint P5: calcn_r (0.07191864 0.008920578 0.02900063)
      PathPoint P6: calcn_r (0.0899775 0.005806792 0.01204956)
      PathPoint P7: calcn_r (0.1270457 0.007153294 -0.01878914)
    DeGrooteFregly2016Muscle piri_r: max_isometric_force=1068.926 optimal_fiber_length=0.02784506
        tendon_slack_length=0.1230604 pennation_angle_at_optimal=0.1745329 ignore_tendon_compliance=true
        passive_fiber_strain_at_one_norm_force=0.7028348
      PathPoint P1: pelvis (-0.1040661 -0.006994407 0.01404436)
      PathPoint P2: pelvis (-0.1042808 -0.03284051 0.06332957)
      PathPoint P3: femur_r (-0.0167506 -0.003756532 0.05072268)
    DeGrooteFregly2016Muscle psoas_r: max_isometric_force=1488.434 optimal_fiber_length=0.1245719
        tendon_slack_length=0.106076 pennation_angle_at_optimal=0.2155251 ignore_tendon_compliance=true
        passive_fiber_strain_at_one_norm_force=0.5010382
      PathPoint P1: pelvis (-0.0619429 0.06640938 0.04054257)
      PathPoint P2: pelvis (-0.02095428 -0.07005118 0.06819468)
      PathPoint P3: femur_r (-0.01493972 -0.04873056 0.005339229)
      PathPoint P4: femur_r (-0.02659723 -0.0546784 0.01021418)
      PathWrap: wrap_object=PS_at_brim_r method=hybrid range=(2 3)
    DeGrooteFregly2016Muscle recfem_r: max_isometric_force=2289.319 optimal_fiber_length=0.08077867
        tendon_slack_length=0.4773216 pennation_angle_at_optimal=0.2170149 ignore_tendon_compliance=true
        passive_fiber_strain_at_one_norm_force=0.8999622
      PathPoint P1: pelvis (-0.02453184 -0.04155942 0.09699029)
      PathPoint P2: patella_r (0.01 0.049 0.0007)
      PathPoint P3: patella_r (0.0121 0.0437 -0.001)
      PathPoint P4: patella_r (0.005 0.00247 3e-5)
      PathPoint P5: tibia_r (0.03913161 -0.07676913 -0.0005366079)
      PathWrap: wrap_object=KnExt_at_fem_r method=hybrid
    DeGrooteFregly2016Muscle sart_r: max_isometric_force=257.5173 optimal_fiber_length=0.4339038
        tendon_slack_length=0.1335087 pennation_angle_at_optimal=0.02613542 ignore_tendon_compliance=true
        passive_fiber_strain_at_one_norm_force=0.7212821
      PathPoint P1: pelvis (-0.01993212 -0.01670946 0.1097768)
      PathPoint P2: femur_r (-0.003395391 -0.372314 -0.04886555)
      PathPoint P3: tibia_r (-0.03012894 -0.04877126 -0.04167274)
      PathPoint P4: tibia_r (-0.01908566 -0.07285284 -0.03014138)
      PathPoint P5: tibia_r (0.01632484 -0.09851552 -0.002968469)
    DeGrooteFregly2016Muscle semimem_r: max_isometric_force=2313.564 optimal_fiber_length=0.07297304
        tendon_slack_length=0.3676001 pennation_angle_at_optimal=0.2545615 ignore_tendon_compliance=true
        passive_fiber_strain_at_one_norm_force=0.7353994
      PathPoint P1: pelvis (-0.1008872 -0.1221076 0.06382855)
      PathPoint P2: tibia_r (-0.03481032 -0.05071725 -0.02237769)
      PathWrap: wrap_object=SM_at_condyles_r method=hybrid
    DeGrooteFregly2016Muscle semiten_r: max_isometric_force=611.5535 optimal_fiber_length=0.2074459
        tendon_slack_length=0.2657015 pennation_angle_at_optimal=0.241295 ignore_tendon_compliance=true
        passive_fiber_strain_at_one_norm_force=0.7803276
      PathPoint P1: pelvis (-0.1061002 -0.1342112 0.05353698)
      PathPoint P2: tibia_r (-0.03745111 -0.06178504 -0.02614537)
      PathPoint P3: tibia_r (0.002280676 -0.09401543 -0.01335811)
      PathWrap: wrap_object=ST_at_condyles_r method=hybrid
    DeGrooteFregly2016Muscle soleus_r: max_isometric_force=5566.139 optimal_fiber_length=0.05443822
        tendon_slack_length=0.3424113 pennation_angle_at_optimal=0.3814289 passive_fiber_strain_at_one_norm_force=2
        tendon_strain_at_one_norm_force=0.1
      PathPoint P1: tibia_r (-0.009122706 -0.1114077 0.01118885)
      PathPoint P2: calcn_r (0.004646726 0.02608848 -0.00541209)
    DeGrooteFregly2016Muscle tfl_r: max_isometric_force=430.6318 optimal_fiber_length=0.09886655
        tendon_slack_length=0.4677918 pennation_angle_at_optimal=0.05235988 ignore_tendon_compliance=true
        passive_fiber_strain_at_one_norm_force=0.7197196
      PathPoint P1: pelvis (-0.02079052 0.01162308 0.1344117)
      PathPoint P2: femur_r (0.03327483 -0.1038264 0.06929391)
      PathPoint P3: femur_r (0.01211023 -0.4226098 0.03760674)
      PathPoint P4: tibia_r (0.01296384 -0.04986588 0.03950348)
    DeGrooteFregly2016Muscle tibant_r: max_isometric_force=1135.364 optimal_fiber_length=0.08208527
        tendon_slack_length=0.2889943 pennation_angle_at_optimal=0.1951828 ignore_tendon_compliance=true
        passive_fiber_strain_at_one_norm_force=0.7076768
      PathPoint P1: tibia_r (0.01848548 -0.1595708 0.01849585)
      PathPoint P2: tibia_r (0.03012894 -0.2318155 0.014614)
      PathPoint P3: tibia_r (0.02796829 -0.4450226 -0.01507069)
      PathPoint P4: calcn_r (0.1231382 0.01497984 -0.03114504)
    DeGrooteFregly2016Muscle tibpost_r: max_isometric_force=1580.838 optimal_fiber_length=0.04599008
        tendon_slack_length=0.3416158 pennation_angle_at_optimal=0.2264891 ignore_tendon_compliance=true
        passive_fiber_strain_at_one_norm_force=0.6862359
      PathPoint P1: tibia_r (-0.00492146 -0.1585978 0.01175971)
      PathPoint P2: tibia_r (-0.01968584 -0.4445361 -0.01998008)
      PathPoint P3: calcn_r (0.04403829 0.02810824 -0.02920486)
      PathPoint P4: calcn_r (0.08152891 0.01338087 -0.02869429)
    DeGrooteFregly2016Muscle vasint_r: max_isometric_force=1747.838 optimal_fiber_length=0.1071993
        tendon_slack_length=0.2182965 pennation_angle_at_optimal=0.06309973 ignore_tendon_compliance=true
        passive_fiber_strain_at_one_norm_force=0.8514363
      PathPoint P1: femur_r (0.03282211 -0.2007657 0.03598176)
      PathPoint P2: femur_r (0.0379152 -0.2174614 0.03308001)
      PathPoint P3: patella_r (0.0058 0.048 -0.0006)
      PathPoint P4: patella_r (0.005 0.00247 -0.00039)
      PathPoint P5: tibia_r (0.03909559 -0.07686643 0.0004909392)
      PathWrap: wrap_object=KnExt_at_fem_r method=hybrid
    DeGrooteFregly2016Muscle vaslat_r: max_isometric_force=5290.007 optimal_fiber_length=0.1075484
        tendon_slack_length=0.2386853 pennation_angle_at_optimal=0.2528673 ignore_tendon_compliance=true
        passive_fiber_strain_at_one_norm_force=0.8928189
      PathPoint P1: femur_r (0.005432626 -0.1934614 0.0405085)
      PathPoint P2: femur_r (0.03044534 -0.2703659 0.04747271)
      PathPoint P3: patella_r (0.0103 0.0423 0.0141)
      PathPoint P4: patella_r (0.005 0.00247 0.00733)
      PathPoint P5: tibia_r (0.03905958 -0.07708535 0.005834184)
      PathWrap: wrap_object=KnExt_at_fem_r method=hybrid
    DeGrooteFregly2016Muscle vasmed_r: max_isometric_force=2822.872 optimal_fiber_length=0.1047473
        tendon_slack_length=0.2163164 pennation_angle_at_optimal=0.4222225 ignore_tendon_compliance=true
        passive_fiber_strain_at_one_norm_force=0.8518332
      PathPoint P1: femur_r (0.01584516 -0.2190267 0.0218212)
      PathPoint P2: femur_r (0.04029197 -0.2889399 0.001044632)
      PathPoint P3: patella_r (0.0063 0.0445 -0.017)
      PathPoint P4: patella_r (0.005 0.00247 -0.0085)
      PathPoint P5: tibia_r (0.03829136 -0.07731644 -0.007740855)
      PathWrap: wrap_object=KnExt_at_fem_r method=hybrid
    DeGrooteFregly2016Muscle addbrev_l: max_isometric_force=660.9891 optimal_fiber_length=0.1085147
        tendon_slack_length=0.0373121 pennation_angle_at_optimal=0.1147809 ignore_tendon_compliance=true
        passive_fiber_strain_at_one_norm_force=0.5015522
      PathPoint P1: pelvis (-0.01952326 -0.1006852 -0.01600912)
      PathPoint P2: femur_l (-0.002263594 -0.1231308 -0.02890148)
      PathWrap: wrap_object=AB_at_femshaft_l method=hybrid
    DeGrooteFregly2016Muscle addlong_l: max_isometric_force=978.4845 optimal_fiber_length=0.1126997
        tendon_slack_length=0.1372805 pennation_angle_at_optimal=0.1377704 ignore_tendon_compliance=true
        passive_fiber_strain_at_one_norm_force=0.5002995
      PathPoint P1: pelvis (-0.007747973 -0.09522248 -0.01962676)
      PathPoint P2: femur_l (0.01274403 -0.249778 -0.01837391)
      PathWrap: wrap_object=AL_at_femshaft_l method=hybrid
    DeGrooteFregly2016Muscle addmagDist_l: max_isometric_force=638.0322 optimal_fiber_length=0.1844102
        tendon_slack_length=0.0909362 pennation_angle_at_optimal=0.194705 ignore_tendon_compliance=true
        passive_fiber_strain_at_one_norm_force=0.7
      PathPoint P1: pelvis (-0.07568073 -0.1367498 -0.041395)
      PathPoint P2: femur_l (0.01273272 -0.2739138 -0.02240155)
      PathWrap: wrap_object=AMdist_at_femshaft_l method=hybrid
    DeGrooteFregly2016Muscle addmagIsch_l: max_isometric_force=638.9248 optimal_fiber_length=0.1623287
        tendon_slack_length=0.2248315 pennation_angle_at_optimal=0.1680443 ignore_tendon_compliance=true
        passive_fiber_strain_at_one_norm_force=0.7000392
      PathPoint P1: pelvis (-0.09160598 -0.1389884 -0.04335976)
      PathPoint P2: femur_l (0.005443944 -0.4048393 0.03798978)
      PathWrap: wrap_object=AMisch_at_condyles_l method=hybrid
    DeGrooteFregly2016Muscle addmagMid_l: max_isometric_force=632.5435 optimal_fiber_length=0.1445465
        tendon_slack_length=0.04894604 pennation_angle_at_optimal=0.2073076 ignore_tendon_compliance=true
        passive_fiber_strain_at_one_norm_force=0.7
      PathPoint P1: pelvis (-0.05382695 -0.1293376 -0.02966884)
      PathPoint P2: femur_l (0.002738949 -0.1694613 -0.03391571)
      PathWrap: wrap_object=AMmid_at_femshaft_l method=hybrid
    DeGrooteFregly2016Muscle addmagProx_l: max_isometric_force=620.3076 optimal_fiber_length=0.113037
        tendon_slack_length=0.04316398 pennation_angle_at_optimal=0.3114833 ignore_tendon_compliance=true
        passive_fiber_strain_at_one_norm_force=0.7
      PathPoint P1: pelvis (-0.03166652 -0.1151988 -0.0141899)
      PathPoint P2: femur_l (-0.01728254 -0.08228891 -0.03716568)
      PathWrap: wrap_object=AMprox_at_femshaft_l method=hybrid
    DeGrooteFregly2016Muscle bflh_l: max_isometric_force=1378.633 optimal_fiber_length=0.1033483
        tendon_slack_length=0.3443813 pennation_angle_at_optimal=0.1759182 ignore_tendon_compliance=true
        passive_fiber_strain_at_one_norm_force=0.7068715
      PathPoint P1: pelvis (-0.1063046 -0.1275703 -0.06091781)
      PathPoint P2: tibia_l (-0.040452 -0.04256844 -0.02888549)
      PathPoint P3: tibia_l (-0.03445022 -0.05533897 -0.03459409)
    DeGrooteFregly2016Muscle bfsh_l: max_isometric_force=576.6497 optimal_fiber_length=0.1184636
        tendon_slack_length=0.1136491 pennation_angle_at_optimal=0.2642232 ignore_tendon_compliance=true
        passive_fiber_strain_at_one_norm_force=0.6888986
      PathPoint P1: femur_l (0.005658985 -0.2202788 -0.02716043)
      PathPoint P2: tibia_l (-0.03613072 -0.0509605 -0.03630666)
      PathWrap: wrap_object=BF_at_gastroc_l method=hybrid
    DeGrooteFregly2016Muscle edl_l: max_isometric_force=569.2452 optimal_fiber_length=0.08167419
        tendon_slack_length=0.4347415 pennation_angle_at_optimal=0.2182582 ignore_tendon_compliance=true
        passive_fiber_strain_at_one_norm_force=0.7072192
      PathPoint P1: tibia_l (-0.0192057 -0.1407191 -0.02340524)
      PathPoint P2: tibia_l (0.01968584 -0.4573066 -0.01278725)
      PathPoint P3: calcn_l (0.0970532 0.0302963 -0.0008169192)
      PathPoint P4: calcn_l (0.1706616 0.004628602 -0.01327494)
      PathPoint P5: toes_l (0.0003404307 0.005138388 -0.01605911)
      PathPoint P6: toes_l (0.05027027 -0.0004373096 -0.02624037)
    DeGrooteFregly2016Muscle ehl_l: max_isometric_force=270.4625 optimal_fiber_length=0.08788898
        tendon_slack_length=0.38398 pennation_angle_at_optimal=0.1972681 ignore_tendon_compliance=true
        passive_fiber_strain_at_one_norm_force=0.7178208
      PathPoint P1: tibia_l (-0.01680498 -0.1885174 -0.02157849)
      PathPoint P2: tibia_l (0.008522528 -0.3538045 -0.01872419)
      PathPoint P3: tibia_l (0.02400712 -0.4491578 0.003196813)
      PathPoint P4: calcn_l (0.1024392 0.03273684 0.02154624)
      PathPoint P5: calcn_l (0.1365504 0.02600433 0.02624353)
      PathPoint P6: calcn_l (0.1831232 0.01169774 0.02859217)
      PathPoint P7: toes_l (0.03381612 0.004482423 0.02571557)
      PathPoint P8: toes_l (0.06388749 0.003717132 0.01952284)
    DeGrooteFregly2016Muscle fdl_l: max_isometric_force=405.1507 optimal_fiber_length=0.05178636
        tendon_slack_length=0.4398042 pennation_angle_at_optimal=0.2248391 ignore_tendon_compliance=true
        passive_fiber_strain_at_one_norm_force=0.6997089
      PathPoint P1: tibia_l (-0.002760819 -0.2228154 0.002055094)
      PathPoint P2: tibia_l (-0.02112627 -0.4433198 0.01415732)
      PathPoint P3: calcn_l (0.04604483 0.02650927 0.02859217)
      PathPoint P4: calcn_l (0.07477004 0.01481153 0.02685622)
      PathPoint P5: calcn_l (0.1750971 -0.006816668 -0.01184533)
      PathPoint P6: toes_l (-0.002156061 -0.008527537 -0.01542934)
      PathPoint P7: toes_l (0.03234092 -0.007762245 -0.02256672)
      PathPoint P8: toes_l (0.05004331 -0.006559644 -0.02540068)
    DeGrooteFregly2016Muscle fhl_l: max_isometric_force=873.2208 optimal_fiber_length=0.06090747
        tendon_slack_length=0.4095244 pennation_angle_at_optimal=0.2580255 ignore_tendon_compliance=true
        passive_fiber_strain_at_one_norm_force=0.7002505
      PathPoint P1: tibia_l (-0.03721104 -0.2630729 -0.02283438)
      PathPoint P2: tibia_l (-0.02904862 -0.4464821 0.008677064)
      PathPoint P3: calcn_l (0.03949717 0.02322717 0.02460969)
      PathPoint P4: calcn_l (0.1096205 0.005722635 0.02614141)
      PathPoint P5: calcn_l (0.1822784 -0.004460289 0.02746891)
      PathPoint P6: toes_l (0.01758892 -0.006996954 0.0278148)
      PathPoint P7: toes_l (0.06377402 -0.01115139 0.01899803)
    DeGrooteFregly2016Muscle gaslat_l: max_isometric_force=1430.539 optimal_fiber_length=0.07196973
        tendon_slack_length=0.4603005 pennation_angle_at_optimal=0.2102268 passive_fiber_strain_at_one_norm_force=2
        tendon_strain_at_one_norm_force=0.1
      PathPoint P1: femur_l (-0.003395391 -0.3979837 -0.03215145)
      PathPoint P2: calcn_l (0.004646726 0.02608848 0.00541209)
      PathWrap: wrap_object=GasLat_at_shank_l method=hybrid
      PathWrap pathwrap_0: wrap_object=Gastroc_at_condyles_l method=hybrid
    DeGrooteFregly2016Muscle gasmed_l: max_isometric_force=2833.471 optimal_fiber_length=0.06233849
        tendon_slack_length=0.4873603 pennation_angle_at_optimal=0.1656816 passive_fiber_strain_at_one_norm_force=2
        tendon_strain_at_one_norm_force=0.1
      PathPoint P1: femur_l (0.009054376 -0.3952706 0.0241426)
      PathPoint P2: calcn_l (0.004646726 0.02608848 0.00541209)
      PathWrap: wrap_object=GasMed_at_shank_l method=hybrid
      PathWrap pathwrap_0: wrap_object=Gastroc_at_condyles_l method=hybrid
    DeGrooteFregly2016Muscle glmax1_l: max_isometric_force=1024.929 optimal_fiber_length=0.1568549
        tendon_slack_length=0.0521152 pennation_angle_at_optimal=0.3540118 ignore_tendon_compliance=true
        passive_fiber_strain_at_one_norm_force=0.8468075
      PathPoint P1: pelvis (-0.1258279 0.03695361 -0.05852683)
      PathPoint P2: pelvis (-0.1284855 -0.02592108 -0.08098118)
      PathPoint P3: femur_l (-0.05025179 -0.03401748 -0.0350532)
      PathPoint P4: femur_l (-0.03135078 -0.05906102 -0.05455299)
      PathWrap: wrap_object=Gmax1_at_pelvis_l method=hybrid
    DeGrooteFregly2016Muscle glmax2_l: max_isometric_force=1479.04 optimal_fiber_length=0.1659182
        tendon_slack_length=0.07174342 pennation_angle_at_optimal=0.3673821 ignore_tendon_compliance=true
        passive_fiber_strain_at_one_norm_force=0.7164175
      PathPoint P1: pelvis (-0.1346185 0.009318735 -0.04802735)
      PathPoint P2: pelvis (-0.1373783 -0.06523115 -0.08451566)
      PathPoint P3: femur_l (-0.05093086 -0.06093929 -0.02924969)
      PathPoint P4: femur_l (-0.01765603 -0.1060177 -0.04863341)
      PathWrap: wrap_object=Gmax2_at_pelvis_l method=hybrid
    DeGrooteFregly2016Muscle glmax3_l: max_isometric_force=997.3834 optimal_fiber_length=0.1764107
        tendon_slack_length=0.07364525 pennation_angle_at_optimal=0.3824161 ignore_tendon_compliance=true
        passive_fiber_strain_at_one_norm_force=0.7121937
      PathPoint P1: pelvis (-0.1328808 -0.05623375 -0.009355977)
      PathPoint P2: pelvis (-0.130121 -0.1352823 -0.04522056)
      PathPoint P3: femur_l (-0.0318035 -0.1173916 -0.0109106)
      PathPoint P4: femur_l (-0.006790782 -0.14807 -0.04770485)
      PathWrap: wrap_object=Gmax3_at_pelvis_l method=hybrid
    DeGrooteFregly2016Muscle glmed1_l: max_isometric_force=1127.798 optimal_fiber_length=0.08234823
        tendon_slack_length=0.06296462 pennation_angle_at_optimal=0.3165559 ignore_tendon_compliance=true
        passive_fiber_strain_at_one_norm_force=0.7
      PathPoint P1: pelvis (-0.05008584 0.02784909 -0.1195486)
      PathPoint P2: femur_l (-0.01584516 -0.01878266 -0.06848142)
    DeGrooteFregly2016Muscle glmed2_l: max_isometric_force=787.0508 optimal_fiber_length=0.0913704
        tendon_slack_length=0.08166863 pennation_angle_at_optimal=0.3165559 ignore_tendon_compliance=true
        passive_fiber_strain_at_one_norm_force=0.7014005
      PathPoint P1: pelvis (-0.0868836 0.05891154 -0.08524335)
      PathPoint P2: femur_l (-0.02489953 -0.01043481 -0.06499931)
    DeGrooteFregly2016Muscle glmed3_l: max_isometric_force=891.0611 optimal_fiber_length=0.08504552
        tendon_slack_length=0.05269659 pennation_angle_at_optimal=0.3165559 ignore_tendon_compliance=true
        passive_fiber_strain_at_one_norm_force=0.7030514
      PathPoint P1: pelvis (-0.102216 0.0171379 -0.06653139)
      PathPoint P2: femur_l (-0.03497253 -0.004904361 -0.06012436)
    DeGrooteFregly2016Muscle glmin1_l: max_isometric_force=386.548 optimal_fiber_length=0.0873468
        tendon_slack_length=0.02072917 pennation_angle_at_optimal=0.1745329 ignore_tendon_compliance=true
        passive_fiber_strain_at_one_norm_force=0.7
      PathPoint P1: pelvis (-0.0306648 0 -0.1226673)
      PathPoint P2: femur_l (0.005658985 -0.01565222 -0.06499931)
    DeGrooteFregly2016Muscle glmin2_l: max_isometric_force=404.6326 optimal_fiber_length=0.07451472
        tendon_slack_length=0.03472792 pennation_angle_at_optimal=0 ignore_tendon_compliance=true
        passive_fiber_strain_at_one_norm_force=0.7000285
      PathPoint P1: pelvis (-0.06296506 0.01071119 -0.1049949)
      PathPoint P2: femur_l (0.004527188 -0.009391329 -0.0603565)
    DeGrooteFregly2016Muscle glmin3_l: max_isometric_force=450.8921 optimal_fiber_length=0.03876243
        tendon_slack_length=0.0518932 pennation_angle_at_optimal=0.01745329 ignore_tendon_compliance=true
        passive_fiber_strain_at_one_norm_force=0.7002322
      PathPoint P1: pelvis (-0.08064842 -0.01660234 -0.08295633)
      PathPoint P2: femur_l (-0.004527188 -0.001043481 -0.0591958)
    DeGrooteFregly2016Muscle grac_l: max_isometric_force=291.8775 optimal_fiber_length=0.2440713
        tendon_slack_length=0.1843004 pennation_angle_at_optimal=0.1720016 ignore_tendon_compliance=true
        passive_fiber_strain_at_one_norm_force=0.8027483
      PathPoint P1: pelvis (-0.0484095 -0.1385171 -0.02553142)
      PathPoint P2: tibia_l (-0.02211056 -0.05783226 0.0338063)
      PathPoint P3: tibia_l (0.002136634 -0.0846747 0.01795924)
      PathWrap: wrap_object=GR_at_condyles_l method=hybrid
    DeGrooteFregly2016Muscle iliacus_l: max_isometric_force=1070.242 optimal_fiber_length=0.113067
        tendon_slack_length=0.101952 pennation_angle_at_optimal=0.279914 ignore_tendon_compliance=true
        passive_fiber_strain_at_one_norm_force=0.5005449
      PathPoint P1: pelvis (-0.06184068 0.03309758 -0.08763432)
      PathPoint P2: pelvis (-0.01379916 -0.05966133 -0.07859021)
      PathPoint P3: femur_l (-0.002603133 -0.05895668 -0.01613376)
      PathPoint P4: femur_l (-0.01380792 -0.06646974 -0.02274976)
      PathWrap: wrap_object=IL_at_brim_l method=hybrid range=(2 3)
    DeGrooteFregly2016Muscle perbrev_l: max_isometric_force=482.0423 optimal_fiber_length=0.05456968
        tendon_slack_length=0.1773245 pennation_angle_at_optimal=0.2052361 ignore_tendon_compliance=true
        passive_fiber_strain_at_one_norm_force=0.6987541
      PathPoint P1: tibia_l (-0.02916865 -0.3079522 -0.02865715)
      PathPoint P2: tibia_l (-0.04069207 -0.4734826 -0.0284288)
      PathPoint P3: tibia_l (-0.03421015 -0.4869829 -0.02911383)
      PathPoint P4: calcn_l (0.04974109 0.02272223 -0.02379277)
      PathPoint P5: calcn_l (0.07149621 0.01843025 -0.03502541)
    DeGrooteFregly2016Muscle perlong_l: max_isometric_force=1056.466 optimal_fiber_length=0.0596215
        tendon_slack_length=0.3899114 pennation_angle_at_optimal=0.2479525 ignore_tendon_compliance=true
        passive_fiber_strain_at_one_norm_force=0.6924185
      PathPoint P1: tibia_l (-0.02400712 -0.1669899 -0.03219648)
      PathPoint P2: tibia_l (-0.03805129 -0.474334 -0.02705874)
      PathPoint P3: tibia_l (-0.03264968 -0.4881991 -0.02740126)
      PathPoint P4: calcn_l (0.04625604 0.01935597 -0.02256739)
      PathPoint P5: calcn_l (0.07191864 0.008920578 -0.02900063)
      PathPoint P6: calcn_l (0.0899775 0.005806792 -0.01204956)
      PathPoint P7: calcn_l (0.1270457 0.007153294 0.01878914)
    DeGrooteFregly2016Muscle piri_l: max_isometric_force=1068.926 optimal_fiber_length=0.02784506
        tendon_slack_length=0.1230604 pennation_angle_at_optimal=0.1745329 ignore_tendon_compliance=true
        passive_fiber_strain_at_one_norm_force=0.7028348
      PathPoint P1: pelvis (-0.1040661 -0.006994407 -0.01404436)
      PathPoint P2: pelvis (-0.1042808 -0.03284051 -0.06332957)
      PathPoint P3: femur_l (-0.0167506 -0.003756532 -0.05072268)
    DeGrooteFregly2016Muscle psoas_l: max_isometric_force=1488.434 optimal_fiber_length=0.1245719
        tendon_slack_length=0.106076 pennation_angle_at_optimal=0.2155251 ignore_tendon_compliance=true
        passive_fiber_strain_at_one_norm_force=0.5010382
      PathPoint P1: pelvis (-0.0619429 0.06640938 -0.04054257)
      PathPoint P2: pelvis (-0.02095428 -0.07005118 -0.06819468)
      PathPoint P3: femur_l (-0.01493972 -0.04873056 -0.005339229)
      PathPoint P4: femur_l (-0.02659723 -0.0546784 -0.01021418)
      PathWrap: wrap_object=PS_at_brim_l method=hybrid range=(2 3)
    DeGrooteFregly2016Muscle recfem_l: max_isometric_force=2289.319 optimal_fiber_length=0.08077884
        tendon_slack_length=0.4773226 pennation_angle_at_optimal=0.2170149 ignore_tendon_compliance=true
        passive_fiber_strain_at_one_norm_force=0.8999622
      PathPoint P1: pelvis (-0.02453184 -0.04155942 -0.09699029)
      PathPoint P2: patella_l (0.01 0.049 -0.0007)
      PathPoint P3: patella_l (0.0121 0.0437 0.001)
      PathPoint P4: patella_l (0.005 0.00247 -3e-5)
      PathPoint P5: tibia_l (0.03913161 -0.07676913 0.0005366079)
      PathWrap: wrap_object=KnExt_at_fem_l method=hybrid
    DeGrooteFregly2016Muscle sart_l: max_isometric_force=257.5173 optimal_fiber_length=0.4339036
        tendon_slack_length=0.1335086 pennation_angle_at_optimal=0.02613542 ignore_tendon_compliance=true
        passive_fiber_strain_at_one_norm_force=0.7212821
      PathPoint P1: pelvis (-0.01993212 -0.01670946 -0.1097768)
      PathPoint P2: femur_l (-0.003395391 -0.372314 0.04886555)
      PathPoint P3: tibia_l (-0.03012894 -0.04877126 0.04167274)
      PathPoint P4: tibia_l (-0.01908566 -0.07285284 0.03014138)
      PathPoint P5: tibia_l (0.01632484 -0.09851552 0.002968469)
    DeGrooteFregly2016Muscle semimem_l: max_isometric_force=2313.564 optimal_fiber_length=0.0729729
        tendon_slack_length=0.3675994 pennation_angle_at_optimal=0.2545615 ignore_tendon_compliance=true
        passive_fiber_strain_at_one_norm_force=0.7353994
      PathPoint P1: pelvis (-0.1008872 -0.1221076 -0.06382855)
      PathPoint P2: tibia_l (-0.03481032 -0.05071725 0.02237769)
      PathWrap: wrap_object=SM_at_condyles_l method=hybrid
    DeGrooteFregly2016Muscle semiten_l: max_isometric_force=611.5535 optimal_fiber_length=0.2074455
        tendon_slack_length=0.265701 pennation_angle_at_optimal=0.241295 ignore_tendon_compliance=true
        passive_fiber_strain_at_one_norm_force=0.7803276
      PathPoint P1: pelvis (-0.1061002 -0.1342112 -0.05353698)
      PathPoint P2: tibia_l (-0.03745111 -0.06178504 0.02614537)
      PathPoint P3: tibia_l (0.002280676 -0.09401543 0.01335811)
      PathWrap: wrap_object=ST_at_condyles_l method=hybrid
    DeGrooteFregly2016Muscle soleus_l: max_isometric_force=5566.139 optimal_fiber_length=0.05443822
        tendon_slack_length=0.3424113 pennation_angle_at_optimal=0.3814289 passive_fiber_strain_at_one_norm_force=2
        tendon_strain_at_one_norm_force=0.1
      PathPoint P1: tibia_l (-0.009122706 -0.1114077 -0.01118885)
      PathPoint P2: calcn_l (0.004646726 0.02608848 0.00541209)
    DeGrooteFregly2016Muscle tfl_l: max_isometric_force=430.6278 optimal_fiber_length=0.09889936
        tendon_slack_length=0.4679471 pennation_angle_at_optimal=0.05235988 ignore_tendon_compliance=true
        passive_fiber_strain_at_one_norm_force=0.7197196
      PathPoint P1: pelvis (-0.0204432 0.01178231 -0.1341023)
      PathPoint P2: femur_l (0.03327483 -0.1038264 -0.06929391)
      PathPoint P3: femur_l (0.01211023 -0.4226098 -0.03760674)
      PathPoint P4: tibia_l (0.01296384 -0.04986588 -0.03950348)
    DeGrooteFregly2016Muscle tibant_l: max_isometric_force=1135.364 optimal_fiber_length=0.08208527
        tendon_slack_length=0.2889943 pennation_angle_at_optimal=0.1951828 ignore_tendon_compliance=true
        passive_fiber_strain_at_one_norm_force=0.7076768
      PathPoint P1: tibia_l (0.01848548 -0.1595708 -0.01849585)
      PathPoint P2: tibia_l (0.03012894 -0.2318155 -0.014614)
      PathPoint P3: tibia_l (0.02796829 -0.4450226 0.01507069)
      PathPoint P4: calcn_l (0.1231382 0.01497984 0.03114504)
    DeGrooteFregly2016Muscle tibpost_l: max_isometric_force=1580.838 optimal_fiber_length=0.04599008
        tendon_slack_length=0.3416158 pennation_angle_at_optimal=0.2264891 ignore_tendon_compliance=true
        passive_fiber_strain_at_one_norm_force=0.6862359
      PathPoint P1: tibia_l (-0.00492146 -0.1585978 -0.01175971)
      PathPoint P2: tibia_l (-0.01968584 -0.4445361 0.01998008)
      PathPoint P3: calcn_l (0.04403829 0.02810824 0.02920486)
      PathPoint P4: calcn_l (0.08152891 0.01338087 0.02869429)
    DeGrooteFregly2016Muscle vasint_l: max_isometric_force=1747.838 optimal_fiber_length=0.1071997
        tendon_slack_length=0.2182973 pennation_angle_at_optimal=0.06309973 ignore_tendon_compliance=true
        passive_fiber_strain_at_one_norm_force=0.8514363
      PathPoint P1: femur_l (0.03282211 -0.2007657 -0.03598176)
      PathPoint P2: femur_l (0.0379152 -0.2174614 -0.03308001)
      PathPoint P3: patella_l (0.0058 0.048 0.0006)
      PathPoint P4: patella_l (0.005 0.00247 0.00039)
      PathPoint P5: tibia_l (0.03909559 -0.07686643 -0.0004909392)
      PathWrap: wrap_object=KnExt_at_fem_l method=hybrid
    DeGrooteFregly2016Muscle vaslat_l: max_isometric_force=5290.007 optimal_fiber_length=0.1075488
        tendon_slack_length=0.2386861 pennation_angle_at_optimal=0.2528673 ignore_tendon_compliance=true
        passive_fiber_strain_at_one_norm_force=0.8928189
      PathPoint P1: femur_l (0.005432626 -0.1934614 -0.0405085)
      PathPoint P2: femur_l (0.03044534 -0.2703659 -0.04747271)
      PathPoint P3: patella_l (0.0103 0.0423 -0.0141)
      PathPoint P4: patella_l (0.005 0.00247 -0.00733)
      PathPoint P5: tibia_l (0.03905958 -0.07708535 -0.005834184)
      PathWrap: wrap_object=KnExt_at_fem_l method=hybrid
    DeGrooteFregly2016Muscle vasmed_l: max_isometric_force=2822.872 optimal_fiber_length=0.1047477
        tendon_slack_length=0.2163172 pennation_angle_at_optimal=0.4222225 ignore_tendon_compliance=true
        passive_fiber_strain_at_one_norm_force=0.8518332
      PathPoint P1: femur_l (0.01584516 -0.2190267 -0.0218212)
      PathPoint P2: femur_l (0.04029197 -0.2889399 -0.001044632)
      PathPoint P3: patella_l (0.0063 0.0445 0.017)
      PathPoint P4: patella_l (0.005 0.00247 0.0085)
      PathPoint P5: tibia_l (0.03829136 -0.07731644 0.007740855)
      PathWrap: wrap_object=KnExt_at_fem_l method=hybrid
    ObjectGroup right_leg
    ObjectGroup left_leg
    ObjectGroup hip_add_r
    ObjectGroup hip_abd_r
    ObjectGroup hip_flex_r
    ObjectGroup hip_ext_r
    ObjectGroup hip_inrot_r
    ObjectGroup hip_exrot_r
    ObjectGroup knee_flex_r
    ObjectGroup knee_ext_r
    ObjectGroup ankle_df_r
    ObjectGroup ankle_pf_r
    ObjectGroup everter_r
    ObjectGroup inverter_r
    ObjectGroup hip_add_l
    ObjectGroup hip_abd_l
    ObjectGroup hip_flex_l
    ObjectGroup hip_ext_l
    ObjectGroup hip_exrot_l
    ObjectGroup hip_inrot_l
    ObjectGroup knee_flex_l
    ObjectGroup knee_ext_l
    ObjectGroup ankle_df_l
    ObjectGroup ankle_pf_l
    ObjectGroup everter_l
    ObjectGroup inverter_l
  MarkerSet:
    Marker RACR: torso (-0.0119327 0.4145216 0.1722623) fixed=true
    Marker LACR: torso (-0.0111802 0.4118616 -0.1749083) fixed=true
    Marker C7: torso (-0.08608825 0.4394081 0.001278931) fixed=true
    Marker CLAV: torso (0.05662008 0.3799827 0.03115942) fixed=true
    Marker RASH: torso (0.05063955 0.3758729 0.1996495) fixed=true
    Marker RPSH: torso (-0.05063955 0.3758729 0.1996495) fixed=true
    Marker LASH: torso (0.05063955 0.3758729 -0.1996495) fixed=true
    Marker LPSH: torso (-0.05874188 0.3758729 -0.1996495) fixed=true
    Marker RSJC: humerus_r (0 0 0)
    Marker RUA1: humerus_r (0.01811819 -0.08136017 0.02770835)
    Marker RUA2: humerus_r (0.04481867 -0.1639835 -0.008187742)
    Marker RUA3: humerus_r (-0.004104578 -0.2068881 0.03130224)
    Marker RLEL: humerus_r (0.02609931 -0.3423886 0.02589557) fixed=true
    Marker RMEL: humerus_r (-0.008678633 -0.3408674 -0.03976092) fixed=true
    Marker RFAsuperior: radius_r (0.03905808 -0.08444528 0.0293093)
    Marker RFAradius: radius_r (0.009431966 -0.2633325 0.03671877) fixed=true
    Marker RFAulna: radius_r (-0.04425854 -0.2462997 -0.01217307) fixed=true
    Marker LSJC: humerus_l (0 0 0)
    Marker LUA1: humerus_l (0.006054435 -0.06976545 -0.03529555)
    Marker LUA2: humerus_l (0.03815453 -0.1318765 -0.01019883)
    Marker LUA3: humerus_l (-0.03923737 -0.187987 -0.01810632)
    Marker LLEL: humerus_l (0.02714558 -0.3417436 -0.02344782) fixed=true
    Marker LMEL: humerus_l (-0.0137368 -0.3481555 0.04096198) fixed=true
    Marker LFAsuperior: radius_l (0.0519118 -0.07377386 -0.02165152)
    Marker LFAradius: radius_l (0.007196477 -0.2638329 -0.0372904) fixed=true
    Marker LFAulna: radius_l (-0.04487451 -0.2518471 0.0127237) fixed=true
    Marker RASI: pelvis (0.01688608 0.02295087 0.1288807) fixed=true
    Marker LASI: pelvis (0.01911848 0.02315331 -0.1334817) fixed=true
    Marker RPSI: pelvis (-0.1651269 0.0506168 0.04043445) fixed=true
    Marker LPSI: pelvis (-0.164394 0.05595311 -0.04192309) fixed=true
    Marker LHJC: femur_l (0 0 0)
    Marker RHJC: femur_r (0 0 0)
    Marker RTH1: femur_r (0.00315545 -0.06582382 0.1022486)
    Marker RTH2: femur_r (0.04697071 -0.1763744 0.09193108)
    Marker RTH3: femur_r (-0.03415424 -0.2837287 0.06567252)
    Marker RLFC: femur_r (0 -0.4215663 0.0580351) fixed=true
    Marker RMFC: femur_r (0 -0.4215663 -0.0580351) fixed=true
    Marker RKJC: tibia_r (0 0 0)
    Marker RTB1: tibia_r (0.0367525 -0.1660047 -0.001942064)
    Marker RTB2: tibia_r (0.01638006 -0.2302977 0.06815377)
    Marker RTB3: tibia_r (0.03241081 -0.3310839 0.003018705)
    Marker RLMAL: tibia_r (-0.00600178 -0.4728745 0.06051111) fixed=true
    Marker RMMAL: tibia_r (0.007202136 -0.4728745 -0.04338532) fixed=true
    Marker RAJC: talus_r (0 0 0)
    Marker RCAL: calcn_r (-0.01535215 0.04566495 -0.009952118) fixed=true
    Marker RTOE: toes_r (0.0286967 0.03438715 -0.03034038) fixed=true
    Marker RMT5: toes_r (-0.03623284 0.004237275 0.06196026) fixed=true
    Marker LTH1: femur_l (0.01680492 -0.1130946 -0.09569524)
    Marker LTH2: femur_l (0.06654061 -0.2361251 -0.0739135)
    Marker LTH3: femur_l (-0.009134734 -0.3441035 -0.05983303)
    Marker LLFC: femur_l (0 -0.4215663 -0.0580351) fixed=true
    Marker LMFC: femur_l (0 -0.4215663 0.0580351) fixed=true
    Marker LKJC: tibia_l (0 0 0)
    Marker LTB1: tibia_l (0.04756771 -0.154088 -0.002395326)
    Marker LTB2: tibia_l (0.02002194 -0.2371974 -0.06095067)
    Marker LTB3: tibia_l (0.03131009 -0.3542156 -0.001311835)
    Marker LLMAL: tibia_l (-0.00600178 -0.4728745 -0.06051111) fixed=true
    Marker LMMAL: tibia_l (0.007202136 -0.4728745 0.04338532) fixed=true
    Marker LAJC: talus_l (0 0 0)
    Marker LCAL: calcn_l (-0.01520113 0.04613706 0.006620109) fixed=true
    Marker LTOE: toes_l (0.02838093 0.0331551 0.03073965) fixed=true
    Marker LMT5: toes_l (-0.03668167 0.006993397 -0.06019775) fixed=true
    Marker REJC: ulna_r (0 0 0)
    Marker LEJC: ulna_l (0 0 0)
  ContactGeometrySet:
    ContactHalfSpace floor: socket_frame=/ground orientation=(0 0 -1.570796)
    ContactSphere heel_r: socket_frame=/bodyset/calcn_r location=(0.0146421 0.02 -0.0122799) radius=0.035
    ContactSphere lateralRearfoot_r: socket_frame=/bodyset/calcn_r location=(0.0849291 0.02 0.0338649) radius=0.035
    ContactSphere lateralMidfoot_r: socket_frame=/bodyset/calcn_r location=(0.153362 0.02 0.0594829) radius=0.035
    ContactSphere lateralToe_r: socket_frame=/bodyset/toes_r location=(0.023014 0.02 0.0670461) radius=0.035
    ContactSphere medialToe_r: socket_frame=/bodyset/toes_r location=(0.074363 0.02 -0.026039) radius=0.035
    ContactSphere medialMidfoot_r: socket_frame=/bodyset/calcn_r location=(0.203637 0.02 -0.0398688) radius=0.035
    ContactSphere heel_l: socket_frame=/bodyset/calcn_l location=(0.0146421 0.02 0.0122799) radius=0.035
    ContactSphere lateralRearfoot_l: socket_frame=/bodyset/calcn_l location=(0.0849291 0.02 -0.0338649) radius=0.035
    ContactSphere lateralMidfoot_l: socket_frame=/bodyset/calcn_l location=(0.153362 0.02 -0.0594829) radius=0.035
    ContactSphere lateralToe_l: socket_frame=/bodyset/toes_l location=(0.023014 0.02 -0.0670461) radius=0.035
    ContactSphere medialToe_l: socket_frame=/bodyset/toes_l location=(0.074363 0.02 0.026039) radius=0.035
    ContactSphere medialMidfoot_l: socket_frame=/bodyset/calcn_l location=(0.203637 0.02 0.0398688) radius=0.035
